# OpenSim document version 40600
Model subject_walk_scaled:
  gravity: 0 -9.80665 0
  length_units: meters
  force_units: N
  credits:
    Rajagopal et al. (2016), Lai et al. (2017), Uhlrich et al. (2022)
  publications:
    Rajagopal, A., Dembia, C.L., DeMers, M.S., Delp, D.D., Hicks, J.L., Delp, S.L. (2016) Full-body musculoskeletal model for muscle-driven simulation of human gait. IEEE Transactions on Biomedical Engineering.
  ExpressionBasedCoordinateForce PassiveHipDampingX_r: coordinate=hip_flexion_r
      expression=-2.44*exp(5.05*(q-1.81))+1.51*exp(-21.88*(q+0.47))-0.1*qdot
  ExpressionBasedCoordinateForce PassiveHipDampingY_r: coordinate=hip_adduction_r
      expression=-0.03*exp(14.94*(q-0.50))+0.03*exp(-14.94*(q+0.50))-0.1*qdot
  ExpressionBasedCoordinateForce PassiveHipDampingZ_r: coordinate=hip_rotation_r
      expression=-0.03*exp(14.94*(q-0.92))+0.03*exp(-14.94*(q+0.92))-0.1*qdot
  ExpressionBasedCoordinateForce PassiveHipDampingX_l: coordinate=hip_flexion_l
      expression=-2.44*exp(5.05*(q-1.81))+1.51*exp(-21.88*(q+0.47))-0.1*qdot
  ExpressionBasedCoordinateForce PassiveHipDampingY_l: coordinate=hip_adduction_l
      expression=-0.03*exp(14.94*(q-0.50))+0.03*exp(-14.94*(q+0.50))-0.1*qdot
  ExpressionBasedCoordinateForce PassiveHipDampingZ_l: coordinate=hip_rotation_l
      expression=-0.03*exp(14.94*(q-0.92))+0.03*exp(-14.94*(q+0.92))-0.1*qdot
  ExpressionBasedCoordinateForce PassiveKneeDamping_r: coordinate=knee_angle_r
      expression=6.09*exp(33.94*(-q-0.13))-11.03*exp(-11.33*(-q+2.40))-0.1*qdot
  ExpressionBasedCoordinateForce PassiveKneeDamping_l: coordinate=knee_angle_l
      expression=6.09*exp(33.94*(-q-0.13))-11.03*exp(-11.33*(-q+2.40))-0.1*qdot
  ExpressionBasedCoordinateForce PassiveAnkleDamping_r: coordinate=ankle_angle_r expression=-0.1*qdot
  ExpressionBasedCoordinateForce PassiveAnkleDamping_l: coordinate=ankle_angle_l expression=-0.1*qdot
  SmoothSphereHalfSpaceForce [values shared by the 12 below unless stated]: socket_half_space=/contactgeometryset/floor
      stiffness=1000000 [N/m^2] dissipation=2 [s/m] static_friction=0.8 dynamic_friction=0.8 viscous_friction=0.5
      transition_velocity=0.2 [m/s] hertz_smoothing=300 hunt_crossley_smoothing=50
  SmoothSphereHalfSpaceForce contactHeel_r: socket_sphere=/contactgeometryset/heel_r
  SmoothSphereHalfSpaceForce contactLateralRearfoot_r: socket_sphere=/contactgeometryset/lateralRearfoot_r
  SmoothSphereHalfSpaceForce contactLateralMidfoot_r: socket_sphere=/contactgeometryset/lateralMidfoot_r
  SmoothSphereHalfSpaceForce contactLateralToe_r: socket_sphere=/contactgeometryset/lateralToe_r
  SmoothSphereHalfSpaceForce contactMedialToe_r: socket_sphere=/contactgeometryset/medialToe_r
  SmoothSphereHalfSpaceForce contactMedialMidfoot_r: socket_sphere=/contactgeometryset/medialMidfoot_r
  SmoothSphereHalfSpaceForce contactHeel_l: socket_sphere=/contactgeometryset/heel_l
  SmoothSphereHalfSpaceForce contactLateralRearfoot_l: socket_sphere=/contactgeometryset/lateralRearfoot_l
  SmoothSphereHalfSpaceForce contactLateralMidfoot_l: socket_sphere=/contactgeometryset/lateralMidfoot_l
  SmoothSphereHalfSpaceForce contactLateralToe_l: socket_sphere=/contactgeometryset/lateralToe_l
  SmoothSphereHalfSpaceForce contactMedialToe_l: socket_sphere=/contactgeometryset/medialToe_l
  SmoothSphereHalfSpaceForce contactMedialMidfoot_l: socket_sphere=/contactgeometryset/medialMidfoot_l
  Ground
  BodySet:
    Body pelvis: mass=13.33838 [kg] mass_center=(-0.0707 0 0) inertia=(0.1164291 0.09864762 0.06557631 0 0 0)
        meshes=(r_pelvis.vtp l_pelvis.vtp sacrum.vtp)
      WrapCylinder Gmax1_at_pelvis_r: xyz_body_rotation=(-0.6 0.45 0) translation=(-0.08857502 -0.1119129 0.06597336)
          quadrant=-x radius=0.04511135 length=0.1661361
      WrapCylinder Gmax2_at_pelvis_r: xyz_body_rotation=(-0.75 0.39 0) translation=(-0.09202599 -0.09382595 0.07354408)
          quadrant=all radius=0.04503595 length=0.1111259
      WrapCylinder Gmax3_at_pelvis_r: xyz_body_rotation=(-0.1 0 0) translation=(-0.09547697 -0.09947812 0.07354408)
          quadrant=all radius=0.04560562 length=0.1082029
      WrapCylinder Gmax1_at_pelvis_l: xyz_body_rotation=(0.6 -0.45 0) translation=(-0.08857502 -0.1119129 -0.06597336)
          quadrant=-x radius=0.04511135 length=0.1661361
      WrapCylinder Gmax2_at_pelvis_l: xyz_body_rotation=(0.75 -0.39 0)
          translation=(-0.09202599 -0.09382595 -0.07354408) quadrant=all radius=0.04503595 length=0.1111259
      WrapCylinder Gmax3_at_pelvis_l: xyz_body_rotation=(0.1 0 0) translation=(-0.09547697 -0.09947812 -0.07354408)
          quadrant=all radius=0.04560562 length=0.1082029
      WrapCylinder PS_at_brim_r: xyz_body_rotation=(-0.25 -0.27 0.1) translation=(-0.08512404 -0.06782599 0.07094841)
          quadrant=-y radius=0.05683166 length=0.1089395
      WrapCylinder PS_at_brim_l: xyz_body_rotation=(0.25 0.27 0.1) translation=(-0.08512404 -0.06782599 -0.07094841)
          quadrant=-y radius=0.05683166 length=0.1089395
      WrapCylinder IL_at_brim_r: xyz_body_rotation=(-0.32 -0.24 0.9) translation=(-0.08167307 -0.07347816 0.08176371)
          quadrant=-y radius=0.06238281 length=0.1090176
      WrapCylinder IL_at_brim_l: xyz_body_rotation=(0.32 0.24 0.9) translation=(-0.08167307 -0.07347816 -0.08176371)
          quadrant=-y radius=0.06238281 length=0.1090176
    Body femur_r: mass=10.53457 mass_center=(0 -0.17 0) inertia=(0.1516523 0.03975352 0.1599201 0 0 0)
        meshes=r_femur.vtp
      WrapCylinder GasLat_at_condyles_r: translation=(0.005243464 -0.3992165 0) quadrant=all radius=0.02629109
          length=0.1052276
      WrapCylinder GasMed_at_condyles_r: translation=(0.005243464 -0.3992165 0) quadrant=all radius=0.0252799
          length=0.1052276
      WrapCylinder KnExt_at_fem_r: xyz_body_rotation=(-0.0623366 0.0507601 0)
          translation=(0.003763004 -0.3921396 0.002200426) quadrant=all radius=0.02528397 length=0.1051974
      WrapCylinder KnExtVL_at_fem_r: xyz_body_rotation=(-0.0623366 0.0507601 0)
          translation=(0.001980226 -0.3921396 0.002200426) quadrant=all radius=0.02528397 length=0.1051974
      WrapCylinder AB_at_femshaft_r: xyz_body_rotation=(1.66157 0.186644 0)
          translation=(0.01535643 -0.1096336 0.02458644) quadrant=all radius=0.01730748 length=0.06839164
      WrapCylinder AL_at_femshaft_r: xyz_body_rotation=(1.77711 0.136489 0)
          translation=(0.03222916 -0.2258095 0.01590379) quadrant=all radius=0.02106992 length=0.09784959
      WrapCylinder AMprox_at_femshaft_r: xyz_body_rotation=(1.61126 0.18656 0)
          translation=(0.005435365 -0.07097758 0.02673098) quadrant=all radius=0.02213769 length=0.06835523
      WrapCylinder AMmid_at_femshaft_r: xyz_body_rotation=(1.61139 0.13656 0)
          translation=(0.02413305 -0.1564841 0.02166027) quadrant=all radius=0.02246471 length=0.1170328
      WrapCylinder AMdist_at_femshaft_r: xyz_body_rotation=(1.71188 0.186636 0)
          translation=(0.03314551 -0.2538783 0.009854148) quadrant=all radius=0.02285764 length=0.1955864
      WrapCylinder AMisch_at_condyles_r: xyz_body_rotation=(1.71115 -0.463363 0)
          translation=(-0.02375405 -0.3669199 -0.003319269) quadrant=all radius=0.04170484 length=0.2376947
      WrapCylinder PECT_at_femshaft_r: xyz_body_rotation=(1.81295 0.276344 0)
          translation=(0.006382062 -0.08228037 0.03203182) quadrant=all radius=0.01568655 length=0.04918974
    Body tibia_r: mass=4.199036 mass_center=(0 -0.1867 0) inertia=(0.05708197 0.005776152 0.05787478 0 0 0)
        meshes=(r_tibia.vtp r_fibula.vtp)
      WrapCylinder GasLat_at_shank_r: xyz_body_rotation=(2.96723 -0.279725 -1.47812)
          translation=(-0.008609964 -0.08605724 -0.003746227) quadrant=-y radius=0.06389765 length=0.113818
      WrapCylinder GasMed_at_shank_r: xyz_body_rotation=(2.96723 0.0279725 -1.47812)
          translation=(-0.008609964 -0.08605724 -0.003746227) quadrant=-y radius=0.06860516 length=0.1136086
      WrapCylinder GR_at_condyles_r: xyz_body_rotation=(0 -0.4 0) translation=(-0.003490526 -0.02325871 0) quadrant=all
          radius=0.04179958 length=0.1139555
      WrapCylinder SM_at_condyles_r: xyz_body_rotation=(0 -0.1 0) translation=(-0.001163509 -0.02325871 0) quadrant=all
          radius=0.04012636 length=0.1135506
      WrapCylinder ST_at_condyles_r: xyz_body_rotation=(0 -0.2 0) translation=(-0.002327017 -0.02384018 0) quadrant=all
          radius=0.04941349 length=0.113635
      WrapCylinder BF_at_gastroc_r: translation=(-0.04537684 -0.06977614 0) quadrant=y radius=0.03373344
          length=0.1702831
    Body patella_r: mass=0.07000713 mass_center=(0.0018 0.0264 0) inertia=(2.330864e-6 1.064726e-5 1.064726e-5 0 0 0)
        meshes=r_patella.vtp
    Body talus_r: mass=0.1132579 mass_center=(0 0 0) inertia=(0.001132579 0.001132579 0.001132579 0 0 0)
        meshes=r_talus.vtp
    Body calcn_r: mass=1.415724 mass_center=(0.1 0.03 0) inertia=(0.00158561 0.004417057 0.004643573 0 0 0)
        meshes=r_foot.vtp
    Body toes_r: mass=0.2453166 mass_center=(0.0346 0.006 -0.0175)
        inertia=(0.0007140909 0.0008273488 0.001132579 0 0 0) meshes=r_bofoot.vtp
    Body femur_l: mass=10.53457 mass_center=(0 -0.17 0) inertia=(0.1516523 0.03975352 0.1599201 0 0 0)
        meshes=l_femur.vtp
      WrapCylinder GasLat_at_condyles_l: translation=(0.005243464 -0.3992165 0) quadrant=all radius=0.02629109
          length=0.1052276
      WrapCylinder GasMed_at_condyles_l: translation=(0.005243464 -0.3992165 0) quadrant=all radius=0.0252799
          length=0.1052276
      WrapCylinder KnExt_at_fem_l: xyz_body_rotation=(0.0623366 -0.0507601 0)
          translation=(0.003763004 -0.3921396 -0.002200426) quadrant=all radius=0.02528397 length=0.1051974
      WrapCylinder KnExtVL_at_fem_l: xyz_body_rotation=(0.0623366 -0.0507601 0)
          translation=(0.001980226 -0.3921396 -0.002200426) quadrant=all radius=0.02528397 length=0.1051974
      WrapCylinder AB_at_femshaft_l: xyz_body_rotation=(-1.66157 -0.186644 0)
          translation=(0.01535643 -0.1096336 -0.02458644) quadrant=all radius=0.01730748 length=0.06839164
      WrapCylinder AL_at_femshaft_l: xyz_body_rotation=(-1.77711 -0.136489 0)
          translation=(0.03222916 -0.2258095 -0.01590379) quadrant=all radius=0.02106992 length=0.09784959
      WrapCylinder AMprox_at_femshaft_l: xyz_body_rotation=(-1.61126 -0.18656 0)
          translation=(0.005435365 -0.07097758 -0.02673098) quadrant=all radius=0.02213769 length=0.06835523
      WrapCylinder AMmid_at_femshaft_l: xyz_body_rotation=(-1.61139 -0.13656 0)
          translation=(0.02413305 -0.1564841 -0.02166027) quadrant=all radius=0.02246471 length=0.1170328
      WrapCylinder AMdist_at_femshaft_l: xyz_body_rotation=(-1.71188 -0.186636 0)
          translation=(0.03314551 -0.2538783 -0.009854148) quadrant=all radius=0.02285764 length=0.1955864
      WrapCylinder AMisch_at_condyles_l: xyz_body_rotation=(-1.71115 0.463363 0)
          translation=(-0.02375405 -0.3669199 0.003319269) quadrant=all radius=0.04170484 length=0.2376947
      WrapCylinder PECT_at_femshaft_l: xyz_body_rotation=(-1.81295 -0.276344 0)
          translation=(0.006382062 -0.08228037 -0.03203182) quadrant=all radius=0.01568655 length=0.04918974
    Body tibia_l: mass=4.199036 mass_center=(0 -0.1867 0) inertia=(0.05708197 0.005776152 0.05787478 0 0 0)
        meshes=(l_tibia.vtp l_fibula.vtp)
      WrapCylinder GasLat_at_shank_l: xyz_body_rotation=(-2.96723 0.279725 -1.47812)
          translation=(-0.008609964 -0.08605724 0.003746227) quadrant=-y radius=0.06389765 length=0.113818
      WrapCylinder GasMed_at_shank_l: xyz_body_rotation=(-2.96723 -0.0279725 -1.47812)
          translation=(-0.008609964 -0.08605724 0.003746227) quadrant=-y radius=0.06860516 length=0.1136086
      WrapCylinder GR_at_condyles_l: xyz_body_rotation=(0 0.4 0) translation=(-0.003490526 -0.02325871 0) quadrant=all
          radius=0.04179958 length=0.1139555
      WrapCylinder SM_at_condyles_l: xyz_body_rotation=(0 0.1 0) translation=(-0.001163509 -0.02325871 0) quadrant=all
          radius=0.04012636 length=0.1135506
      WrapCylinder ST_at_condyles_l: xyz_body_rotation=(0 0.2 0) translation=(-0.002327017 -0.02384018 0) quadrant=all
          radius=0.04941349 length=0.113635
      WrapCylinder BF_at_gastroc_l: translation=(-0.04537684 -0.06977614 0) quadrant=all radius=0.03373344
          length=0.1702831
    Body patella_l: mass=0.07000713 mass_center=(0.0018 0.0264 0) inertia=(2.330864e-6 1.064726e-5 1.064726e-5 0 0 0)
        meshes=l_patella.vtp
    Body talus_l: mass=0.1132579 mass_center=(0 0 0) inertia=(0.001132579 0.001132579 0.001132579 0 0 0)
        meshes=l_talus.vtp
    Body calcn_l: mass=1.415724 mass_center=(0.1 0.03 0) inertia=(0.00158561 0.004417057 0.004643573 0 0 0)
        meshes=l_foot.vtp
    Body toes_l: mass=0.2453166 mass_center=(0.0346 0.006 -0.0175)
        inertia=(0.0007140909 0.0008273488 0.001132579 0 0 0) meshes=l_bofoot.vtp
    Body torso: mass=30.38324 mass_center=(-0.03 0.32 0) inertia=(1.669987 0.8556633 1.621173 0 0 0)
        meshes=(hat_spine.vtp hat_jaw.vtp hat_skull.vtp hat_ribs_scap.vtp)
    Body humerus_r: mass=2.301966 mass_center=(0 -0.164502 0) inertia=(0.01352979 0.004667357 0.01518675 0 0 0)
        meshes=humerus_rv.vtp
    Body ulna_r: mass=0.6880416 mass_center=(0 -0.120525 0) inertia=(0.003354698 0.0006999337 0.003638976 0 0 0)
        meshes=ulna_rv.vtp
    Body radius_r: mass=0.6880416 mass_center=(0 -0.120525 0) inertia=(0.003354698 0.0006999337 0.003638976 0 0 0)
        meshes=radius_rv.vtp
    Body hand_r: mass=0.5181548 mass_center=(0 -0.068095 0) inertia=(0.00101026 0.0006195206 0.001517656 0 0 0)
        meshes=(pisiform_rvs.vtp lunate_rvs.vtp scaphoid_rvs.vtp triquetrum_rvs.vtp hamate_rvs.vtp capitate_rvs.vtp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)
    Body humerus_l: mass=2.301966 mass_center=(0 -0.164502 0) inertia=(0.01352979 0.004667357 0.01518675 0 0 0)
        meshes=humerus_lv.vtp
    Body ulna_l: mass=0.6880416 mass_center=(0 -0.120525 0) inertia=(0.003354698 0.0006999337 0.003638976 0 0 0)
        meshes=ulna_lv.vtp
    Body radius_l: mass=0.6880416 mass_center=(0 -0.120525 0) inertia=(0.003354698 0.0006999337 0.003638976 0 0 0)
        meshes=radius_lv.vtp
    Body hand_l: mass=0.5181548 mass_center=(0 -0.068095 0) inertia=(0.00101026 0.0006195206 0.001517656 0 0 0)
        meshes=(pisiform_lvs.vtp lunate_lvs.vtp scaphoid_lvs.vtp triquetrum_lvs.vtp hamate_lvs.vtp capitate_lvs.vtp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)
  JointSet:
    CustomJoint ground_pelvis: socket_parent_frame=ground_offset socket_child_frame=pelvis_offset
      Coordinate pelvis_tilt: default_value=0 range=(-3.141593 3.141593) clamped=true
      Coordinate pelvis_list: default_value=0 range=(-3.141593 3.141593) clamped=true
      Coordinate pelvis_rotation: default_value=0 range=(-3.141593 3.141593) clamped=true
      Coordinate pelvis_tx: default_value=0 range=(-50 50) clamped=true
      Coordinate pelvis_ty: default_value=1.03 range=(-1 2) clamped=true
      Coordinate pelvis_tz: default_value=0 range=(-3 3) clamped=true
      PhysicalOffsetFrame ground_offset: socket_parent=/ground translation=(0 0 0) [meters]
      PhysicalOffsetFrame pelvis_offset: socket_parent=/bodyset/pelvis translation=(0 0 0)
      SpatialTransform:
        TransformAxis rotation1: coordinates=pelvis_tilt axis=(0 0 1) LinearFunction(coefficients=1 0)
        TransformAxis rotation2: coordinates=pelvis_list axis=(1 0 0) LinearFunction(coefficients=1 0)
        TransformAxis rotation3: coordinates=pelvis_rotation axis=(0 1 0) LinearFunction(coefficients=1 0)
        TransformAxis translation1: coordinates=pelvis_tx axis=(1 0 0) LinearFunction(coefficients=1 0)
        TransformAxis translation2: coordinates=pelvis_ty axis=(0 1 0) LinearFunction(coefficients=1 0)
        TransformAxis translation3: coordinates=pelvis_tz axis=(0 0 1) LinearFunction(coefficients=1 0)
    CustomJoint hip_r: socket_parent_frame=pelvis_offset socket_child_frame=femur_r_offset
      Coordinate hip_flexion_r: default_value=0 range=(-0.5235988 2.094395) clamped=true
      Coordinate hip_adduction_r: default_value=0 range=(-0.8726646 0.5235988) clamped=true
      Coordinate hip_rotation_r: default_value=0 range=(-0.6981317 0.6981317) clamped=true
      PhysicalOffsetFrame pelvis_offset: socket_parent=/bodyset/pelvis translation=(-0.06473568 -0.0887277 0.08355905)
      PhysicalOffsetFrame femur_r_offset: socket_parent=/bodyset/femur_r translation=(0 0 0)
      SpatialTransform: axes_held_at_zero=(translation1 translation2 translation3)
        TransformAxis rotation1: coordinates=hip_flexion_r axis=(0 0 1) LinearFunction(coefficients=1 0)
        TransformAxis rotation2: coordinates=hip_adduction_r axis=(1 0 0) LinearFunction(coefficients=1 0)
        TransformAxis rotation3: coordinates=hip_rotation_r axis=(0 1 0) LinearFunction(coefficients=1 0)
    CustomJoint walker_knee_r: socket_parent_frame=femur_r_offset socket_child_frame=tibia_r_offset
      Coordinate knee_angle_r: default_value=0 range=(0 2.443461) clamped=true
      PhysicalOffsetFrame femur_r_offset: socket_parent=/bodyset/femur_r
          translation=(-0.00473105 -0.398853 -0.001838678) orientation=(-1.64157 1.44618 1.5708) [radians]
      PhysicalOffsetFrame tibia_r_offset: socket_parent=/bodyset/tibia_r
          translation=(-0.009412249 -0.004110745 -0.001685507) orientation=(-1.64157 1.44618 1.5708)
      SpatialTransform:
        TransformAxis rotation1: coordinates=knee_angle_r axis=(1 0 0) LinearFunction(coefficients=1 0)
        TransformAxis rotation2: coordinates=knee_angle_r axis=(0 0 1)
          PolynomialFunction: coefficients=(0.01083209 -0.02521833 -0.03284781 0.07910001 -1.47e-8)
        TransformAxis rotation3: coordinates=knee_angle_r axis=(0 1 0)
          PolynomialFunction: coefficients=(0.02516576 -0.1694801 0.3694993 -4.43e-8)
        TransformAxis translation1: coordinates=knee_angle_r axis=(1 0 0)
          MultiplierFunction: scale=1.048693
            PolynomialFunction: coefficients=(0.0001590448 -0.00101515 0.001817511 2.64143e-5 0)
        TransformAxis translation2: coordinates=knee_angle_r axis=(0 1 0)
          MultiplierFunction: scale=0.9736987
            PolynomialFunction: coefficients=(-0.0005796878 0.005079766 -0.01144238 0.003936909 0)
        TransformAxis translation3: coordinates=knee_angle_r axis=(0 0 1)
          MultiplierFunction: scale=1.052276
            PolynomialFunction: coefficients=(0.001208087 -0.004453611 0.0006116494 0.00626543 0)
    CustomJoint patellofemoral_r: socket_parent_frame=femur_r_offset socket_child_frame=patella_r_offset
      Coordinate knee_angle_r_beta: default_value=0 range=(-10 10) clamped=false
      PhysicalOffsetFrame femur_r_offset: socket_parent=/bodyset/femur_r
          translation=(-0.008483926 -0.3972301 -0.00289376)
      PhysicalOffsetFrame patella_r_offset: socket_parent=/bodyset/patella_r translation=(0 0 0)
      SpatialTransform: axes_held_at_zero=(rotation2 rotation3)
        TransformAxis rotation1: coordinates=knee_angle_r_beta axis=(0 0 1)
          SimmSpline: x=(0 0.174533 0.349066 0.523599 0.698132 0.872665 1.0472 1.22173 1.39626 1.5708 1.74533 1.91986 2.0944)
              y=(0.00113686 -0.00629212 -0.105582 -0.253683 -0.414245 -0.579047 -0.747244 -0.91799 -1.09044 -1.26379 -1.43763 -1.61186 -1.78634)
        TransformAxis translation1: coordinates=knee_angle_r_beta axis=(1 0 0)
          MultiplierFunction: scale=1.048693
            SimmSpline: x=(0 0.174533 0.349066 0.523599 0.698132 0.872665 1.0472 1.22173 1.39626 1.5708 1.74533 1.91986 2.0944)
                y=(0.0524 0.0488 0.0437 0.0371 0.0296 0.0216 0.0136 0.0057 -0.0019 -0.0088 -0.0148 -0.0196 -0.0227)
        TransformAxis translation2: coordinates=knee_angle_r_beta axis=(0 1 0)
          MultiplierFunction: scale=0.9736987
            SimmSpline: x=(0 0.174533 0.349066 0.523599 0.698132 0.872665 1.0472 1.22173 1.39626 1.5708 1.74533 1.91986 2.0944)
                y=(-0.0108 -0.019 -0.0263 -0.0322 -0.0367 -0.0395 -0.0408 -0.0404 -0.0384 -0.0349 -0.0301 -0.0245 -0.0187)
        TransformAxis translation3: axis=(0 0 1) MultiplierFunction(scale=1.052276, Constant(value=0.00275))
    PinJoint ankle_r: socket_parent_frame=tibia_r_offset socket_child_frame=talus_r_offset
      Coordinate ankle_angle_r: default_value=0 range=(-0.8726646 0.8726646) clamped=true
      PhysicalOffsetFrame tibia_r_offset: socket_parent=/bodyset/tibia_r translation=(-0.01163509 -0.4651743 0)
          orientation=(0.175895 -0.105208 0.0186622)
      PhysicalOffsetFrame talus_r_offset: socket_parent=/bodyset/talus_r translation=(0 0 0)
          orientation=(0.175895 -0.105208 0.0186622)
    CustomJoint hip_l: socket_parent_frame=pelvis_offset socket_child_frame=femur_l_offset
      Coordinate hip_flexion_l: default_value=0 range=(-0.5235988 2.094395) clamped=true
      Coordinate hip_adduction_l: default_value=0 range=(-0.8726646 0.5235988) clamped=true
      Coordinate hip_rotation_l: default_value=0 range=(-0.6981317 0.6981317) clamped=true
      PhysicalOffsetFrame pelvis_offset: socket_parent=/bodyset/pelvis translation=(-0.06473568 -0.0887277 -0.08355905)
      PhysicalOffsetFrame femur_l_offset: socket_parent=/bodyset/femur_l translation=(0 0 0)
      SpatialTransform: axes_held_at_zero=(translation1 translation2 translation3)
        TransformAxis rotation1: coordinates=hip_flexion_l axis=(0 0 1) LinearFunction(coefficients=1 0)
        TransformAxis rotation2: coordinates=hip_adduction_l axis=(1 0 0) LinearFunction(coefficients=-1 0)
        TransformAxis rotation3: coordinates=hip_rotation_l axis=(0 1 0) LinearFunction(coefficients=-1 0)
    CustomJoint walker_knee_l: socket_parent_frame=femur_l_offset socket_child_frame=tibia_l_offset
      Coordinate knee_angle_l: default_value=0 range=(0 2.443461) clamped=true
      PhysicalOffsetFrame femur_l_offset: socket_parent=/bodyset/femur_l
          translation=(-0.00473105 -0.398853 0.001838678) orientation=(1.64157 -1.44618 1.5708)
      PhysicalOffsetFrame tibia_l_offset: socket_parent=/bodyset/tibia_l
          translation=(-0.009412249 -0.004110745 0.001685507) orientation=(1.64157 -1.44618 1.5708)
      SpatialTransform:
        TransformAxis rotation1: coordinates=knee_angle_l axis=(-1 0 0) LinearFunction(coefficients=1 0)
        TransformAxis rotation2: coordinates=knee_angle_l axis=(0 0 1)
          PolynomialFunction: coefficients=(0.01083209 -0.02521833 -0.03284781 0.07910001 -1.47e-8)
        TransformAxis rotation3: coordinates=knee_angle_l axis=(0 1 0)
          PolynomialFunction: coefficients=(-0.02516576 0.1694801 -0.3694993 4.43e-8)
        TransformAxis translation1: coordinates=knee_angle_l axis=(1 0 0)
          MultiplierFunction: scale=1.048693
            PolynomialFunction: coefficients=(0.0001590448 -0.00101515 0.001817511 2.64143e-5 0)
        TransformAxis translation2: coordinates=knee_angle_l axis=(0 1 0)
          MultiplierFunction: scale=0.9736987
            PolynomialFunction: coefficients=(-0.0005796878 0.005079766 -0.01144238 0.003936909 0)
        TransformAxis translation3: coordinates=knee_angle_l axis=(0 0 1)
          MultiplierFunction: scale=1.052276
            PolynomialFunction: coefficients=(-0.001208087 0.004453611 -0.0006116494 -0.00626543 0)
    CustomJoint patellofemoral_l: socket_parent_frame=femur_l_offset socket_child_frame=patella_l_offset
      Coordinate knee_angle_l_beta: default_value=0 range=(-10 10) clamped=false
      PhysicalOffsetFrame femur_l_offset: socket_parent=/bodyset/femur_l
          translation=(-0.008483926 -0.3972301 0.00289376)
      PhysicalOffsetFrame patella_l_offset: socket_parent=/bodyset/patella_l translation=(0 0 0)
      SpatialTransform: axes_held_at_zero=(rotation2 rotation3)
        TransformAxis rotation1: coordinates=knee_angle_l_beta axis=(0 0 1)
          SimmSpline: x=(0 0.174533 0.349066 0.523599 0.698132 0.872665 1.0472 1.22173 1.39626 1.5708 1.74533 1.91986 2.0944)
              y=(0.00113686 -0.00629212 -0.105582 -0.253683 -0.414245 -0.579047 -0.747244 -0.91799 -1.09044 -1.26379 -1.43763 -1.61186 -1.78634)
        TransformAxis translation1: coordinates=knee_angle_l_beta axis=(1 0 0)
          MultiplierFunction: scale=1.048693
            SimmSpline: x=(0 0.174533 0.349066 0.523599 0.698132 0.872665 1.0472 1.22173 1.39626 1.5708 1.74533 1.91986 2.0944)
                y=(0.0524 0.0488 0.0437 0.0371 0.0296 0.0216 0.0136 0.0057 -0.0019 -0.0088 -0.0148 -0.0196 -0.0227)
        TransformAxis translation2: coordinates=knee_angle_l_beta axis=(0 1 0)
          MultiplierFunction: scale=0.9736987
            SimmSpline: x=(0 0.174533 0.349066 0.523599 0.698132 0.872665 1.0472 1.22173 1.39626 1.5708 1.74533 1.91986 2.0944)
                y=(-0.0108 -0.019 -0.0263 -0.0322 -0.0367 -0.0395 -0.0408 -0.0404 -0.0384 -0.0349 -0.0301 -0.0245 -0.0187)
        TransformAxis translation3: axis=(0 0 1) MultiplierFunction(scale=1.052276, Constant(value=-0.00275))
    PinJoint ankle_l: socket_parent_frame=tibia_l_offset socket_child_frame=talus_l_offset
      Coordinate ankle_angle_l: default_value=0 range=(-0.8726646 0.8726646) clamped=true
      PhysicalOffsetFrame tibia_l_offset: socket_parent=/bodyset/tibia_l translation=(-0.01163509 -0.4651743 0)
          orientation=(-0.175895 0.105208 0.0186622)
      PhysicalOffsetFrame talus_l_offset: socket_parent=/bodyset/talus_l translation=(0 0 0)
          orientation=(-0.175895 0.105208 0.0186622)
    CustomJoint back: socket_parent_frame=pelvis_offset socket_child_frame=torso_offset
      Coordinate lumbar_extension: default_value=0 range=(-1.570796 1.570796) clamped=true
      Coordinate lumbar_bending: default_value=0 range=(-1.570796 1.570796) clamped=true
      Coordinate lumbar_rotation: default_value=0 range=(-1.570796 1.570796) clamped=true
      PhysicalOffsetFrame pelvis_offset: socket_parent=/bodyset/pelvis translation=(-0.1158377 0.0921303 0)
      PhysicalOffsetFrame torso_offset: socket_parent=/bodyset/torso translation=(0 0 0)
      SpatialTransform: axes_held_at_zero=(translation1 translation2 translation3)
        TransformAxis rotation1: coordinates=lumbar_extension axis=(0 0 1) LinearFunction(coefficients=1 0)
        TransformAxis rotation2: coordinates=lumbar_bending axis=(1 0 0) LinearFunction(coefficients=1 0)
        TransformAxis rotation3: coordinates=lumbar_rotation axis=(0 1 0) LinearFunction(coefficients=1 0)
    WeldJoint mtp_l: socket_parent_frame=calcn_l_offset socket_child_frame=toes_l_offset
      PhysicalOffsetFrame calcn_l_offset: socket_parent=/bodyset/calcn_l translation=(0.1788 -0.002 -0.00108)
      PhysicalOffsetFrame toes_l_offset: socket_parent=/bodyset/toes_l translation=(0 0 0)
    WeldJoint mtp_r: socket_parent_frame=calcn_r_offset socket_child_frame=toes_r_offset
      PhysicalOffsetFrame calcn_r_offset: socket_parent=/bodyset/calcn_r translation=(0.1788 -0.002 0.00108)
      PhysicalOffsetFrame toes_r_offset: socket_parent=/bodyset/toes_r translation=(0 0 0)
    WeldJoint subtalar_l: socket_parent_frame=talus_l_offset socket_child_frame=calcn_l_offset
      PhysicalOffsetFrame talus_l_offset: socket_parent=/bodyset/talus_l
          translation=(-0.05989745 -0.05629063 -0.01019297) orientation=(1.76819 -0.906223 1.8196)
      PhysicalOffsetFrame calcn_l_offset: socket_parent=/bodyset/calcn_l translation=(0 0 0)
          orientation=(1.76819 -0.906223 1.8196)
    WeldJoint subtalar_r: socket_parent_frame=talus_r_offset socket_child_frame=calcn_r_offset
      PhysicalOffsetFrame talus_r_offset: socket_parent=/bodyset/talus_r
          translation=(-0.05989745 -0.05629063 0.01019297) orientation=(-1.76819 0.906223 1.8196)
      PhysicalOffsetFrame calcn_r_offset: socket_parent=/bodyset/calcn_r translation=(0 0 0)
          orientation=(-1.76819 0.906223 1.8196)
    WeldJoint acromial_l: socket_parent_frame=torso_offset socket_child_frame=humerus_l_offset
      PhysicalOffsetFrame torso_offset: socket_parent=/bodyset/torso translation=(0.004086704 0.3851523 -0.198768)
      PhysicalOffsetFrame humerus_l_offset: socket_parent=/bodyset/humerus_l translation=(0 0 0)
    WeldJoint acromial_r: socket_parent_frame=torso_offset socket_child_frame=humerus_r_offset
      PhysicalOffsetFrame torso_offset: socket_parent=/bodyset/torso translation=(0.004086704 0.3851523 0.198768)
      PhysicalOffsetFrame humerus_r_offset: socket_parent=/bodyset/humerus_r translation=(0 0 0)
    WeldJoint elbow_l: socket_parent_frame=humerus_l_offset socket_child_frame=ulna_l_offset
      PhysicalOffsetFrame humerus_l_offset: socket_parent=/bodyset/humerus_l
          translation=(0.01436782 -0.3200092 0.009935782) orientation=(0.0228627 -0.228018 0.0051689)
      PhysicalOffsetFrame ulna_l_offset: socket_parent=/bodyset/ulna_l translation=(0 0 0)
          orientation=(0.0228627 -0.228018 0.0051689)
    WeldJoint elbow_r: socket_parent_frame=humerus_r_offset socket_child_frame=ulna_r_offset
      PhysicalOffsetFrame humerus_r_offset: socket_parent=/bodyset/humerus_r
          translation=(0.01436782 -0.3200092 -0.009935782) orientation=(-0.0228627 0.228018 0.0051689)
      PhysicalOffsetFrame ulna_r_offset: socket_parent=/bodyset/ulna_r translation=(0 0 0)
          orientation=(-0.0228627 0.228018 0.0051689)
    WeldJoint radioulnar_l: socket_parent_frame=ulna_l_offset socket_child_frame=radius_l_offset
      PhysicalOffsetFrame ulna_l_offset: socket_parent=/bodyset/ulna_l
          translation=(-0.007193475 -0.01302109 -0.02847468) orientation=(1.56884 -0.056428 1.53614)
      PhysicalOffsetFrame radius_l_offset: socket_parent=/bodyset/radius_l translation=(0 0 0)
          orientation=(1.56884 -0.056428 1.53614)
    WeldJoint radioulnar_r: socket_parent_frame=ulna_r_offset socket_child_frame=radius_r_offset
      PhysicalOffsetFrame ulna_r_offset: socket_parent=/bodyset/ulna_r
          translation=(-0.007193475 -0.01302109 0.02847468) orientation=(-1.56884 0.056428 1.53614)
      PhysicalOffsetFrame radius_r_offset: socket_parent=/bodyset/radius_r translation=(0 0 0)
          orientation=(-1.56884 0.056428 1.53614)
    WeldJoint radius_hand_l: socket_parent_frame=radius_l_offset socket_child_frame=hand_l_offset
      PhysicalOffsetFrame radius_l_offset: socket_parent=/bodyset/radius_l
          translation=(-0.009407016 -0.2360965 -0.01485797) orientation=(1.5708 0 1.5708)
      PhysicalOffsetFrame hand_l_offset: socket_parent=/bodyset/hand_l translation=(0 0 0)
          orientation=(1.5708 0 1.5708)
    WeldJoint radius_hand_r: socket_parent_frame=radius_r_offset socket_child_frame=hand_r_offset
      PhysicalOffsetFrame radius_r_offset: socket_parent=/bodyset/radius_r
          translation=(-0.009407016 -0.2360965 0.01485797) orientation=(-1.5708 0 -1.5708)
      PhysicalOffsetFrame hand_r_offset: socket_parent=/bodyset/hand_r translation=(0 0 0)
          orientation=(-1.5708 0 -1.5708)
  ConstraintSet:
    CoordinateCouplerConstraint patellofemoral_knee_angle_r_con: independent_coordinate_names=knee_angle_r
        dependent_coordinate_name=knee_angle_r_beta scale_factor=1
        coupled_coordinates_function=LinearFunction(coefficients=1 0)
    CoordinateCouplerConstraint patellofemoral_knee_angle_l_con: independent_coordinate_names=knee_angle_l
        dependent_coordinate_name=knee_angle_l_beta scale_factor=1
        coupled_coordinates_function=LinearFunction(coefficients=1 0)
  ForceSet:
    Millard2012EquilibriumMuscle [values shared by the 22 below unless stated]: fiber_damping=0.01
        default_activation=0.01 minimum_activation=0.01
      ActiveForceLengthCurve: min_norm_active_fiber_length=0.25 transition_norm_fiber_length=0.77
          max_norm_active_fiber_length=1.9 shallow_ascending_slope=0.75 minimum_value=0
      ForceVelocityCurve: concentric_slope_at_vmax=0 concentric_slope_near_vmax=0.25 isometric_slope=5
          eccentric_slope_at_vmax=0 eccentric_slope_near_vmax=0.15 max_eccentric_velocity_force_multiplier=1.4
      FiberForceLengthCurve: strain_at_zero_force=0 strain_at_one_norm_force=0.7
      TendonForceLengthCurve
    Millard2012EquilibriumMuscle addmagDist_r: max_isometric_force=2268 optimal_fiber_length=0.1682945
        tendon_slack_length=0.08298921 pennation_angle_at_optimal=0.194705 [radians]
      PathPoint P1: pelvis (-0.08517006 -0.1443224 0.04306655)
      PathPoint P2: femur_r (0.0117978 -0.2555959 0.02030893)
      PathWrap: wrap_object=AMdist_at_femshaft_r method=hybrid
    Millard2012EquilibriumMuscle bfsh_r: max_isometric_force=557.11 optimal_fiber_length=0.110411
        tendon_slack_length=0.1059237 pennation_angle_at_optimal=0.2642232
      PathPoint P1: femur_r (0.005243464 -0.2055478 0.02462327)
      PathPoint P2: tibia_r (-0.03334616 -0.03819081 0.03637246)
      PathWrap: wrap_object=BF_at_gastroc_r method=hybrid
    Millard2012EquilibriumMuscle gasmed_r: max_isometric_force=4690.57 optimal_fiber_length=0.07004822
        tendon_slack_length=0.4594688 pennation_angle_at_optimal=0.1656816
      PathPoint P1: femur_r (0.006292157 -0.374874 -0.02315008)
      PathPoint P2: calcn_r (0.005084678 0.03462963 -0.00691784)
      PathWrap: wrap_object=GasMed_at_shank_r method=hybrid
      PathWrap pathwrap_0: wrap_object=GasMed_at_condyles_r method=hybrid
    Millard2012EquilibriumMuscle glmax2_r: max_isometric_force=3337.58 optimal_fiber_length=0.1674976
        tendon_slack_length=0.1162881 pennation_angle_at_optimal=0.3673821
      PathPoint P1: pelvis (-0.1514978 0.009834769 0.04996671)
      PathPoint P2: pelvis (-0.1546037 -0.06884338 0.08792844)
      PathPoint P3: femur_r (-0.04719118 -0.05686401 0.02651737)
      PathPoint P4: femur_r (-0.01635961 -0.09892779 0.04409038)
      PathWrap: wrap_object=Gmax2_at_pelvis_r method=hybrid
    Millard2012EquilibriumMuscle glmed2_r: max_isometric_force=2045 optimal_fiber_length=0.09346317
        tendon_slack_length=0.08394995 pennation_angle_at_optimal=0.3165559
      PathPoint P1: pelvis (-0.09777762 0.06217382 0.08868551)
      PathPoint P2_0: femur_r (-0.02307124 -0.009736987 0.05892748)
    Millard2012EquilibriumMuscle psoas_r: max_isometric_force=2697.34 optimal_fiber_length=0.1287538
        tendon_slack_length=0.109637 pennation_angle_at_optimal=0.2155251
      PathPoint P1: pelvis (-0.06970969 0.07008686 0.04217969)
      PathPoint P2: pelvis (-0.02358166 -0.07393033 0.07094841)
      PathPoint P3: femur_r (-0.01384275 -0.04547173 0.004840471)
      PathPoint P4: femur_r (-0.02464428 -0.05102181 0.009260032)
      PathWrap: wrap_object=PS_at_brim_r method=hybrid range=(2 3)
    Millard2012EquilibriumMuscle recfem_r: max_isometric_force=2191.74 optimal_fiber_length=0.07635157
        tendon_slack_length=0.4530828 pennation_angle_at_optimal=0.2170149
      PathPoint P1: pelvis (-0.0276078 -0.04386081 0.1009068)
      PathPoint P2: patella_r (0.01 0.049 0.0007)
      PathPoint P3: patella_r (0.0121 0.0437 -0.001)
      PathPoint P4: patella_r (0.005 0.00247 3e-5)
      PathPoint P5: tibia_r (0.03793038 -0.0734045 -0.0005335536)
      PathWrap: wrap_object=KnExt_at_fem_r method=hybrid
    Millard2012EquilibriumMuscle semimem_r: max_isometric_force=4105.46 optimal_fiber_length=0.08413311
        tendon_slack_length=0.3277278 pennation_angle_at_optimal=0.2545615
      PathPoint P1: pelvis (-0.1135371 -0.1288694 0.06640598)
      PathPoint P2: tibia_r (-0.03141473 -0.04768036 -0.02225032)
      PathWrap: wrap_object=SM_at_condyles_r method=hybrid
    Millard2012EquilibriumMuscle soleus_r: max_isometric_force=7924.99 optimal_fiber_length=0.05243537
        tendon_slack_length=0.3352884 pennation_angle_at_optimal=0.3814289
      PathPoint P1: tibia_r (-0.008842665 -0.1065249 0.01112516)
      PathPoint P2: calcn_r (0.005084678 0.03462963 -0.00691784)
    Millard2012EquilibriumMuscle tibant_r: max_isometric_force=2116.81 optimal_fiber_length=0.08073432
        tendon_slack_length=0.284238 pennation_angle_at_optimal=0.1951828
      PathPoint P1: tibia_r (0.01791803 -0.1525772 0.01839057)
      PathPoint P2: tibia_r (0.02920407 -0.2216555 0.01453082)
      PathPoint P3: tibia_r (0.02710975 -0.4255182 -0.01498491)
      PathPoint P4: calcn_r (0.134744 0.01988411 -0.03981021)
    Millard2012EquilibriumMuscle vasint_r: max_isometric_force=9593.95 optimal_fiber_length=0.1184804
        tendon_slack_length=0.2075938 pennation_angle_at_optimal=0.06309973
      PathPoint P1: femur_r (0.03041209 -0.1873396 0.03262057)
      PathPoint P2: femur_r (0.03513121 -0.2029188 0.02998988)
      PathPoint P3: patella_r (0.0058 0.048 -0.0006)
      PathPoint P4: patella_r (0.005 0.00247 -0.00039)
      PathPoint P5: tibia_r (0.03789548 -0.07349753 0.0004881448)
      PathWrap: wrap_object=KnExt_at_fem_r method=hybrid
    Millard2012EquilibriumMuscle addmagDist_l: max_isometric_force=2268 optimal_fiber_length=0.1682945
        tendon_slack_length=0.08298921 pennation_angle_at_optimal=0.194705
      PathPoint P1: pelvis (-0.08517006 -0.1443224 -0.04306655)
      PathPoint P2: femur_l (0.0117978 -0.2555959 -0.02030893)
      PathWrap: wrap_object=AMdist_at_femshaft_l method=hybrid
    Millard2012EquilibriumMuscle bfsh_l: max_isometric_force=557.11 optimal_fiber_length=0.1104108
        tendon_slack_length=0.1059235 pennation_angle_at_optimal=0.2642232
      PathPoint P1: femur_l (0.005243464 -0.2055478 -0.02462327)
      PathPoint P2: tibia_l (-0.03334616 -0.03819081 -0.03637246)
      PathWrap: wrap_object=BF_at_gastroc_l method=hybrid
    Millard2012EquilibriumMuscle gasmed_l: max_isometric_force=4690.57 optimal_fiber_length=0.07004822
        tendon_slack_length=0.4594688 pennation_angle_at_optimal=0.1656816
      PathPoint P1: femur_l (0.006292157 -0.374874 0.02315008)
      PathPoint P2: calcn_l (0.005084678 0.03462963 0.00691784)
      PathWrap: wrap_object=GasMed_at_shank_l method=hybrid
      PathWrap pathwrap_0: wrap_object=GasMed_at_condyles_l method=hybrid
    Millard2012EquilibriumMuscle glmax2_l: max_isometric_force=3337.58 optimal_fiber_length=0.1674976
        tendon_slack_length=0.1162881 pennation_angle_at_optimal=0.3673821
      PathPoint P1: pelvis (-0.1514978 0.009834769 -0.04996671)
      PathPoint P2: pelvis (-0.1546037 -0.06884338 -0.08792844)
      PathPoint P3: femur_l (-0.04719118 -0.05686401 -0.02651737)
      PathPoint P4: femur_l (-0.01635961 -0.09892779 -0.04409038)
      PathWrap: wrap_object=Gmax2_at_pelvis_l method=hybrid
    Millard2012EquilibriumMuscle glmed2_l: max_isometric_force=2045 optimal_fiber_length=0.09346317
        tendon_slack_length=0.08394995 pennation_angle_at_optimal=0.3165559
      PathPoint P1: pelvis (-0.09777762 0.06217382 -0.08868551)
      PathPoint P2: femur_l (-0.02307124 -0.009736987 -0.05892748)
    Millard2012EquilibriumMuscle psoas_l: max_isometric_force=2697.34 optimal_fiber_length=0.1287538
        tendon_slack_length=0.109637 pennation_angle_at_optimal=0.2155251
      PathPoint P1: pelvis (-0.06970969 0.07008686 -0.04217969)
      PathPoint P2: pelvis (-0.02358166 -0.07393033 -0.07094841)
      PathPoint P3: femur_l (-0.01384275 -0.04547173 -0.004840471)
      PathPoint P4: femur_l (-0.02464428 -0.05102181 -0.009260032)
      PathWrap: wrap_object=PS_at_brim_l method=hybrid range=(2 3)
    Millard2012EquilibriumMuscle recfem_l: max_isometric_force=2191.74 optimal_fiber_length=0.07635174
        tendon_slack_length=0.4530828 pennation_angle_at_optimal=0.2170149
      PathPoint P1: pelvis (-0.0276078 -0.04386081 -0.1009068)
      PathPoint P2: patella_l (0.01 0.049 -0.0007)
      PathPoint P3: patella_l (0.0121 0.0437 0.001)
      PathPoint P4: patella_l (0.005 0.00247 -3e-5)
      PathPoint P5: tibia_l (0.03793038 -0.0734045 0.0005335536)
      PathWrap: wrap_object=KnExt_at_fem_l method=hybrid
    Millard2012EquilibriumMuscle semimem_l: max_isometric_force=4105.46 optimal_fiber_length=0.08413311
        tendon_slack_length=0.3277278 pennation_angle_at_optimal=0.2545615
      PathPoint P1: pelvis (-0.1135371 -0.1288694 -0.06640598)
      PathPoint P2: tibia_l (-0.03141473 -0.04768036 0.02225032)
      PathWrap: wrap_object=SM_at_condyles_l method=hybrid
    Millard2012EquilibriumMuscle soleus_l: max_isometric_force=7924.99 optimal_fiber_length=0.05243537
        tendon_slack_length=0.3352884 pennation_angle_at_optimal=0.3814289
      PathPoint P1: tibia_l (-0.008842665 -0.1065249 -0.01112516)
      PathPoint P2: calcn_l (0.005084678 0.03462963 0.00691784)
    Millard2012EquilibriumMuscle tibant_l: max_isometric_force=2116.81 optimal_fiber_length=0.08073432
        tendon_slack_length=0.284238 pennation_angle_at_optimal=0.1951828
      PathPoint P1: tibia_l (0.01791803 -0.1525772 -0.01839057)
      PathPoint P2: tibia_l (0.02920407 -0.2216555 -0.01453082)
      PathPoint P3: tibia_l (0.02710975 -0.4255182 0.01498491)
      PathPoint P4: calcn_l (0.134744 0.01988411 0.03981021)
    Millard2012EquilibriumMuscle vasint_l: max_isometric_force=9593.95 optimal_fiber_length=0.1184804
        tendon_slack_length=0.2075938 pennation_angle_at_optimal=0.06309973
      PathPoint P1: femur_l (0.03041209 -0.1873396 -0.03262057)
      PathPoint P2: femur_l (0.03513121 -0.2029188 -0.02998988)
      PathPoint P3: patella_l (0.0058 0.048 0.0006)
      PathPoint P4: patella_l (0.005 0.00247 0.00039)
      PathPoint P5: tibia_l (0.03789548 -0.07349753 -0.0004881448)
      PathWrap: wrap_object=KnExt_at_fem_l method=hybrid
    CoordinateActuator lumbar_ext: min_control=-1 max_control=1 coordinate=lumbar_extension optimal_force=50
    CoordinateActuator lumbar_bend: min_control=-1 max_control=1 coordinate=lumbar_bending optimal_force=50
    CoordinateActuator lumbar_rot: min_control=-1 max_control=1 coordinate=lumbar_rotation optimal_force=50
    ObjectGroup right_leg: members=(addmagDist_r bfsh_r gasmed_r glmax2_r glmed2_r psoas_r recfem_r semimem_r soleus_r tibant_r vasint_r)
    ObjectGroup left_leg: members=(addmagDist_l bfsh_l gasmed_l glmax2_l glmed2_l psoas_l recfem_l semimem_l soleus_l tibant_l vasint_l)
    ObjectGroup hip_add_r: members=(addmagDist_r semimem_r)
    ObjectGroup hip_abd_r: members=glmed2_r
    ObjectGroup hip_flex_r: members=(psoas_r recfem_r)
    ObjectGroup hip_ext_r: members=(addmagDist_r glmax2_r glmed2_r semimem_r)
    ObjectGroup hip_inrot_r: members=(glmed2_r psoas_r)
    ObjectGroup hip_exrot_r
    ObjectGroup knee_flex_r: members=(bfsh_r gasmed_r semimem_r)
    ObjectGroup knee_ext_r: members=(recfem_r vasint_r)
    ObjectGroup ankle_df_r: members=tibant_r
    ObjectGroup ankle_pf_r: members=(gasmed_r soleus_r)
    ObjectGroup everter_r
    ObjectGroup inverter_r: members=tibant_r
    ObjectGroup hip_add_l: members=(addmagDist_l semimem_l)
    ObjectGroup hip_abd_l: members=glmed2_l
    ObjectGroup hip_flex_l: members=(psoas_l recfem_l)
    ObjectGroup hip_ext_l: members=(addmagDist_l glmax2_l glmed2_l semimem_l)
    ObjectGroup hip_exrot_l
    ObjectGroup hip_inrot_l: members=(glmed2_l psoas_l)
    ObjectGroup knee_flex_l: members=(bfsh_l gasmed_l semimem_l)
    ObjectGroup knee_ext_l: members=(recfem_l vasint_l)
    ObjectGroup ankle_df_l: members=tibant_l
    ObjectGroup ankle_pf_l: members=(gasmed_l soleus_l)
    ObjectGroup everter_l
    ObjectGroup inverter_l: members=tibant_l
  MarkerSet:
    Marker Head: torso (0 0.694622 0) fixed=true
    Marker R.Shoulder: torso (-0.001369502 0.4331764 0.1668551) fixed=true
    Marker L.Shoulder: torso (-0.0001479558 0.4340449 -0.1682384) fixed=true
    Marker R.Clavicle: torso (0.0598078 0.398805 0.02850312) fixed=true
    Marker L.Clavicle: torso (0.06001048 0.3988199 -0.02934716) fixed=true
    Marker R.Biceps: humerus_r (0.0494266 -0.2134142 0.009335888)
    Marker R.Elbow: humerus_r (0.01240887 -0.3138289 0.03492811) fixed=true
    Marker R.MElbow: humerus_r (0 -0.3141147 -0.0434917) fixed=true
    Marker R.Forearm: ulna_r (0.005902111 -0.1330065 0.04807742)
    Marker R.Wrist: radius_r (-0.03295266 -0.2401653 0.006878553) fixed=true
    Marker L.Biceps: humerus_l (0.03091412 -0.1774577 -0.02991671)
    Marker L.Elbow: humerus_l (0.01322742 -0.3134507 -0.03417211) fixed=true
    Marker L.MElbow: humerus_l (0 -0.3141147 0.0434917) fixed=true
    Marker L.Forearm: ulna_l (0.004072261 -0.1275586 -0.0533974)
    Marker L.Wrist: radius_l (-0.03221424 -0.2391484 -0.006393874) fixed=true
    Marker R.ASIS: pelvis (0.0140215 0.03461817 0.1355426) fixed=true
    Marker L.ASIS: pelvis (0.01211335 0.03297939 -0.1362051) fixed=true
    Marker S2: pelvis (-0.2076678 0.02163451 0.001689314) fixed=true
    Marker R.PSIS: pelvis (-0.2013958 0.01064373 0.05118224)
    Marker L.PSIS: pelvis (-0.2054527 0.006648139 -0.03299402)
    Marker R_HJC: femur_r (0 0 0) fixed=true
    Marker L_HJC: femur_l (0 0 0) fixed=true
    Marker R.TH1: femur_r (0.06609537 -0.1481522 0.09894977)
    Marker R.TH2: femur_r (-0.04256604 -0.1581046 0.1241814)
    Marker R.TH3: femur_r (-0.04752491 -0.2794275 0.08751113)
    Marker R.Knee: femur_r (-0.001578751 -0.3936643 0.04960325) fixed=true
    Marker R.MKnee: femur_r (0.005243464 -0.3904532 -0.05261382) fixed=true
    Marker R.SH1: tibia_r (0.00618929 -0.1006936 0.05709899)
    Marker R.SH2: tibia_r (0.009111262 -0.2113075 0.06512998)
    Marker R.SH3: tibia_r (-0.07577712 -0.1079866 0.06171218)
    Marker R.SH4: tibia_r (-0.0727502 -0.2261306 0.06421453)
    Marker R.Ankle: tibia_r (-0.006798863 -0.4377476 0.05842767) fixed=true
    Marker R.MAnkle: tibia_r (0.006981052 -0.44052 -0.04313838) fixed=true
    Marker R.Toe: toes_r (0.0882065 0.0436068 -0.0231762) fixed=true
    Marker R.MT5: toes_r (0.00470394 0.0235564 0.0661423) fixed=true
    Marker R.Heel: calcn_r (-0.02184655 0.0228202 -0.01241861) fixed=true
    Marker L.TH1: femur_l (0.1047622 -0.1328653 -0.06137889)
    Marker L.TH2: femur_l (0.09793556 -0.2587879 -0.03892303)
    Marker L.TH3: femur_l (0.01233661 -0.1276965 -0.1211917)
    Marker L.TH4: femur_l (-0.01353609 -0.2538284 -0.08732385)
    Marker L.Knee: femur_l (-0.00146749 -0.392773 -0.04900244) fixed=true
    Marker L.MKnee: femur_l (0.005243464 -0.3904532 0.05261382) fixed=true
    Marker L.SH1: tibia_l (0.02613386 -0.1072382 -0.04295203)
    Marker L.SH2: tibia_l (-0.06789269 -0.1008819 -0.06446122)
    Marker L.SH3: tibia_l (-0.07087587 -0.2153663 -0.06141118)
    Marker L.Ankle: tibia_l (-0.005851133 -0.4376387 -0.05853443) fixed=true
    Marker L.MAnkle: tibia_l (0.006981052 -0.44052 0.04313838) fixed=true
    Marker L.Toe: toes_l (0.0882065 0.0436068 0.0231762) fixed=true
    Marker L.Heel: calcn_l (-0.02180087 0.02267972 0.01190861) fixed=true
    Marker L.MT5: toes_l (0.00470394 0.0235564 -0.0661423) fixed=true
    Marker MidPSIS: pelvis (-0.17715 0.04295646 0) fixed=true
    Marker MidASIS: pelvis (0.01495422 0.033913 0) fixed=true
    Marker MidClavicle: torso (0.05958427 0.3991485 0) fixed=true
    Marker L.AnkleJoint: tibia_l (0.0005817543 -0.44052 -0.008514153) fixed=true
    Marker L.KneeJoint: femur_l (0.002621732 -0.3919137 0.001578415) fixed=true
    Marker L.HeelGround: calcn_l (-0.02311217 -0.005585424 0.01305253) fixed=true
    Marker L.MT5Ground: toes_l (0.00609739 -0.00358542 -0.0641826) fixed=true
    Marker L.ToeGround: toes_l (0.08699 -0.00358542 0.021964) fixed=true
    Marker L.AnkleJointGround: tibia_l (0.0005817543 -0.5197741 -0.008514153) fixed=true
    Marker R.AnkleJoint: tibia_r (0.0005817543 -0.44052 0.008514153) fixed=true
    Marker R.KneeJoint: femur_r (0.002621732 -0.3919137 -0.001578415) fixed=true
    Marker R.HeelGround: calcn_r (-0.02311217 -0.005585424 -0.01305253) fixed=true
    Marker R.MT5Ground: toes_r (0.00609739 -0.00358542 0.0641826) fixed=true
    Marker R.ToeGround: toes_r (0.08699 -0.00358542 -0.021964) fixed=true
    Marker R.AnkleJointGround: tibia_r (0.0005817543 -0.5197741 0.008514153) fixed=true
    ObjectGroup anatomical: members=(R.Shoulder R.Clavicle R.Elbow R.MElbow R.Wrist R.ASIS R.PSIS R_HJC R.Knee R.MKnee R.Ankle R.MAnkle R.Toe R.Heel R.MT5 L.Shoulder L.Clavicle L.Elbow L.MElbow L.Wrist L.ASIS L.PSIS R_HJC L.Knee L.MKnee L.Ankle L.MAnkle L.Toe L.Heel L.MT5 S2)
    ObjectGroup tracking: members=(R.Biceps R.Forearm R.TH1 R.TH2 R.TH3 R.TH4 R.SH1 R.SH2 R.SH3 R.SH4 L.Biceps L.Forearm L.TH1 L.TH2 L.TH3 L.TH4 L.SH1 L.SH2 L.SH3 L.SH4)
  ContactGeometrySet:
    ContactHalfSpace floor: socket_frame=/ground orientation=(0 0 -1.570796)
    ContactSphere heel_r: socket_frame=/bodyset/calcn_r location=(0.0146421 0.02 -0.0122799) radius=0.035
    ContactSphere lateralRearfoot_r: socket_frame=/bodyset/calcn_r location=(0.0849291 0.02 0.0338649) radius=0.035
    ContactSphere lateralMidfoot_r: socket_frame=/bodyset/calcn_r location=(0.153362 0.02 0.0594829) radius=0.035
    ContactSphere lateralToe_r: socket_frame=/bodyset/toes_r location=(0.023014 0.02 0.0670461) radius=0.035
    ContactSphere medialToe_r: socket_frame=/bodyset/toes_r location=(0.074363 0.02 -0.026039) radius=0.035
    ContactSphere medialMidfoot_r: socket_frame=/bodyset/calcn_r location=(0.203637 0.02 -0.0398688) radius=0.035
    ContactSphere heel_l: socket_frame=/bodyset/calcn_l location=(0.0146421 0.02 0.0122799) radius=0.035
    ContactSphere lateralRearfoot_l: socket_frame=/bodyset/calcn_l location=(0.0849291 0.02 -0.0338649) radius=0.035
    ContactSphere lateralMidfoot_l: socket_frame=/bodyset/calcn_l location=(0.153362 0.02 -0.0594829) radius=0.035
    ContactSphere lateralToe_l: socket_frame=/bodyset/toes_l location=(0.023014 0.02 -0.0670461) radius=0.035
    ContactSphere medialToe_l: socket_frame=/bodyset/toes_l location=(0.074363 0.02 0.026039) radius=0.035
    ContactSphere medialMidfoot_l: socket_frame=/bodyset/calcn_l location=(0.203637 0.02 0.0398688) radius=0.035
