# OpenSim document version 40600
Model athlete_model:
  Ground
  BodySet:
    Body pelvis: mass=11.777 [kg] mass_center=(-0.0707 0 0) inertia=(0.1028 0.0871 0.0579 0 0 0)
        meshes=(pelvis_r.obj pelvis_l.obj sacrum.obj)
      Station iliocrestale_r: .. (-0.05 0.082 0.11)
      Station iliocrestale_l: .. (-0.05 0.082 -0.11)
      Station iliocrestale_midpoint: .. (-0.05 0.082 0)
      Station ASIS_r: .. (-0.0015 0.0065 0.125)
      Station ASIS_l: .. (-0.0015 0.0065 -0.125)
      Station ASIS_midpoint: .. (-0.0015 0.0065 0)
      Station mid_pelvis: .. (-0.05 0.0065 0)
      Station PSIS_r: .. (-0.14 0.035 0.055)
      Station PSIS_l: .. (-0.14 0.035 -0.055)
      Station PSIS_midpoint: .. (-0.14 0.035 0)
      Station acetabulum_r: .. (-0.072 -0.06 0.08)
      Station acetabulum_l: .. (-0.072 -0.06 -0.08)
      StationDefinedFrame pelvis_frame: socket_point_a=/bodyset/pelvis/mid_pelvis
          socket_point_b=/bodyset/pelvis/ASIS_midpoint socket_point_c=/bodyset/pelvis/iliocrestale_midpoint
          socket_origin_point=/bodyset/pelvis/mid_pelvis ab_axis=+x ab_x_ac_axis=+z
      StationDefinedFrame hip_r_parent_frame: socket_point_a=/bodyset/pelvis/mid_pelvis
          socket_point_b=/bodyset/pelvis/ASIS_midpoint socket_point_c=/bodyset/pelvis/iliocrestale_midpoint
          socket_origin_point=/bodyset/pelvis/acetabulum_r ab_axis=+x ab_x_ac_axis=+z
      StationDefinedFrame hip_l_parent_frame: socket_point_a=/bodyset/pelvis/mid_pelvis
          socket_point_b=/bodyset/pelvis/ASIS_midpoint socket_point_c=/bodyset/pelvis/iliocrestale_midpoint
          socket_origin_point=/bodyset/pelvis/acetabulum_l ab_axis=+x ab_x_ac_axis=+z
    Body femur_r: mass=9.3014 mass_center=(0 -0.17 0) inertia=(0.1339 0.0351 0.1412 0 0 0) meshes=femur_r.obj
      Station trochanterion_r: .. (-0.0165 0 0.05)
      Station femoral_head_r: .. (0 0 0)
      Station lateral_femoral_epicondyle_r: .. (0 -0.405 0.0375)
      Station medial_femoral_epicondyle_r: .. (0 -0.405 -0.0375)
      Station femoral_epicondyle_centroid_r: .. (0 -0.405 0)
      StationDefinedFrame hip_r_child_frame: socket_point_a=/bodyset/femur_r/femoral_epicondyle_centroid_r
          socket_point_b=/bodyset/femur_r/femoral_head_r socket_point_c=/bodyset/femur_r/lateral_femoral_epicondyle_r
          socket_origin_point=/bodyset/femur_r/femoral_head_r ab_axis=+y ab_x_ac_axis=+x
      ContactEllipsoid addbrev_r_obstacle: location=(0.015 -0.11 0.02) orientation=(1.625 0.185 0)
          radii=(0.0165 0.0165 0.15)
      ContactEllipsoid addlong_r_obstacle: location=(0.028 -0.215 0.018) orientation=(2.25 0.115 0.012)
          radii=(0.02 0.02 0.1)
      ContactEllipsoid addmagDist_r_obstacle: location=(0.01 -0.2 0) orientation=(2.225 0.23 -0.06)
          radii=(0.02 0.02 0.1)
      ContactEllipsoid addmagIsch_r_obstacle: location=(-0.0125 -0.35 -0.003) orientation=(1.7 -0.45 0)
          radii=(0.04 0.04 0.125)
      ContactEllipsoid addmagMid_r_obstacle: location=(0.018 -0.12 0.005) orientation=(2.25 0.19 -0.075)
          radii=(0.02 0.02 0.1)
      ContactEllipsoid addmagProx_r_obstacle: location=(0.005 -0.07 0.025) orientation=(1.6 0.185 0)
          radii=(0.02 0.02 0.15)
      ContactEllipsoid hamstrings_r_obstacle: location=(-0.01 -0.3 -0.0125) orientation=(0 -0.2 0)
          radii=(0.02 0.02 0.125)
    Body tibia_r: mass=3.7075 mass_center=(0 -0.1867 0) inertia=(0.0504 0.0051 0.0511 0 0 0)
        meshes=(tibia_r.obj fibula_r.obj)
      Station lateral_malleolus_r: .. (-0.005 -0.41 0.042)
      Station medial_malleolus_r: .. (0.002 -0.38 -0.027)
      Station malleolus_centroid_r: .. (-0.0015 -0.395 0.0075)
      Station medial_tibial_condyle_r: .. (-0.0161 -0.0315 -0.0291)
      Station lateral_tibial_condyle_r: .. (-0.0025 -0.0236 0.0348)
      Station tibial_condyle_centroid_r: .. (-0.0093 -0.02755 0.00285)
      ContactEllipsoid gaslat_r_obstacle: location=(0 -0.085 0.01) orientation=(3 -0.28 -1.45) radii=(0.05 0.05 0.15)
      ContactEllipsoid gasmed_r_obstacle: location=(0 -0.075 -0.015) orientation=(3 0 -1.25) radii=(0.05 0.05 0.15)
    Body talus_r: mass=0.1 mass_center=(0 0 0) inertia=(0.001 0.001 0.001 0 0 0) meshes=talus_r.obj
    Body calcn_r: mass=1.25 mass_center=(0.1 0.03 0) inertia=(0.0014 0.0039 0.0041 0 0 0) meshes=calcn_r.obj
      Station pternion_r: .. (-0.004 0.013 -0.003)
      Station mtp1_r: .. (0.141 0 0.047)
      Station mtp5_r: .. (0.185 0.001 -0.0345)
    Body toes_r: mass=0.2166 mass_center=(0.0346 0.006 -0.0175) inertia=(0.0001 0.0002 0.001 0 0 0) meshes=toes_r.obj
      Station acropodion_r: .. (0.075 -0.0032 -0.015)
    Body femur_l: mass=9.3014 mass_center=(0 -0.17 0) inertia=(0.1339 0.0351 0.1412 0 0 0) meshes=femur_l.obj
      Station trochanterion_l: .. (-0.0165 0 -0.05)
      Station femoral_head_l: .. (0 0 0)
      Station lateral_femoral_epicondyle_l: .. (0 -0.405 -0.0375)
      Station medial_femoral_epicondyle_l: .. (0 -0.405 0.0375)
      Station femoral_epicondyle_centroid_l: .. (0 -0.405 0)
      StationDefinedFrame hip_l_child_frame: socket_point_a=/bodyset/femur_l/femoral_epicondyle_centroid_l
          socket_point_b=/bodyset/femur_l/femoral_head_l socket_point_c=/bodyset/femur_l/lateral_femoral_epicondyle_l
          socket_origin_point=/bodyset/femur_l/femoral_head_l ab_axis=+y ab_x_ac_axis=-x
      ContactEllipsoid addbrev_l_obstacle: location=(0.015 -0.11 -0.02) orientation=(-1.625 -0.185 0)
          radii=(0.0165 0.0165 0.15)
      ContactEllipsoid addlong_l_obstacle: location=(0.028 -0.215 -0.018) orientation=(-2.25 -0.115 0.012)
          radii=(0.02 0.02 0.1)
      ContactEllipsoid addmagDist_l_obstacle: location=(0.01 -0.2 0) orientation=(-2.225 -0.23 0.06)
          radii=(0.02 0.02 0.1)
      ContactEllipsoid addmagIsch_l_obstacle: location=(-0.0125 -0.35 0.003) orientation=(-1.7 0.45 0)
          radii=(0.04 0.04 0.125)
      ContactEllipsoid addmagMid_l_obstacle: location=(0.018 -0.12 -0.005) orientation=(-2.25 -0.19 0.075)
          radii=(0.02 0.02 0.1)
      ContactEllipsoid addmagProx_l_obstacle: location=(0.005 -0.07 -0.025) orientation=(-1.6 -0.185 0)
          radii=(0.02 0.02 0.15)
      ContactEllipsoid hamstrings_l_obstacle: location=(-0.01 -0.3 0.0125) orientation=(0 0.2 0)
          radii=(0.02 0.02 0.125)
    Body tibia_l: mass=3.7075 mass_center=(0 -0.1867 0) inertia=(0.0504 0.0051 0.0511 0 0 0)
        meshes=(tibia_l.obj fibula_l.obj)
      Station lateral_malleolus_l: .. (-0.005 -0.41 -0.042)
      Station medial_malleolus_l: .. (0.002 -0.38 0.027)
      Station malleolus_centroid_l: .. (-0.0015 -0.395 -0.0075)
      Station medial_tibial_condyle_l: .. (-0.0161 -0.0315 0.0291)
      Station lateral_tibial_condyle_l: .. (-0.0025 -0.0236 -0.0348)
      Station tibial_condyle_centroid_l: .. (-0.0093 -0.02755 -0.00285)
      ContactEllipsoid gaslat_l_obstacle: location=(0 -0.085 -0.01) orientation=(-3 0.28 -1.45) radii=(0.05 0.05 0.15)
      ContactEllipsoid gasmed_l_obstacle: location=(0 -0.075 0.015) orientation=(3 0 -1.25) radii=(0.05 0.05 0.15)
    Body talus_l: mass=0.1 mass_center=(0 0 0) inertia=(0.001 0.001 0.001 0 0 0) meshes=talus_l.obj
    Body calcn_l: mass=1.25 mass_center=(0.1 0.03 0) inertia=(0.0014 0.0039 0.0041 0 0 0) meshes=calcn_l.obj
      Station pternion_l: .. (-0.004 0.013 0.003)
      Station mtp1_l: .. (0.141 0 -0.047)
      Station mtp5_l: .. (0.185 0.001 0.0345)
    Body toes_l: mass=0.2166 mass_center=(0.0346 0.006 -0.0175) inertia=(0.0001 0.0002 0.001 0 0 0) meshes=toes_l.obj
      Station acropodion_l: .. (0.075 -0.0032 0.015)
    Body torso: mass=26.83 mass_center=(-0.03 0.32 0) inertia=(1.4745 0.7555 1.4314 0 0 0) meshes=torso.obj
      Station euryon_r: .. (-0.0225 0.2175 0.069)
      Station euryon_l: .. (-0.0225 0.2175 -0.069)
      Station glabella: .. (0.059 0.2025 0)
      Station opisthocranion: .. (-0.101 0.1825 0)
      Station vertex: .. (-0.021 0.2725 0)
      Station suprasternale: .. (0.009 -0.0125 0)
      Station cervicale: .. (-0.086 0.0375 0)
      ContactEllipsoid thorax_r_obstacle: location=(-0.025 -0.13 0.057) orientation=(-0.12 -0.03 0.057)
          radii=(0.077 0.145 0.077)
      ContactEllipsoid pectoralis_r_obstacle: location=(-0.0195 -0.12 0.0585) orientation=(-0.122 -0.03 0.25)
          radii=(0.075 0.15 0.077)
      ContactEllipsoid thorax_l_obstacle: location=(-0.025 -0.13 -0.057) orientation=(0.12 0.03 0.057)
          radii=(0.077 0.145 0.077)
      ContactEllipsoid pectoralis_l_obstacle: location=(-0.0195 -0.12 -0.0585) orientation=(0.122 0.03 0.25)
          radii=(0.075 0.15 0.077)
    Body clavicle_r: mass=0.1898 mass_center=(-0.0111 0.0064 0.0542) inertia=(0.00027 0.00027 4.9e-5 0 0 0)
        meshes=clavicle_r.obj
    Body clavicle_l: mass=0.1898 mass_center=(-0.0111 0.0064 -0.0542) inertia=(0.00027 0.00027 4.9e-5 0 0 0)
        meshes=clavicle_l.obj
    Body scapula_r: mass=0.7054 mass_center=(-0.04612 -0.0319 -0.04565) inertia=(0.001 0.001 0.001 0 0 0)
        meshes=scapula_r.obj
      Station acromion_r: .. (0 0 0)
    Body scapula_l: mass=0.7054 mass_center=(-0.04612 -0.0319 0.04565) inertia=(0.001 0.001 0.001 0 0 0)
        meshes=scapula_l.obj
      Station acromion_l: .. (0 0 0)
    Body humerus_r: mass=2.0325 mass_center=(0 -0.1645 0) inertia=(0.011946 0.004121 0.01341 0 0 0)
        meshes=humerus_r.obj
      ContactEllipsoid triceps_r_obstacle: location=(0.001418921 -0.2464838 -0.0190431) orientation=(-2.99 1.4 -1.75)
          radii=(0.045 0.1 0.03)
      ContactEllipsoid biceps_r_obstacle: location=(0.018 -0.2 0.01) orientation=(0.135 1.23 1.45)
          radii=(0.045 0.085 0.03)
    Body humerus_l: mass=2.0325 mass_center=(0 -0.1645 0) inertia=(0.011946 0.004121 0.01341 0 0 0)
        meshes=humerus_l.obj
      ContactEllipsoid triceps_l_obstacle: location=(-0.0165 -0.23 0.0165) orientation=(2.99 -1.4 -1.75)
          radii=(0.045 0.1 0.03)
      ContactEllipsoid biceps_l_obstacle: location=(0.018 -0.2 -0.01) orientation=(-0.135 -1.23 1.45)
          radii=(0.045 0.085 0.03)
    Body ulna_r: mass=0.6075 mass_center=(0 -0.120525 0) inertia=(0.002962 0.000618 0.003213 0 0 0) meshes=ulna_r.obj
      Station olecranon_r: .. (-0.03 -0.001 0)
    Body ulna_l: mass=0.6075 mass_center=(0 -0.120525 0) inertia=(0.002962 0.000618 0.003213 0 0 0) meshes=ulna_l.obj
      Station olecranon_l: .. (-0.03 -0.001 0)
    Body radius_r: mass=0.6075 mass_center=(0 -0.120525 0) inertia=(0.002962 0.000618 0.003213 0 0 0)
        meshes=radius_r.obj
      Station radiale_r: .. (0 -0.004 0.006)
      Station stylion_r: .. (0 -0.23 0.03)
    Body radius_l: mass=0.6075 mass_center=(0 -0.120525 0) inertia=(0.002962 0.000618 0.003213 0 0 0)
        meshes=radius_l.obj
      Station radiale_l: .. (0 -0.004 -0.006)
      Station stylion_l: .. (0 -0.23 -0.03)
    Body hand_r: mass=0.4575 mass_center=(0 -0.068095 0) inertia=(0.000892 0.000547 0.00134 0 0 0)
        meshes=(pisiform_r.obj lunate_r.obj scaphoid_r.obj triquetrum_r.obj hamate_r.obj capitate_r.obj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)
    Body hand_l: mass=0.4575 mass_center=(0 -0.068095 0) inertia=(0.000892 0.000547 0.00134 0 0 0)
        meshes=(pisiform_l.obj lunate_l.obj scaphoid_l.obj triquetrum_l.obj hamate_l.obj capitate_l.obj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)
  JointSet:
    CustomJoint ground_pelvis: socket_parent_frame=/ground socket_child_frame=/bodyset/pelvis/pelvis_frame
      Coordinate pelvis_tilt: default_value=0 range=(-1.570796 1.570796) clamped=true
      Coordinate pelvis_list: default_value=0 range=(-1.570796 1.570796) clamped=true
      Coordinate pelvis_rotation: default_value=0 range=(-6.283185 6.283185) clamped=true
      Coordinate pelvis_tx: default_value=0 range=(-10 10) clamped=true
      Coordinate pelvis_ty: default_value=0.94 range=(-10 10) clamped=true
      Coordinate pelvis_tz: default_value=0 range=(-10 10) clamped=true
      SpatialTransform:
        TransformAxis rotation1: coordinates=pelvis_tilt axis=(0 0 1) LinearFunction(coefficients=1 0)
        TransformAxis rotation2: coordinates=pelvis_list axis=(1 0 0) LinearFunction(coefficients=1 0)
        TransformAxis rotation3: coordinates=pelvis_rotation axis=(0 1 0) LinearFunction(coefficients=1 0)
        TransformAxis translation1: coordinates=pelvis_tx axis=(1 0 0) LinearFunction(coefficients=1 0)
        TransformAxis translation2: coordinates=pelvis_ty axis=(0 1 0) LinearFunction(coefficients=1 0)
        TransformAxis translation3: coordinates=pelvis_tz axis=(0 0 1) LinearFunction(coefficients=1 0)
    CustomJoint hip_r: socket_parent_frame=/bodyset/pelvis/hip_r_parent_frame
        socket_child_frame=/bodyset/femur_r/hip_r_child_frame
      Coordinate hip_flexion_r: default_value=0 range=(-0.5235988 2.094395) clamped=true
      Coordinate hip_adduction_r: default_value=0 range=(-0.8975979 0.5235988) clamped=true
      Coordinate hip_rotation_r: default_value=0 range=(-0.6981317 0.6981317) clamped=true
      SpatialTransform: axes_held_at_zero=(translation1 translation2 translation3)
        TransformAxis rotation1: coordinates=hip_flexion_r axis=(0 0 1) LinearFunction(coefficients=1 0)
        TransformAxis rotation2: coordinates=hip_adduction_r axis=(1 0 0) LinearFunction(coefficients=1 0)
        TransformAxis rotation3: coordinates=hip_rotation_r axis=(0 1 0) LinearFunction(coefficients=1 0)
    CustomJoint knee_r: socket_parent_frame=knee_r_parent_frame socket_child_frame=knee_r_child_frame
      Coordinate knee_angle_r: default_value=0 range=(0 2.444819) clamped=true
      PhysicalOffsetFrame knee_r_parent_frame: socket_parent=/bodyset/femur_r
          translation=(-0.0045 -0.4096 -0.00175) [meters] orientation=(-1.64157 1.44618 1.5708) [radians]
      PhysicalOffsetFrame knee_r_child_frame: socket_parent=/bodyset/tibia_r
          translation=(-0.00808954 -0.0035348 -0.00148474) orientation=(-1.64157 1.44618 1.5708)
      SpatialTransform:
        TransformAxis rotation1: coordinates=knee_angle_r axis=(1 0 0) LinearFunction(coefficients=1 0)
        TransformAxis rotation2: coordinates=knee_angle_r axis=(0 0 1)
          PolynomialFunction: coefficients=(0.01083209 -0.02521833 -0.03284781 0.07910001 -1.473252e-8)
        TransformAxis rotation3: coordinates=knee_angle_r axis=(0 1 0)
          PolynomialFunction: coefficients=(0.02516576 -0.1694801 0.3694993 -4.430358e-8)
        TransformAxis translation1: coordinates=knee_angle_r axis=(1 0 0)
          PolynomialFunction: coefficients=(0.0001590448 -0.00101515 0.001817511 2.641427e-5 -7.746564e-7)
        TransformAxis translation2: coordinates=knee_angle_r axis=(0 1 0)
          PolynomialFunction: coefficients=(-0.0005796878 0.005079766 -0.01144238 0.003936909 -2.51635e-5)
        TransformAxis translation3: coordinates=knee_angle_r axis=(0 0 1)
          PolynomialFunction: coefficients=(0.001208087 -0.004453611 0.0006116494 0.00626543 -1.461913e-5)
    PinJoint ankle_r: socket_parent_frame=ankle_r_parent_frame socket_child_frame=ankle_r_child_frame
      Coordinate ankle_angle_r: default_value=0 range=(-0.8975979 0.7853982) clamped=true
      PhysicalOffsetFrame ankle_r_parent_frame: socket_parent=/bodyset/tibia_r translation=(-0.01 -0.4 0)
          orientation=(0.175895 -0.105208 0.0186622)
      PhysicalOffsetFrame ankle_r_child_frame: socket_parent=/bodyset/talus_r translation=(0 0 0)
          orientation=(0.175895 -0.105208 0.0186622)
    PinJoint subtalar_r: socket_parent_frame=subtalar_r_parent_frame socket_child_frame=subtalar_r_child_frame
      Coordinate subtalar_angle_r: default_value=0 range=(-0.6283185 0.6283185) clamped=true
      PhysicalOffsetFrame subtalar_r_parent_frame: socket_parent=/bodyset/talus_r
          translation=(-0.04877 -0.04195 0.00792) orientation=(-1.76819 0.906223 1.8196)
      PhysicalOffsetFrame subtalar_r_child_frame: socket_parent=/bodyset/calcn_r translation=(0 0 0)
          orientation=(-1.76819 0.906223 1.8196)
    PinJoint mtp_r: socket_parent_frame=mtp_r_parent_frame socket_child_frame=mtp_r_child_frame
      Coordinate mtp_angle_r: default_value=0 range=(-0.7853982 0.5235988) clamped=true
      PhysicalOffsetFrame mtp_r_parent_frame: socket_parent=/bodyset/calcn_r translation=(0.1788 -0.002 0.00108)
          orientation=(-3.141593 0.619901 0)
      PhysicalOffsetFrame mtp_r_child_frame: socket_parent=/bodyset/toes_r translation=(0 0 0)
          orientation=(-3.141593 0.619901 0)
    CustomJoint hip_l: socket_parent_frame=/bodyset/pelvis/hip_l_parent_frame
        socket_child_frame=/bodyset/femur_l/hip_l_child_frame
      Coordinate hip_flexion_l: default_value=0 range=(-0.5235988 2.094395) clamped=true
      Coordinate hip_adduction_l: default_value=0 range=(-0.8975979 0.5235988) clamped=true
      Coordinate hip_rotation_l: default_value=0 range=(-0.6981317 0.6981317) clamped=true
      SpatialTransform: axes_held_at_zero=(translation1 translation2 translation3)
        TransformAxis rotation1: coordinates=hip_flexion_l axis=(0 0 1) LinearFunction(coefficients=1 0)
        TransformAxis rotation2: coordinates=hip_adduction_l axis=(1 0 0) LinearFunction(coefficients=-1 0)
        TransformAxis rotation3: coordinates=hip_rotation_l axis=(0 1 0) LinearFunction(coefficients=-1 0)
    CustomJoint knee_l: socket_parent_frame=knee_l_parent_frame socket_child_frame=knee_l_child_frame
      Coordinate knee_angle_l: default_value=0 range=(0 2.444819) clamped=true
      PhysicalOffsetFrame knee_l_parent_frame: socket_parent=/bodyset/femur_l translation=(-0.0045 -0.4096 0.00175)
          orientation=(1.64157 -1.44618 1.5708)
      PhysicalOffsetFrame knee_l_child_frame: socket_parent=/bodyset/tibia_l
          translation=(-0.00808954 -0.0035348 0.00148474) orientation=(1.64157 -1.44618 1.5708)
      SpatialTransform:
        TransformAxis rotation1: coordinates=knee_angle_l axis=(-1 0 0) LinearFunction(coefficients=1 0)
        TransformAxis rotation2: coordinates=knee_angle_l axis=(0 0 1)
          PolynomialFunction: coefficients=(0.01083209 -0.02521833 -0.03284781 0.07910001 -1.473252e-8)
        TransformAxis rotation3: coordinates=knee_angle_l axis=(0 1 0)
          PolynomialFunction: coefficients=(-0.02516576 0.1694801 -0.3694993 4.430358e-8)
        TransformAxis translation1: coordinates=knee_angle_l axis=(1 0 0)
          PolynomialFunction: coefficients=(0.0001590448 -0.00101515 0.001817511 2.641427e-5 -7.746564e-7)
        TransformAxis translation2: coordinates=knee_angle_l axis=(0 1 0)
          PolynomialFunction: coefficients=(-0.0005796878 0.005079766 -0.01144238 0.003936909 -2.51635e-5)
        TransformAxis translation3: coordinates=knee_angle_l axis=(0 0 1)
          PolynomialFunction: coefficients=(-0.001208087 0.004453611 -0.0006116494 -0.00626543 1.461913e-5)
    PinJoint ankle_l: socket_parent_frame=ankle_l_parent_frame socket_child_frame=ankle_l_child_frame
      Coordinate ankle_angle_l: default_value=0 range=(-0.8975979 0.7853982) clamped=true
      PhysicalOffsetFrame ankle_l_parent_frame: socket_parent=/bodyset/tibia_l translation=(-0.01 -0.4 0)
          orientation=(-0.175895 0.105208 0.0186622)
      PhysicalOffsetFrame ankle_l_child_frame: socket_parent=/bodyset/talus_l translation=(0 0 0)
          orientation=(-0.175895 0.105208 0.0186622)
    PinJoint subtalar_l: socket_parent_frame=subtalar_l_parent_frame socket_child_frame=subtalar_l_child_frame
      Coordinate subtalar_angle_l: default_value=0 range=(-0.6283185 0.6283185) clamped=true
      PhysicalOffsetFrame subtalar_l_parent_frame: socket_parent=/bodyset/talus_l
          translation=(-0.04877 -0.04195 -0.00792) orientation=(1.76819 -0.906223 1.8196)
      PhysicalOffsetFrame subtalar_l_child_frame: socket_parent=/bodyset/calcn_l translation=(0 0 0)
          orientation=(1.76819 -0.906223 1.8196)
    PinJoint mtp_l: socket_parent_frame=mtp_l_parent_frame socket_child_frame=mtp_l_child_frame
      Coordinate mtp_angle_l: default_value=0 range=(-0.7853982 0.5235988) clamped=true
      PhysicalOffsetFrame mtp_l_parent_frame: socket_parent=/bodyset/calcn_l translation=(0.1788 -0.002 -0.00108)
          orientation=(-3.141593 -0.619901 0)
      PhysicalOffsetFrame mtp_l_child_frame: socket_parent=/bodyset/toes_l translation=(0 0 0)
          orientation=(-3.141593 -0.619901 0)
    CustomJoint back: socket_parent_frame=back_parent_frame socket_child_frame=back_child_frame
      Coordinate torso_extension: default_value=0 range=(-1.047198 1.047198) clamped=true
      Coordinate torso_bending: default_value=0 range=(-1.047198 1.047198) clamped=true
      Coordinate torso_rotation: default_value=0 range=(-1.047198 1.047198) clamped=true
      PhysicalOffsetFrame back_parent_frame: socket_parent=/bodyset/pelvis translation=(-0.1007 0.0815 0)
      PhysicalOffsetFrame back_child_frame: socket_parent=/bodyset/torso translation=(-0.021 -0.3775 0)
      SpatialTransform: axes_held_at_zero=(translation1 translation2 translation3)
        TransformAxis rotation1: coordinates=torso_extension axis=(0 0 1) LinearFunction(coefficients=1 0)
        TransformAxis rotation2: coordinates=torso_bending axis=(1 0 0) LinearFunction(coefficients=1 0)
        TransformAxis rotation3: coordinates=torso_rotation axis=(0 1 0) LinearFunction(coefficients=1 0)
    WeldJoint sternoclavicular_r: socket_parent_frame=sternoclavicular_r_parent_frame
        socket_child_frame=sternoclavicular_r_child_frame
      PhysicalOffsetFrame sternoclavicular_r_parent_frame: socket_parent=/bodyset/torso
          translation=(0.00632 0.00693 0.0255)
      PhysicalOffsetFrame sternoclavicular_r_child_frame: socket_parent=/bodyset/clavicle_r translation=(0 0 0)
    WeldJoint sternoclavicular_l: socket_parent_frame=sternoclavicular_l_parent_frame
        socket_child_frame=sternoclavicular_l_child_frame
      PhysicalOffsetFrame sternoclavicular_l_parent_frame: socket_parent=/bodyset/torso
          translation=(0.00632 0.00693 -0.0255)
      PhysicalOffsetFrame sternoclavicular_l_child_frame: socket_parent=/bodyset/clavicle_l translation=(0 0 0)
    WeldJoint scapulothoracic_r: socket_parent_frame=/bodyset/torso socket_child_frame=scapulothoracic_r_weld_frame
      PhysicalOffsetFrame scapulothoracic_r_weld_frame: socket_parent=/bodyset/scapula_r
          translation=(0.0654452 -0.0600243 -0.146101) orientation=(-0.291944 -0.284971 -0.12239)
    WeldJoint scapulothoracic_l: socket_parent_frame=/bodyset/torso socket_child_frame=scapulothoracic_l_weld_frame
      PhysicalOffsetFrame scapulothoracic_l_weld_frame: socket_parent=/bodyset/scapula_l
          translation=(0.0654452 -0.0600243 0.146101) orientation=(0.291944 0.284971 -0.12239)
    CustomJoint glenohumeral_r: socket_parent_frame=glenohumeral_r_parent_frame socket_child_frame=/bodyset/humerus_r
      Coordinate shoulder_flexion_r: default_value=0 range=(-2 2) clamped=true
      Coordinate shoulder_abduction_r: default_value=0 range=(-0.5235988 2.513274) clamped=true
      Coordinate shoulder_rotation_r: default_value=0 range=(-0.5235988 0.5235988) clamped=true
      PhysicalOffsetFrame glenohumeral_r_parent_frame: socket_parent=/bodyset/scapula_r
          translation=(-0.00955 -0.034 0.009) orientation=(-0.25 0 -0.125)
      SpatialTransform: axes_held_at_zero=(translation1 translation2 translation3)
        TransformAxis rotation1: coordinates=shoulder_flexion_r axis=(0 0 1) LinearFunction(coefficients=1 0)
        TransformAxis rotation2: coordinates=shoulder_abduction_r axis=(1 0 0) LinearFunction(coefficients=-1 0)
        TransformAxis rotation3: coordinates=shoulder_rotation_r axis=(0 1 0) LinearFunction(coefficients=1 0)
    CustomJoint glenohumeral_l: socket_parent_frame=glenohumeral_l_parent_frame socket_child_frame=/bodyset/humerus_l
      Coordinate shoulder_flexion_l: default_value=0 range=(-2 2) clamped=true
      Coordinate shoulder_abduction_l: default_value=0 range=(-0.5235988 2.513274) clamped=true
      Coordinate shoulder_rotation_l: default_value=0 range=(-0.5235988 0.5235988) clamped=true
      PhysicalOffsetFrame glenohumeral_l_parent_frame: socket_parent=/bodyset/scapula_l
          translation=(-0.00955 -0.034 -0.009) orientation=(0.25 0 -0.125)
      SpatialTransform: axes_held_at_zero=(translation1 translation2 translation3)
        TransformAxis rotation1: coordinates=shoulder_flexion_l axis=(0 0 1) LinearFunction(coefficients=1 0)
        TransformAxis rotation2: coordinates=shoulder_abduction_l axis=(1 0 0) LinearFunction(coefficients=1 0)
        TransformAxis rotation3: coordinates=shoulder_rotation_l axis=(0 1 0) LinearFunction(coefficients=-1 0)
    PinJoint elbow_r: socket_parent_frame=elbow_r_parent_frame socket_child_frame=elbow_r_child_frame
      Coordinate elbow_flex_r: default_value=1.819279 range=(0 2.617994) clamped=true
      PhysicalOffsetFrame elbow_r_parent_frame: socket_parent=/bodyset/humerus_r
          translation=(0.013144 -0.286273 -0.009595) orientation=(-0.0228627 0.228018 0.0051689)
      PhysicalOffsetFrame elbow_r_child_frame: socket_parent=/bodyset/ulna_r translation=(0 0 0)
          orientation=(-0.0228627 0.228018 0.0051689)
    PinJoint elbow_l: socket_parent_frame=elbow_l_parent_frame socket_child_frame=elbow_l_child_frame
      Coordinate elbow_flex_l: default_value=0 range=(0 2.617994) clamped=true
      PhysicalOffsetFrame elbow_l_parent_frame: socket_parent=/bodyset/humerus_l
          translation=(0.013144 -0.286273 0.009595) orientation=(0.0228627 -0.228018 0.0051689)
      PhysicalOffsetFrame elbow_l_child_frame: socket_parent=/bodyset/ulna_l translation=(0 0 0)
          orientation=(0.0228627 -0.228018 0.0051689)
    PinJoint radioulnar_r: socket_parent_frame=radioulnar_r_parent_frame socket_child_frame=radioulnar_r_child_frame
      Coordinate pro_sup_r: default_value=0 range=(0 1.570796) clamped=true
      PhysicalOffsetFrame radioulnar_r_parent_frame: socket_parent=/bodyset/ulna_r
          translation=(-0.006727 -0.013007 0.026083) orientation=(-1.56884 0.056428 1.53614)
      PhysicalOffsetFrame radioulnar_r_child_frame: socket_parent=/bodyset/radius_r translation=(0 0 0)
          orientation=(-1.56884 0.056428 1.53614)
    PinJoint radioulnar_l: socket_parent_frame=radioulnar_l_parent_frame socket_child_frame=radioulnar_l_child_frame
      Coordinate pro_sup_l: default_value=0 range=(0 1.570796) clamped=true
      PhysicalOffsetFrame radioulnar_l_parent_frame: socket_parent=/bodyset/ulna_l
          translation=(-0.006727 -0.013007 -0.026083) orientation=(1.56884 -0.056428 1.53614)
      PhysicalOffsetFrame radioulnar_l_child_frame: socket_parent=/bodyset/radius_l translation=(0 0 0)
          orientation=(1.56884 -0.056428 1.53614)
    UniversalJoint radius_hand_r: socket_parent_frame=radius_hand_r_parent_frame
        socket_child_frame=radius_hand_r_child_frame
      Coordinate wrist_flex_r: default_value=0 range=(-1.256637 1.256637) clamped=true
      Coordinate wrist_dev_r: default_value=0 range=(-0.448799 0.6283185) clamped=true
      PhysicalOffsetFrame radius_hand_r_parent_frame: socket_parent=/bodyset/radius_r
          translation=(-0.008797 -0.235841 0.01361) orientation=(-1.5708 0 -1.5708)
      PhysicalOffsetFrame radius_hand_r_child_frame: socket_parent=/bodyset/hand_r translation=(0 0 0)
          orientation=(-1.5708 0 -1.5708)
    UniversalJoint radius_hand_l: socket_parent_frame=radius_hand_l_parent_frame
        socket_child_frame=radius_hand_l_child_frame
      Coordinate wrist_flex_l: default_value=0 range=(-1.256637 1.256637) clamped=true
      Coordinate wrist_dev_l: default_value=0 range=(-0.448799 0.6283185) clamped=true
      PhysicalOffsetFrame radius_hand_l_parent_frame: socket_parent=/bodyset/radius_l
          translation=(-0.008797 -0.235841 -0.01361) orientation=(1.5708 0 1.5708)
      PhysicalOffsetFrame radius_hand_l_child_frame: socket_parent=/bodyset/hand_l translation=(0 0 0)
          orientation=(1.5708 0 1.5708)
  ForceSet:
    SpringGeneralizedForce hip_flexion_r_spring_force: coordinate=hip_flexion_r stiffness=0 viscosity=0.01
    CoordinateLimitForce [values shared by the 31 below unless stated]: upper_stiffness=8.726646 [N*m/degree]
        lower_stiffness=8.726646 [N*m/degree] damping=0.01745329 transition=1 [degrees]
        compute_dissipation_energy=false
    CoordinateLimitForce hip_flexion_r_limit_force: coordinate=hip_flexion_r upper_limit=120 [degrees]
        lower_limit=-30 [degrees]
    SpringGeneralizedForce hip_adduction_r_spring_force: coordinate=hip_adduction_r stiffness=0 viscosity=0.01
    CoordinateLimitForce hip_adduction_r_limit_force: coordinate=hip_adduction_r upper_limit=30 lower_limit=-51.42857
    SpringGeneralizedForce hip_rotation_r_spring_force: coordinate=hip_rotation_r stiffness=0 viscosity=0.01
    CoordinateLimitForce hip_rotation_r_limit_force: coordinate=hip_rotation_r upper_limit=40 lower_limit=-40
    SpringGeneralizedForce knee_angle_r_spring_force: coordinate=knee_angle_r stiffness=0 viscosity=0.01
    CoordinateLimitForce knee_angle_r_limit_force: coordinate=knee_angle_r upper_limit=140.0778 lower_limit=0
    SpringGeneralizedForce ankle_angle_r_spring_force: coordinate=ankle_angle_r stiffness=0 viscosity=0.01
    CoordinateLimitForce ankle_angle_r_limit_force: coordinate=ankle_angle_r upper_limit=45 lower_limit=-51.42857
    SpringGeneralizedForce subtalar_angle_r_spring_force: coordinate=subtalar_angle_r stiffness=0 viscosity=0.01
    CoordinateLimitForce subtalar_angle_r_limit_force: coordinate=subtalar_angle_r upper_limit=36 lower_limit=-36
    SpringGeneralizedForce mtp_angle_r_spring_force: coordinate=mtp_angle_r stiffness=25 viscosity=1
    CoordinateLimitForce mtp_angle_r_limit_force: coordinate=mtp_angle_r upper_limit=30 lower_limit=-45
    SpringGeneralizedForce hip_flexion_l_spring_force: coordinate=hip_flexion_l stiffness=0 viscosity=0.01
    CoordinateLimitForce hip_flexion_l_limit_force: coordinate=hip_flexion_l upper_limit=120 lower_limit=-30
    SpringGeneralizedForce hip_adduction_l_spring_force: coordinate=hip_adduction_l stiffness=0 viscosity=0.01
    CoordinateLimitForce hip_adduction_l_limit_force: coordinate=hip_adduction_l upper_limit=30 lower_limit=-51.42857
    SpringGeneralizedForce hip_rotation_l_spring_force: coordinate=hip_rotation_l stiffness=0 viscosity=0.01
    CoordinateLimitForce hip_rotation_l_limit_force: coordinate=hip_rotation_l upper_limit=40 lower_limit=-40
    SpringGeneralizedForce knee_angle_l_spring_force: coordinate=knee_angle_l stiffness=0 viscosity=0.01
    CoordinateLimitForce knee_angle_l_limit_force: coordinate=knee_angle_l upper_limit=140.0778 lower_limit=0
    SpringGeneralizedForce ankle_angle_l_spring_force: coordinate=ankle_angle_l stiffness=0 viscosity=0.01
    CoordinateLimitForce ankle_angle_l_limit_force: coordinate=ankle_angle_l upper_limit=45 lower_limit=-51.42857
    SpringGeneralizedForce subtalar_angle_l_spring_force: coordinate=subtalar_angle_l stiffness=0 viscosity=0.01
    CoordinateLimitForce subtalar_angle_l_limit_force: coordinate=subtalar_angle_l upper_limit=36 lower_limit=-36
    SpringGeneralizedForce mtp_angle_l_spring_force: coordinate=mtp_angle_l stiffness=25 viscosity=1
    CoordinateLimitForce mtp_angle_l_limit_force: coordinate=mtp_angle_l upper_limit=30 lower_limit=-45
    SpringGeneralizedForce torso_extension_spring_force: coordinate=torso_extension stiffness=0 viscosity=0.01
    CoordinateLimitForce torso_extension_limit_force: coordinate=torso_extension upper_limit=60 lower_limit=-60
    SpringGeneralizedForce torso_bending_spring_force: coordinate=torso_bending stiffness=0 viscosity=0.01
    CoordinateLimitForce torso_bending_limit_force: coordinate=torso_bending upper_limit=60 lower_limit=-60
    SpringGeneralizedForce torso_rotation_spring_force: coordinate=torso_rotation stiffness=0 viscosity=0.01
    CoordinateLimitForce torso_rotation_limit_force: coordinate=torso_rotation upper_limit=60 lower_limit=-60
    SpringGeneralizedForce shoulder_flexion_r_spring_force: coordinate=shoulder_flexion_r stiffness=0 viscosity=0.01
    CoordinateLimitForce shoulder_flexion_r_limit_force: coordinate=shoulder_flexion_r upper_limit=114.5916
        lower_limit=-114.5916
    SpringGeneralizedForce shoulder_abduction_r_spring_force: coordinate=shoulder_abduction_r stiffness=0
        viscosity=0.01
    CoordinateLimitForce shoulder_abduction_r_limit_force: coordinate=shoulder_abduction_r upper_limit=144
        lower_limit=-30
    SpringGeneralizedForce shoulder_rotation_r_spring_force: coordinate=shoulder_rotation_r stiffness=0 viscosity=0.01
    CoordinateLimitForce shoulder_rotation_r_limit_force: coordinate=shoulder_rotation_r upper_limit=30 lower_limit=-30
    SpringGeneralizedForce shoulder_flexion_l_spring_force: coordinate=shoulder_flexion_l stiffness=0 viscosity=0.01
    CoordinateLimitForce shoulder_flexion_l_limit_force: coordinate=shoulder_flexion_l upper_limit=114.5916
        lower_limit=-114.5916
    SpringGeneralizedForce shoulder_abduction_l_spring_force: coordinate=shoulder_abduction_l stiffness=0
        viscosity=0.01
    CoordinateLimitForce shoulder_abduction_l_limit_force: coordinate=shoulder_abduction_l upper_limit=144
        lower_limit=-30
    SpringGeneralizedForce shoulder_rotation_l_spring_force: coordinate=shoulder_rotation_l stiffness=0 viscosity=0.01
    CoordinateLimitForce shoulder_rotation_l_limit_force: coordinate=shoulder_rotation_l upper_limit=30 lower_limit=-30
    SpringGeneralizedForce elbow_flex_r_spring_force: coordinate=elbow_flex_r stiffness=0 viscosity=0.01
    CoordinateLimitForce elbow_flex_r_limit_force: coordinate=elbow_flex_r upper_limit=150 lower_limit=0
    SpringGeneralizedForce elbow_flex_l_spring_force: coordinate=elbow_flex_l stiffness=0 viscosity=0.01
    CoordinateLimitForce elbow_flex_l_limit_force: coordinate=elbow_flex_l upper_limit=150 lower_limit=0
    SpringGeneralizedForce pro_sup_r_spring_force: coordinate=pro_sup_r stiffness=0 viscosity=0.01
    CoordinateLimitForce pro_sup_r_limit_force: coordinate=pro_sup_r upper_limit=90 lower_limit=0
    SpringGeneralizedForce pro_sup_l_spring_force: coordinate=pro_sup_l stiffness=0 viscosity=0.01
    CoordinateLimitForce pro_sup_l_limit_force: coordinate=pro_sup_l upper_limit=90 lower_limit=0
    SpringGeneralizedForce wrist_flex_r_spring_force: coordinate=wrist_flex_r stiffness=0 viscosity=0.01
    CoordinateLimitForce wrist_flex_r_limit_force: coordinate=wrist_flex_r upper_limit=72 lower_limit=-72
    SpringGeneralizedForce wrist_dev_r_spring_force: coordinate=wrist_dev_r stiffness=0 viscosity=0.01
    CoordinateLimitForce wrist_dev_r_limit_force: coordinate=wrist_dev_r upper_limit=36 lower_limit=-25.71429
    SpringGeneralizedForce wrist_flex_l_spring_force: coordinate=wrist_flex_l stiffness=0 viscosity=0.01
    CoordinateLimitForce wrist_flex_l_limit_force: coordinate=wrist_flex_l upper_limit=72 lower_limit=-72
    SpringGeneralizedForce wrist_dev_l_spring_force: coordinate=wrist_dev_l stiffness=0 viscosity=0.01
    CoordinateLimitForce wrist_dev_l_limit_force: coordinate=wrist_dev_l upper_limit=36 lower_limit=-25.71429
    ExponentialContactForce [values shared by the 57 below unless stated]: contact_plane_transform=(-1.570796 0 0 0 0 0)
        exponential_shape_parameters=(0.0065905 0.5336 1150) normal_viscosity=0.5 max_normal_force=100000
        friction_elasticity=20000 friction_viscosity=282.8427 settle_velocity=0.01 initial_mu_static=0.7
        initial_mu_kinetic=0.5
    ExponentialContactForce iliocrestale_r_contact_force:
      Station: pelvis (-0.05 0.082 0.11)
    ExponentialContactForce iliocrestale_l_contact_force:
      Station: pelvis (-0.05 0.082 -0.11)
    ExponentialContactForce iliocrestale_midpoint_contact_force:
      Station: pelvis (-0.05 0.082 0)
    ExponentialContactForce ASIS_r_contact_force:
      Station: pelvis (-0.0015 0.0065 0.125)
    ExponentialContactForce ASIS_l_contact_force:
      Station: pelvis (-0.0015 0.0065 -0.125)
    ExponentialContactForce ASIS_midpoint_contact_force:
      Station: pelvis (-0.0015 0.0065 0)
    ExponentialContactForce mid_pelvis_contact_force:
      Station: pelvis (-0.05 0.0065 0)
    ExponentialContactForce PSIS_r_contact_force:
      Station: pelvis (-0.14 0.035 0.055)
    ExponentialContactForce PSIS_l_contact_force:
      Station: pelvis (-0.14 0.035 -0.055)
    ExponentialContactForce PSIS_midpoint_contact_force:
      Station: pelvis (-0.14 0.035 0)
    ExponentialContactForce acetabulum_r_contact_force:
      Station: pelvis (-0.072 -0.06 0.08)
    ExponentialContactForce acetabulum_l_contact_force:
      Station: pelvis (-0.072 -0.06 -0.08)
    ExponentialContactForce trochanterion_r_contact_force:
      Station: femur_r (-0.0165 0 0.05)
    ExponentialContactForce femoral_head_r_contact_force:
      Station: femur_r (0 0 0)
    ExponentialContactForce lateral_femoral_epicondyle_r_contact_force:
      Station: femur_r (0 -0.405 0.0375)
    ExponentialContactForce medial_femoral_epicondyle_r_contact_force:
      Station: femur_r (0 -0.405 -0.0375)
    ExponentialContactForce femoral_epicondyle_centroid_r_contact_force:
      Station: femur_r (0 -0.405 0)
    ExponentialContactForce lateral_malleolus_r_contact_force:
      Station: tibia_r (-0.005 -0.41 0.042)
    ExponentialContactForce medial_malleolus_r_contact_force:
      Station: tibia_r (0.002 -0.38 -0.027)
    ExponentialContactForce malleolus_centroid_r_contact_force:
      Station: tibia_r (-0.0015 -0.395 0.0075)
    ExponentialContactForce medial_tibial_condyle_r_contact_force:
      Station: tibia_r (-0.0161 -0.0315 -0.0291)
    ExponentialContactForce lateral_tibial_condyle_r_contact_force:
      Station: tibia_r (-0.0025 -0.0236 0.0348)
    ExponentialContactForce tibial_condyle_centroid_r_contact_force:
      Station: tibia_r (-0.0093 -0.02755 0.00285)
    ExponentialContactForce pternion_r_contact_force:
      Station: calcn_r (-0.004 0.013 -0.003)
    ExponentialContactForce mtp1_r_contact_force:
      Station: calcn_r (0.141 0 0.047)
    ExponentialContactForce mtp5_r_contact_force:
      Station: calcn_r (0.185 0.001 -0.0345)
    ExponentialContactForce acropodion_r_contact_force:
      Station: toes_r (0.075 -0.0032 -0.015)
    ExponentialContactForce trochanterion_l_contact_force:
      Station: femur_l (-0.0165 0 -0.05)
    ExponentialContactForce femoral_head_l_contact_force:
      Station: femur_l (0 0 0)
    ExponentialContactForce lateral_femoral_epicondyle_l_contact_force:
      Station: femur_l (0 -0.405 -0.0375)
    ExponentialContactForce medial_femoral_epicondyle_l_contact_force:
      Station: femur_l (0 -0.405 0.0375)
    ExponentialContactForce femoral_epicondyle_centroid_l_contact_force:
      Station: femur_l (0 -0.405 0)
    ExponentialContactForce lateral_malleolus_l_contact_force:
      Station: tibia_l (-0.005 -0.41 -0.042)
    ExponentialContactForce medial_malleolus_l_contact_force:
      Station: tibia_l (0.002 -0.38 0.027)
    ExponentialContactForce malleolus_centroid_l_contact_force:
      Station: tibia_l (-0.0015 -0.395 -0.0075)
    ExponentialContactForce medial_tibial_condyle_l_contact_force:
      Station: tibia_l (-0.0161 -0.0315 0.0291)
    ExponentialContactForce lateral_tibial_condyle_l_contact_force:
      Station: tibia_l (-0.0025 -0.0236 -0.0348)
    ExponentialContactForce tibial_condyle_centroid_l_contact_force:
      Station: tibia_l (-0.0093 -0.02755 -0.00285)
    ExponentialContactForce pternion_l_contact_force:
      Station: calcn_l (-0.004 0.013 0.003)
    ExponentialContactForce mtp1_l_contact_force:
      Station: calcn_l (0.141 0 -0.047)
    ExponentialContactForce mtp5_l_contact_force:
      Station: calcn_l (0.185 0.001 0.0345)
    ExponentialContactForce acropodion_l_contact_force:
      Station: toes_l (0.075 -0.0032 0.015)
    ExponentialContactForce euryon_r_contact_force:
      Station: torso (-0.0225 0.2175 0.069)
    ExponentialContactForce euryon_l_contact_force:
      Station: torso (-0.0225 0.2175 -0.069)
    ExponentialContactForce glabella_contact_force:
      Station: torso (0.059 0.2025 0)
    ExponentialContactForce opisthocranion_contact_force:
      Station: torso (-0.101 0.1825 0)
    ExponentialContactForce vertex_contact_force:
      Station: torso (-0.021 0.2725 0)
    ExponentialContactForce suprasternale_contact_force:
      Station: torso (0.009 -0.0125 0)
    ExponentialContactForce cervicale_contact_force:
      Station: torso (-0.086 0.0375 0)
    ExponentialContactForce acromion_r_contact_force:
      Station: scapula_r (0 0 0)
    ExponentialContactForce acromion_l_contact_force:
      Station: scapula_l (0 0 0)
    ExponentialContactForce olecranon_r_contact_force:
      Station: ulna_r (-0.03 -0.001 0)
    ExponentialContactForce olecranon_l_contact_force:
      Station: ulna_l (-0.03 -0.001 0)
    ExponentialContactForce radiale_r_contact_force:
      Station: radius_r (0 -0.004 0.006)
    ExponentialContactForce stylion_r_contact_force:
      Station: radius_r (0 -0.23 0.03)
    ExponentialContactForce radiale_l_contact_force:
      Station: radius_l (0 -0.004 -0.006)
    ExponentialContactForce stylion_l_contact_force:
      Station: radius_l (0 -0.23 -0.03)
    Millard2012EquilibriumMuscle [values shared by the 130 below unless stated]: min_control=0.01 max_control=1
        fiber_damping=0.1
      ActiveForceLengthCurve: minimum_value=0
      ForceVelocityCurve: concentric_slope_at_vmax=0 concentric_slope_near_vmax=0.25 isometric_slope=5
          eccentric_slope_at_vmax=0 eccentric_slope_near_vmax=0.15 max_eccentric_velocity_force_multiplier=1.4
      TendonForceLengthCurve
    Millard2012EquilibriumMuscle ercspn_r: max_isometric_force=2500 optimal_fiber_length=0.13769
        tendon_slack_length=0.034422 pennation_angle_at_optimal=0 [radians] ignore_tendon_compliance=true
      Scholz2015GeometryPath path:
        path_elements:
          Scholz2015GeometryPathPoint path_point_0:
            PathPoint: pelvis (-0.14 0.048 0.055)
          Scholz2015GeometryPathPoint path_point_1:
            PathPoint: torso (-0.075 -0.245 0.028)
      FiberForceLengthCurve: strain_at_zero_force=0 strain_at_one_norm_force=0.9 stiffness_at_low_force=0.2
          stiffness_at_one_norm_force=2.857143 curviness=0.75
    Millard2012EquilibriumMuscle ercspn_l: max_isometric_force=2500 optimal_fiber_length=0.13769
        tendon_slack_length=0.034422 pennation_angle_at_optimal=0 ignore_tendon_compliance=true
      Scholz2015GeometryPath path:
        path_elements:
          Scholz2015GeometryPathPoint path_point_0:
            PathPoint: pelvis (-0.14 0.048 -0.055)
          Scholz2015GeometryPathPoint path_point_1:
            PathPoint: torso (-0.075 -0.245 -0.028)
      FiberForceLengthCurve: strain_at_zero_force=0 strain_at_one_norm_force=0.9 stiffness_at_low_force=0.2
          stiffness_at_one_norm_force=2.857143 curviness=0.75
    Millard2012EquilibriumMuscle coracobrachialis_r: max_isometric_force=648.2 optimal_fiber_length=0.0683
        tendon_slack_length=0.104 pennation_angle_at_optimal=0
      Scholz2015GeometryPath path:
        path_elements:
          Scholz2015GeometryPathPoint path_point_0:
            PathPoint: scapula_r (0.0083 -0.0424 -0.0281)
          Scholz2015GeometryPathPoint path_point_1:
            PathPoint: humerus_r (-0.00231 -0.145 -0.00933)
      FiberForceLengthCurve: strain_at_zero_force=0 strain_at_one_norm_force=0.7 stiffness_at_low_force=0.2
          stiffness_at_one_norm_force=2.857143 curviness=0.75
    Millard2012EquilibriumMuscle deltoideus_ant_r: max_isometric_force=707.7 optimal_fiber_length=0.094
        tendon_slack_length=0.1009804 pennation_angle_at_optimal=0.08726646
      Scholz2015GeometryPath path:
        path_elements:
          Scholz2015GeometryPathPoint path_point_0:
            PathPoint: clavicle_r (-0.0228 0.0195 0.0841)
          Scholz2015GeometryPathPoint path_point_1:
            PathPoint: scapula_r (0.0196 -0.0066 0.0104)
          Scholz2015GeometryPathPoint path_point_2:
            PathPoint: humerus_r (0.00664 -0.1098 0.00115)
      FiberForceLengthCurve: strain_at_zero_force=0 strain_at_one_norm_force=0.7 stiffness_at_low_force=0.2
          stiffness_at_one_norm_force=2.857143 curviness=0.75
    Millard2012EquilibriumMuscle deltoideus_med_r: max_isometric_force=2597.8 optimal_fiber_length=0.0748
        tendon_slack_length=0.064 pennation_angle_at_optimal=0.08726646 ignore_tendon_compliance=true
      Scholz2015GeometryPath path:
        path_elements:
          Scholz2015GeometryPathPoint path_point_0:
            PathPoint: scapula_r (-0.016 0.00203 0.0078)
          Scholz2015GeometryPathPoint path_point_1:
            PathPoint: scapula_r (-0.0051 -0.0067 0.031)
          Scholz2015GeometryPathPoint path_point_2:
            PathPoint: humerus_r (-0.0043 -0.1005 0.00385)
      FiberForceLengthCurve: strain_at_zero_force=0 strain_at_one_norm_force=0.7 stiffness_at_low_force=0.2
          stiffness_at_one_norm_force=2.857143 curviness=0.75
    Millard2012EquilibriumMuscle deltoideus_post_r: max_isometric_force=1324.4 optimal_fiber_length=0.0949
        tendon_slack_length=0.076 pennation_angle_at_optimal=0.08726646 ignore_tendon_compliance=true
      Scholz2015GeometryPath path:
        path_elements:
          Scholz2015GeometryPathPoint path_point_0:
            PathPoint: scapula_r (-0.0577 -0.0069 -0.0272)
          Scholz2015GeometryPathPoint path_point_1:
            PathPoint: scapula_r (-0.055 -0.0324 0.00735)
          Scholz2015GeometryPathPoint path_point_2:
            PathPoint: humerus_r (-0.0048 -0.0862 0.00624)
      FiberForceLengthCurve: strain_at_zero_force=0 strain_at_one_norm_force=0.7 stiffness_at_low_force=0.2
          stiffness_at_one_norm_force=2.857143 curviness=0.75
    Millard2012EquilibriumMuscle latissimus_sup_r: max_isometric_force=201.6 optimal_fiber_length=0.2109
        tendon_slack_length=0.081 pennation_angle_at_optimal=0 ignore_tendon_compliance=true
      Scholz2015GeometryPath path:
        path_elements:
          Scholz2015GeometryPathPoint path_point_0:
            PathPoint: torso (-0.10088 -0.1166 0.00171)
          Scholz2015GeometryPathObstacle obstacle_0: socket_contact_geometry=/bodyset/torso/thorax_r_obstacle
              contact_hint=(-0.05 0.055 0.0785)
          Scholz2015GeometryPathPoint path_point_1:
            PathPoint: humerus_r (0.01 -0.025 -0.003)
      FiberForceLengthCurve: strain_at_zero_force=0 strain_at_one_norm_force=0.7 stiffness_at_low_force=0.2
          stiffness_at_one_norm_force=2.857143 curviness=0.75
    Millard2012EquilibriumMuscle latissimus_med_r: max_isometric_force=315 optimal_fiber_length=0.2656
        tendon_slack_length=0.0945 pennation_angle_at_optimal=0 ignore_tendon_compliance=true
      Scholz2015GeometryPath path:
        path_elements:
          Scholz2015GeometryPathPoint path_point_0:
            PathPoint: torso (-0.0908 -0.2175 -0.00156)
          Scholz2015GeometryPathObstacle obstacle_0: socket_contact_geometry=/bodyset/torso/thorax_r_obstacle
              contact_hint=(-0.042 0.009 0.085)
          Scholz2015GeometryPathPoint path_point_1:
            PathPoint: humerus_r (0.001 -0.033 -0.002)
      FiberForceLengthCurve: strain_at_zero_force=0 strain_at_one_norm_force=0.7 stiffness_at_low_force=0.2
          stiffness_at_one_norm_force=2.857143 curviness=0.75
    Millard2012EquilibriumMuscle latissimus_inf_r: max_isometric_force=270.2 optimal_fiber_length=0.3062
        tendon_slack_length=0.0621 pennation_angle_at_optimal=0 ignore_tendon_compliance=true
      Scholz2015GeometryPath path:
        path_elements:
          Scholz2015GeometryPathPoint path_point_0:
            PathPoint: pelvis (-0.115 0.0775 0.065)
          Scholz2015GeometryPathPoint path_point_1:
            PathPoint: torso (-0.0627 -0.2548 0.0906)
          Scholz2015GeometryPathObstacle obstacle_0: socket_contact_geometry=/bodyset/torso/thorax_r_obstacle
              contact_hint=(-0.025 -0.03 0.095)
          Scholz2015GeometryPathPoint path_point_2:
            PathPoint: humerus_r (0.003 -0.024 -0.003)
      FiberForceLengthCurve: strain_at_zero_force=0 strain_at_one_norm_force=0.7 stiffness_at_low_force=0.2
          stiffness_at_one_norm_force=2.857143 curviness=0.75
    Millard2012EquilibriumMuscle pectoralis_major_sup_r: max_isometric_force=408.8 optimal_fiber_length=0.1091
        tendon_slack_length=0.014 pennation_angle_at_optimal=0 ignore_tendon_compliance=true
      Scholz2015GeometryPath path:
        path_elements:
          Scholz2015GeometryPathPoint path_point_0:
            PathPoint: clavicle_r (0.0025 0.005 0.05)
          Scholz2015GeometryPathObstacle obstacle_0: socket_contact_geometry=/bodyset/torso/pectoralis_r_obstacle
              contact_hint=(0.065 0.107 0.074)
          Scholz2015GeometryPathPoint path_point_1:
            PathPoint: humerus_r (0.023 -0.015 0.0025)
      FiberForceLengthCurve: strain_at_zero_force=0 strain_at_one_norm_force=0.7 stiffness_at_low_force=0.2
          stiffness_at_one_norm_force=2.857143 curviness=0.75
    Millard2012EquilibriumMuscle pectoralis_major_med_r: max_isometric_force=683.2 optimal_fiber_length=0.15
        tendon_slack_length=0.026 pennation_angle_at_optimal=0 ignore_tendon_compliance=true
      Scholz2015GeometryPath path:
        path_elements:
          Scholz2015GeometryPathPoint path_point_0:
            PathPoint: torso (0.0195 -0.038 0.013)
          Scholz2015GeometryPathObstacle obstacle_0: socket_contact_geometry=/bodyset/torso/pectoralis_r_obstacle
              contact_hint=(0.08 0.1 0.037)
          Scholz2015GeometryPathPoint path_point_1:
            PathPoint: humerus_r (0.02 -0.0262 0.0018)
      FiberForceLengthCurve: strain_at_zero_force=0 strain_at_one_norm_force=0.7 stiffness_at_low_force=0.2
          stiffness_at_one_norm_force=2.857143 curviness=0.75
    Millard2012EquilibriumMuscle pectoralis_major_inf_r: max_isometric_force=571.2 optimal_fiber_length=0.183
        tendon_slack_length=0.043 pennation_angle_at_optimal=0 ignore_tendon_compliance=true
      Scholz2015GeometryPath path:
        path_elements:
          Scholz2015GeometryPathPoint path_point_0:
            PathPoint: torso (0.0532 -0.1157 0.0247)
          Scholz2015GeometryPathObstacle obstacle_0: socket_contact_geometry=/bodyset/torso/pectoralis_r_obstacle
              contact_hint=(0.082 0.05 0.039)
          Scholz2015GeometryPathPoint path_point_1:
            PathPoint: humerus_r (0.02 -0.03 0.005)
      FiberForceLengthCurve: strain_at_zero_force=0 strain_at_one_norm_force=0.7 stiffness_at_low_force=0.2
          stiffness_at_one_norm_force=2.857143 curviness=0.75
    Millard2012EquilibriumMuscle teres_major_r: max_isometric_force=851.2 optimal_fiber_length=0.141
        tendon_slack_length=0.006 pennation_angle_at_optimal=0 ignore_tendon_compliance=true
      Scholz2015GeometryPath path:
        path_elements:
          Scholz2015GeometryPathPoint path_point_0:
            PathPoint: scapula_r (-0.1044 -0.1174 -0.0721)
          Scholz2015GeometryPathPoint path_point_1:
            PathPoint: humerus_r (0.0043 -0.039 -0.0017)
      FiberForceLengthCurve: strain_at_zero_force=0 strain_at_one_norm_force=0.7 stiffness_at_low_force=0.2
          stiffness_at_one_norm_force=2.857143 curviness=0.75
    Millard2012EquilibriumMuscle teres_minor_r: max_isometric_force=695.8 optimal_fiber_length=0.055
        tendon_slack_length=0.051 pennation_angle_at_optimal=0 ignore_tendon_compliance=true
      Scholz2015GeometryPath path:
        path_elements:
          Scholz2015GeometryPathPoint path_point_0:
            PathPoint: scapula_r (-0.0844 -0.0661 -0.0423)
          Scholz2015GeometryPathPoint path_point_1:
            PathPoint: humerus_r (-0.0159 -0.0094 0.0109)
      FiberForceLengthCurve: strain_at_zero_force=0 strain_at_one_norm_force=0.7 stiffness_at_low_force=0.2
          stiffness_at_one_norm_force=2.857143 curviness=0.75
    Millard2012EquilibriumMuscle infraspinatus_inf_r: max_isometric_force=1037.4 optimal_fiber_length=0.0677
        tendon_slack_length=0.084 pennation_angle_at_optimal=0
      Scholz2015GeometryPath path:
        path_elements:
          Scholz2015GeometryPathPoint path_point_0:
            PathPoint: scapula_r (-0.0991 -0.0809 -0.0813)
          Scholz2015GeometryPathPoint path_point_1:
            PathPoint: scapula_r (-0.064 -0.05 -0.032)
          Scholz2015GeometryPathPoint path_point_2:
            PathPoint: humerus_r (-0.025 0.01 0.005)
          Scholz2015GeometryPathPoint path_point_3:
            PathPoint: humerus_r (-0.0135 0.004 0.0125)
      FiberForceLengthCurve: strain_at_zero_force=0 strain_at_one_norm_force=0.7 stiffness_at_low_force=0.2
          stiffness_at_one_norm_force=2.857143 curviness=0.75
    Millard2012EquilibriumMuscle infraspinatus_sup_r: max_isometric_force=967.4 optimal_fiber_length=0.0698
        tendon_slack_length=0.05 pennation_angle_at_optimal=0 ignore_tendon_compliance=true
      Scholz2015GeometryPath path:
        path_elements:
          Scholz2015GeometryPathPoint path_point_0:
            PathPoint: scapula_r (-0.0834 -0.0323 -0.0869)
          Scholz2015GeometryPathPoint path_point_1:
            PathPoint: scapula_r (-0.054 -0.035 -0.045)
          Scholz2015GeometryPathPoint path_point_2:
            PathPoint: humerus_r (-0.025 0.01 0.005)
          Scholz2015GeometryPathPoint path_point_3:
            PathPoint: humerus_r (-0.0135 0.004 0.0125)
      FiberForceLengthCurve: strain_at_zero_force=0 strain_at_one_norm_force=0.7 stiffness_at_low_force=0.2
          stiffness_at_one_norm_force=2.857143 curviness=0.75
    Millard2012EquilibriumMuscle subscapularis_sup_r: max_isometric_force=540.4 optimal_fiber_length=0.07104101
        tendon_slack_length=0.06200325 pennation_angle_at_optimal=0.08726646 ignore_tendon_compliance=true
      Scholz2015GeometryPath path:
        path_elements:
          Scholz2015GeometryPathPoint path_point_0:
            PathPoint: scapula_r (-0.0788 -0.0313 -0.0903)
          Scholz2015GeometryPathPoint path_point_1:
            PathPoint: scapula_r (-0.035 -0.037 -0.042)
          Scholz2015GeometryPathPoint path_point_2:
            PathPoint: humerus_r (0.0074 0.005 -0.022)
          Scholz2015GeometryPathPoint path_point_3:
            PathPoint: humerus_r (0.0225 -0.008 -0.01)
      FiberForceLengthCurve: strain_at_zero_force=0 strain_at_one_norm_force=0.9 stiffness_at_low_force=0.2
          stiffness_at_one_norm_force=2.857143 curviness=0.75
    Millard2012EquilibriumMuscle subscapularis_med_r: max_isometric_force=609 optimal_fiber_length=0.0744
        tendon_slack_length=0.055 pennation_angle_at_optimal=0.08726646 ignore_tendon_compliance=true
      Scholz2015GeometryPath path:
        path_elements:
          Scholz2015GeometryPathPoint path_point_0:
            PathPoint: scapula_r (-0.0836 -0.0549 -0.0747)
          Scholz2015GeometryPathPoint path_point_1:
            PathPoint: scapula_r (-0.035 -0.044 -0.037)
          Scholz2015GeometryPathPoint path_point_2:
            PathPoint: humerus_r (0.0074 0.005 -0.032)
          Scholz2015GeometryPathPoint path_point_3:
            PathPoint: humerus_r (0.0225 -0.008 -0.01)
      FiberForceLengthCurve: strain_at_zero_force=0 strain_at_one_norm_force=0.9 stiffness_at_low_force=0.2
          stiffness_at_one_norm_force=2.857143 curviness=0.75
    Millard2012EquilibriumMuscle subscapularis_inf_r: max_isometric_force=854 optimal_fiber_length=0.08827987
        tendon_slack_length=0.07224011 pennation_angle_at_optimal=0 ignore_tendon_compliance=true
      Scholz2015GeometryPath path:
        path_elements:
          Scholz2015GeometryPathPoint path_point_0:
            PathPoint: scapula_r (-0.0951 -0.0977 -0.0854)
          Scholz2015GeometryPathPoint path_point_1:
            PathPoint: scapula_r (-0.035 -0.045 -0.045)
          Scholz2015GeometryPathPoint path_point_2:
            PathPoint: humerus_r (0.0074 0.005 -0.035)
          Scholz2015GeometryPathPoint path_point_3:
            PathPoint: humerus_r (0.0225 -0.008 -0.01)
      FiberForceLengthCurve: strain_at_zero_force=0 strain_at_one_norm_force=0.7 stiffness_at_low_force=0.2
          stiffness_at_one_norm_force=2.857143 curviness=0.75
    Millard2012EquilibriumMuscle supraspinatus_post_r: max_isometric_force=326.2 optimal_fiber_length=0.079785
        tendon_slack_length=0.03375 pennation_angle_at_optimal=0 ignore_tendon_compliance=true
      Scholz2015GeometryPath path:
        path_elements:
          Scholz2015GeometryPathPoint path_point_0:
            PathPoint: scapula_r (-0.0605 -0.0014 -0.0495)
          Scholz2015GeometryPathPoint path_point_1:
            PathPoint: humerus_r (0 0.031 0.006)
          Scholz2015GeometryPathPoint path_point_2:
            PathPoint: humerus_r (0.014 0.017 0.021)
      FiberForceLengthCurve: strain_at_zero_force=0 strain_at_one_norm_force=0.7 stiffness_at_low_force=0.2
          stiffness_at_one_norm_force=2.857143 curviness=0.75
    Millard2012EquilibriumMuscle supraspinatus_ant_r: max_isometric_force=543.2 optimal_fiber_length=0.07479
        tendon_slack_length=0.04185 pennation_angle_at_optimal=0 ignore_tendon_compliance=true
      Scholz2015GeometryPath path:
        path_elements:
          Scholz2015GeometryPathPoint path_point_0:
            PathPoint: scapula_r (-0.049 0.0014 -0.0692)
          Scholz2015GeometryPathPoint path_point_1:
            PathPoint: humerus_r (0.007 0.033 -0.004)
          Scholz2015GeometryPathPoint path_point_2:
            PathPoint: humerus_r (0.0178 0.0176 0.0096)
      FiberForceLengthCurve: strain_at_zero_force=0 strain_at_one_norm_force=0.7 stiffness_at_low_force=0.2
          stiffness_at_one_norm_force=2.857143 curviness=0.75
    Millard2012EquilibriumMuscle triceps_long_r: max_isometric_force=1580.6 optimal_fiber_length=0.0969
        tendon_slack_length=0.2412 pennation_angle_at_optimal=0.174533
      Scholz2015GeometryPath path:
        path_elements:
          Scholz2015GeometryPathPoint path_point_0:
            PathPoint: scapula_r (-0.0421 -0.0519 -0.0129)
          Scholz2015GeometryPathObstacle obstacle_0: socket_contact_geometry=/bodyset/humerus_r/triceps_r_obstacle
              contact_hint=(-0.01 0.003 -0.055)
          Scholz2015GeometryPathPoint path_point_1:
            PathPoint: ulna_r (-0.031 0.005 0.001)
      FiberForceLengthCurve: strain_at_zero_force=0 strain_at_one_norm_force=0.7 stiffness_at_low_force=0.2
          stiffness_at_one_norm_force=2.857143 curviness=0.75
    Millard2012EquilibriumMuscle biceps_long_r: max_isometric_force=485.8 optimal_fiber_length=0.1421
        tendon_slack_length=0.2568 pennation_angle_at_optimal=0
      Scholz2015GeometryPath path:
        path_elements:
          Scholz2015GeometryPathPoint path_point_0:
            PathPoint: scapula_r (-0.0226 -0.0163 -0.0181)
          Scholz2015GeometryPathPoint path_point_1:
            PathPoint: humerus_r (0.012 0.009 0.0135)
          Scholz2015GeometryPathObstacle obstacle_0: socket_contact_geometry=/bodyset/humerus_r/biceps_r_obstacle
              contact_hint=(0.014 0.007 0.043)
          Scholz2015GeometryPathPoint path_point_2:
            PathPoint: radius_r (0.012 -0.044 0.002)
      FiberForceLengthCurve: strain_at_zero_force=0 strain_at_one_norm_force=0.7 stiffness_at_low_force=0.2
          stiffness_at_one_norm_force=2.857143 curviness=0.75
    Millard2012EquilibriumMuscle biceps_brevis_r: max_isometric_force=693 optimal_fiber_length=0.1264
        tendon_slack_length=0.212 pennation_angle_at_optimal=0
      Scholz2015GeometryPath path:
        path_elements:
          Scholz2015GeometryPathPoint path_point_0:
            PathPoint: scapula_r (0.0095 -0.0382 -0.0242)
          Scholz2015GeometryPathObstacle obstacle_0: socket_contact_geometry=/bodyset/humerus_r/biceps_r_obstacle
              contact_hint=(0.014 -0.018 0.043)
          Scholz2015GeometryPathPoint path_point_1:
            PathPoint: radius_r (0.012 -0.044 0.002)
      FiberForceLengthCurve: strain_at_zero_force=0 strain_at_one_norm_force=0.7 stiffness_at_low_force=0.2
          stiffness_at_one_norm_force=2.857143 curviness=0.75
    Millard2012EquilibriumMuscle coracobrachialis_l: max_isometric_force=648.2 optimal_fiber_length=0.0683
        tendon_slack_length=0.104 pennation_angle_at_optimal=0
      Scholz2015GeometryPath path:
        path_elements:
          Scholz2015GeometryPathPoint path_point_0:
            PathPoint: scapula_l (0.0083 -0.0424 0.0281)
          Scholz2015GeometryPathPoint path_point_1:
            PathPoint: humerus_l (-0.00231 -0.145 0.00933)
      FiberForceLengthCurve: strain_at_zero_force=0 strain_at_one_norm_force=0.7 stiffness_at_low_force=0.2
          stiffness_at_one_norm_force=2.857143 curviness=0.75
    Millard2012EquilibriumMuscle deltoideus_ant_l: max_isometric_force=707.7 optimal_fiber_length=0.094
        tendon_slack_length=0.1009804 pennation_angle_at_optimal=0.08726646
      Scholz2015GeometryPath path:
        path_elements:
          Scholz2015GeometryPathPoint path_point_0:
            PathPoint: clavicle_l (-0.0228 0.0195 -0.0841)
          Scholz2015GeometryPathPoint path_point_1:
            PathPoint: scapula_l (0.0196 -0.0066 -0.0104)
          Scholz2015GeometryPathPoint path_point_2:
            PathPoint: humerus_l (0.00664 -0.1098 -0.00115)
      FiberForceLengthCurve: strain_at_zero_force=0 strain_at_one_norm_force=0.7 stiffness_at_low_force=0.2
          stiffness_at_one_norm_force=2.857143 curviness=0.75
    Millard2012EquilibriumMuscle deltoideus_med_l: max_isometric_force=2597.8 optimal_fiber_length=0.0748
        tendon_slack_length=0.064 pennation_angle_at_optimal=0.08726646 ignore_tendon_compliance=true
      Scholz2015GeometryPath path:
        path_elements:
          Scholz2015GeometryPathPoint path_point_0:
            PathPoint: scapula_l (-0.016 0.00203 -0.0078)
          Scholz2015GeometryPathPoint path_point_1:
            PathPoint: scapula_l (-0.0051 -0.0067 -0.031)
          Scholz2015GeometryPathPoint path_point_2:
            PathPoint: humerus_l (-0.0043 -0.1005 -0.00385)
      FiberForceLengthCurve: strain_at_zero_force=0 strain_at_one_norm_force=0.7 stiffness_at_low_force=0.2
          stiffness_at_one_norm_force=2.857143 curviness=0.75
    Millard2012EquilibriumMuscle deltoideus_post_l: max_isometric_force=1324.4 optimal_fiber_length=0.0949
        tendon_slack_length=0.076 pennation_angle_at_optimal=0.08726646 ignore_tendon_compliance=true
      Scholz2015GeometryPath path:
        path_elements:
          Scholz2015GeometryPathPoint path_point_0:
            PathPoint: scapula_l (-0.0577 -0.0069 0.0272)
          Scholz2015GeometryPathPoint path_point_1:
            PathPoint: scapula_l (-0.055 -0.0324 -0.00735)
          Scholz2015GeometryPathPoint path_point_2:
            PathPoint: humerus_l (-0.0048 -0.0862 -0.00624)
      FiberForceLengthCurve: strain_at_zero_force=0 strain_at_one_norm_force=0.7 stiffness_at_low_force=0.2
          stiffness_at_one_norm_force=2.857143 curviness=0.75
    Millard2012EquilibriumMuscle latissimus_sup_l: max_isometric_force=201.6 optimal_fiber_length=0.2109
        tendon_slack_length=0.081 pennation_angle_at_optimal=0 ignore_tendon_compliance=true
      Scholz2015GeometryPath path:
        path_elements:
          Scholz2015GeometryPathPoint path_point_0:
            PathPoint: torso (-0.10088 -0.1166 -0.00171)
          Scholz2015GeometryPathObstacle obstacle_0: socket_contact_geometry=/bodyset/torso/thorax_l_obstacle
              contact_hint=(-0.05 0.055 -0.0785)
          Scholz2015GeometryPathPoint path_point_1:
            PathPoint: humerus_l (0.01 -0.025 0.003)
      FiberForceLengthCurve: strain_at_zero_force=0 strain_at_one_norm_force=0.7 stiffness_at_low_force=0.2
          stiffness_at_one_norm_force=2.857143 curviness=0.75
    Millard2012EquilibriumMuscle latissimus_med_l: max_isometric_force=315 optimal_fiber_length=0.2656
        tendon_slack_length=0.0945 pennation_angle_at_optimal=0 ignore_tendon_compliance=true
      Scholz2015GeometryPath path:
        path_elements:
          Scholz2015GeometryPathPoint path_point_0:
            PathPoint: torso (-0.0908 -0.2175 0.00156)
          Scholz2015GeometryPathObstacle obstacle_0: socket_contact_geometry=/bodyset/torso/thorax_l_obstacle
              contact_hint=(-0.042 0.009 -0.085)
          Scholz2015GeometryPathPoint path_point_1:
            PathPoint: humerus_l (0.001 -0.033 0.002)
      FiberForceLengthCurve: strain_at_zero_force=0 strain_at_one_norm_force=0.7 stiffness_at_low_force=0.2
          stiffness_at_one_norm_force=2.857143 curviness=0.75
    Millard2012EquilibriumMuscle latissimus_inf_l: max_isometric_force=270.2 optimal_fiber_length=0.3062
        tendon_slack_length=0.0621 pennation_angle_at_optimal=0 ignore_tendon_compliance=true
      Scholz2015GeometryPath path:
        path_elements:
          Scholz2015GeometryPathPoint path_point_0:
            PathPoint: pelvis (-0.115 0.0775 -0.065)
          Scholz2015GeometryPathPoint path_point_1:
            PathPoint: torso (-0.0627 -0.2548 -0.0906)
          Scholz2015GeometryPathObstacle obstacle_0: socket_contact_geometry=/bodyset/torso/thorax_l_obstacle
              contact_hint=(-0.025 -0.03 -0.095)
          Scholz2015GeometryPathPoint path_point_2:
            PathPoint: humerus_l (0.003 -0.024 0.003)
      FiberForceLengthCurve: strain_at_zero_force=0 strain_at_one_norm_force=0.7 stiffness_at_low_force=0.2
          stiffness_at_one_norm_force=2.857143 curviness=0.75
    Millard2012EquilibriumMuscle pectoralis_major_sup_l: max_isometric_force=408.8 optimal_fiber_length=0.1091
        tendon_slack_length=0.014 pennation_angle_at_optimal=0 ignore_tendon_compliance=true
      Scholz2015GeometryPath path:
        path_elements:
          Scholz2015GeometryPathPoint path_point_0:
            PathPoint: clavicle_l (0.0025 0.005 -0.05)
          Scholz2015GeometryPathObstacle obstacle_0: socket_contact_geometry=/bodyset/torso/pectoralis_l_obstacle
              contact_hint=(0.065 0.107 -0.074)
          Scholz2015GeometryPathPoint path_point_1:
            PathPoint: humerus_l (0.023 -0.015 0.0025)
      FiberForceLengthCurve: strain_at_zero_force=0 strain_at_one_norm_force=0.7 stiffness_at_low_force=0.2
          stiffness_at_one_norm_force=2.857143 curviness=0.75
    Millard2012EquilibriumMuscle pectoralis_major_med_l: max_isometric_force=683.2 optimal_fiber_length=0.15
        tendon_slack_length=0.026 pennation_angle_at_optimal=0 ignore_tendon_compliance=true
      Scholz2015GeometryPath path:
        path_elements:
          Scholz2015GeometryPathPoint path_point_0:
            PathPoint: torso (0.0195 -0.038 -0.013)
          Scholz2015GeometryPathObstacle obstacle_0: socket_contact_geometry=/bodyset/torso/pectoralis_l_obstacle
              contact_hint=(0.08 0.1 -0.037)
          Scholz2015GeometryPathPoint path_point_1:
            PathPoint: humerus_l (0.02 -0.0262 -0.0018)
      FiberForceLengthCurve: strain_at_zero_force=0 strain_at_one_norm_force=0.7 stiffness_at_low_force=0.2
          stiffness_at_one_norm_force=2.857143 curviness=0.75
    Millard2012EquilibriumMuscle pectoralis_major_inf_l: max_isometric_force=571.2 optimal_fiber_length=0.183
        tendon_slack_length=0.043 pennation_angle_at_optimal=0 ignore_tendon_compliance=true
      Scholz2015GeometryPath path:
        path_elements:
          Scholz2015GeometryPathPoint path_point_0:
            PathPoint: torso (0.0532 -0.1157 -0.0247)
          Scholz2015GeometryPathObstacle obstacle_0: socket_contact_geometry=/bodyset/torso/pectoralis_l_obstacle
              contact_hint=(0.082 0.05 -0.039)
          Scholz2015GeometryPathPoint path_point_1:
            PathPoint: humerus_l (0.02 -0.03 -0.005)
      FiberForceLengthCurve: strain_at_zero_force=0 strain_at_one_norm_force=0.7 stiffness_at_low_force=0.2
          stiffness_at_one_norm_force=2.857143 curviness=0.75
    Millard2012EquilibriumMuscle teres_major_l: max_isometric_force=851.2 optimal_fiber_length=0.141
        tendon_slack_length=0.006 pennation_angle_at_optimal=0 ignore_tendon_compliance=true
      Scholz2015GeometryPath path:
        path_elements:
          Scholz2015GeometryPathPoint path_point_0:
            PathPoint: scapula_l (-0.1044 -0.1174 0.0721)
          Scholz2015GeometryPathPoint path_point_1:
            PathPoint: humerus_l (0.0043 -0.039 0.0017)
      FiberForceLengthCurve: strain_at_zero_force=0 strain_at_one_norm_force=0.7 stiffness_at_low_force=0.2
          stiffness_at_one_norm_force=2.857143 curviness=0.75
    Millard2012EquilibriumMuscle teres_minor_l: max_isometric_force=695.8 optimal_fiber_length=0.055
        tendon_slack_length=0.051 pennation_angle_at_optimal=0 ignore_tendon_compliance=true
      Scholz2015GeometryPath path:
        path_elements:
          Scholz2015GeometryPathPoint path_point_0:
            PathPoint: scapula_l (-0.0844 -0.0661 0.0423)
          Scholz2015GeometryPathPoint path_point_1:
            PathPoint: humerus_l (-0.0159 -0.0094 -0.0109)
      FiberForceLengthCurve: strain_at_zero_force=0 strain_at_one_norm_force=0.7 stiffness_at_low_force=0.2
          stiffness_at_one_norm_force=2.857143 curviness=0.75
    Millard2012EquilibriumMuscle infraspinatus_inf_l: max_isometric_force=1037.4 optimal_fiber_length=0.0677
        tendon_slack_length=0.084 pennation_angle_at_optimal=0
      Scholz2015GeometryPath path:
        path_elements:
          Scholz2015GeometryPathPoint path_point_0:
            PathPoint: scapula_l (-0.0991 -0.0809 0.0813)
          Scholz2015GeometryPathPoint path_point_1:
            PathPoint: scapula_l (-0.064 -0.05 0.032)
          Scholz2015GeometryPathPoint path_point_2:
            PathPoint: humerus_l (-0.025 0.01 -0.005)
          Scholz2015GeometryPathPoint path_point_3:
            PathPoint: humerus_l (-0.0135 0.004 -0.0125)
      FiberForceLengthCurve: strain_at_zero_force=0 strain_at_one_norm_force=0.7 stiffness_at_low_force=0.2
          stiffness_at_one_norm_force=2.857143 curviness=0.75
    Millard2012EquilibriumMuscle infraspinatus_sup_l: max_isometric_force=967.4 optimal_fiber_length=0.0698
        tendon_slack_length=0.05 pennation_angle_at_optimal=0 ignore_tendon_compliance=true
      Scholz2015GeometryPath path:
        path_elements:
          Scholz2015GeometryPathPoint path_point_0:
            PathPoint: scapula_l (-0.0834 -0.0323 0.0869)
          Scholz2015GeometryPathPoint path_point_1:
            PathPoint: scapula_l (-0.054 -0.035 0.045)
          Scholz2015GeometryPathPoint path_point_2:
            PathPoint: humerus_l (-0.025 0.01 -0.005)
          Scholz2015GeometryPathPoint path_point_3:
            PathPoint: humerus_l (-0.0135 0.004 -0.0125)
      FiberForceLengthCurve: strain_at_zero_force=0 strain_at_one_norm_force=0.7 stiffness_at_low_force=0.2
          stiffness_at_one_norm_force=2.857143 curviness=0.75
    Millard2012EquilibriumMuscle subscapularis_sup_l: max_isometric_force=540.4 optimal_fiber_length=0.07104101
        tendon_slack_length=0.06200325 pennation_angle_at_optimal=0.08726646 ignore_tendon_compliance=true
      Scholz2015GeometryPath path:
        path_elements:
          Scholz2015GeometryPathPoint path_point_0:
            PathPoint: scapula_l (-0.0788 -0.0313 0.0903)
          Scholz2015GeometryPathPoint path_point_1:
            PathPoint: scapula_l (-0.035 -0.037 0.042)
          Scholz2015GeometryPathPoint path_point_2:
            PathPoint: humerus_l (0.0074 0.005 0.022)
          Scholz2015GeometryPathPoint path_point_3:
            PathPoint: humerus_l (0.0225 -0.008 0.01)
      FiberForceLengthCurve: strain_at_zero_force=0 strain_at_one_norm_force=0.9 stiffness_at_low_force=0.2
          stiffness_at_one_norm_force=2.857143 curviness=0.75
    Millard2012EquilibriumMuscle subscapularis_med_l: max_isometric_force=609 optimal_fiber_length=0.0744
        tendon_slack_length=0.055 pennation_angle_at_optimal=0.08726646 ignore_tendon_compliance=true
      Scholz2015GeometryPath path:
        path_elements:
          Scholz2015GeometryPathPoint path_point_0:
            PathPoint: scapula_l (-0.0836 -0.0549 0.0747)
          Scholz2015GeometryPathPoint path_point_1:
            PathPoint: scapula_l (-0.035 -0.044 0.037)
          Scholz2015GeometryPathPoint path_point_2:
            PathPoint: humerus_l (0.0074 0.005 0.032)
          Scholz2015GeometryPathPoint path_point_3:
            PathPoint: humerus_l (0.0225 -0.008 0.01)
      FiberForceLengthCurve: strain_at_zero_force=0 strain_at_one_norm_force=0.9 stiffness_at_low_force=0.2
          stiffness_at_one_norm_force=2.857143 curviness=0.75
    Millard2012EquilibriumMuscle subscapularis_inf_l: max_isometric_force=854 optimal_fiber_length=0.08827987
        tendon_slack_length=0.07224011 pennation_angle_at_optimal=0 ignore_tendon_compliance=true
      Scholz2015GeometryPath path:
        path_elements:
          Scholz2015GeometryPathPoint path_point_0:
            PathPoint: scapula_l (-0.0951 -0.0977 0.0854)
          Scholz2015GeometryPathPoint path_point_1:
            PathPoint: scapula_l (-0.035 -0.045 0.045)
          Scholz2015GeometryPathPoint path_point_2:
            PathPoint: humerus_l (0.0074 0.005 0.035)
          Scholz2015GeometryPathPoint path_point_3:
            PathPoint: humerus_l (0.0225 -0.008 0.01)
      FiberForceLengthCurve: strain_at_zero_force=0 strain_at_one_norm_force=0.7 stiffness_at_low_force=0.2
          stiffness_at_one_norm_force=2.857143 curviness=0.75
    Millard2012EquilibriumMuscle supraspinatus_post_l: max_isometric_force=326.2 optimal_fiber_length=0.079785
        tendon_slack_length=0.03375 pennation_angle_at_optimal=0 ignore_tendon_compliance=true
      Scholz2015GeometryPath path:
        path_elements:
          Scholz2015GeometryPathPoint path_point_0:
            PathPoint: scapula_l (-0.0605 -0.0014 0.0495)
          Scholz2015GeometryPathPoint path_point_1:
            PathPoint: humerus_l (0 0.031 -0.006)
          Scholz2015GeometryPathPoint path_point_2:
            PathPoint: humerus_l (0.014 0.017 -0.021)
      FiberForceLengthCurve: strain_at_zero_force=0 strain_at_one_norm_force=0.7 stiffness_at_low_force=0.2
          stiffness_at_one_norm_force=2.857143 curviness=0.75
    Millard2012EquilibriumMuscle supraspinatus_ant_l: max_isometric_force=543.2 optimal_fiber_length=0.07479
        tendon_slack_length=0.04185 pennation_angle_at_optimal=0 ignore_tendon_compliance=true
      Scholz2015GeometryPath path:
        path_elements:
          Scholz2015GeometryPathPoint path_point_0:
            PathPoint: scapula_l (-0.049 0.0014 0.0692)
          Scholz2015GeometryPathPoint path_point_1:
            PathPoint: humerus_l (0.007 0.033 0.004)
          Scholz2015GeometryPathPoint path_point_2:
            PathPoint: humerus_l (0.0178 0.0176 -0.0096)
      FiberForceLengthCurve: strain_at_zero_force=0 strain_at_one_norm_force=0.7 stiffness_at_low_force=0.2
          stiffness_at_one_norm_force=2.857143 curviness=0.75
    Millard2012EquilibriumMuscle triceps_long_l: max_isometric_force=1580.6 optimal_fiber_length=0.0969
        tendon_slack_length=0.2412 pennation_angle_at_optimal=0.174533
      Scholz2015GeometryPath path:
        path_elements:
          Scholz2015GeometryPathPoint path_point_0:
            PathPoint: scapula_l (-0.0421 -0.0519 0.0129)
          Scholz2015GeometryPathObstacle obstacle_0: socket_contact_geometry=/bodyset/humerus_l/triceps_l_obstacle
              contact_hint=(-0.01 0.003 0.055)
          Scholz2015GeometryPathPoint path_point_1:
            PathPoint: ulna_l (-0.031 0.005 -0.001)
      FiberForceLengthCurve: strain_at_zero_force=0 strain_at_one_norm_force=0.7 stiffness_at_low_force=0.2
          stiffness_at_one_norm_force=2.857143 curviness=0.75
    Millard2012EquilibriumMuscle biceps_long_l: max_isometric_force=485.8 optimal_fiber_length=0.1421
        tendon_slack_length=0.2568 pennation_angle_at_optimal=0
      Scholz2015GeometryPath path:
        path_elements:
          Scholz2015GeometryPathPoint path_point_0:
            PathPoint: scapula_l (-0.0226 -0.0163 0.0181)
          Scholz2015GeometryPathPoint path_point_1:
            PathPoint: humerus_l (0.012 0.009 -0.0135)
          Scholz2015GeometryPathObstacle obstacle_0: socket_contact_geometry=/bodyset/humerus_l/biceps_l_obstacle
              contact_hint=(0.014 0.007 -0.043)
          Scholz2015GeometryPathPoint path_point_2:
            PathPoint: radius_l (0.012 -0.044 -0.002)
      FiberForceLengthCurve: strain_at_zero_force=0 strain_at_one_norm_force=0.7 stiffness_at_low_force=0.2
          stiffness_at_one_norm_force=2.857143 curviness=0.75
    Millard2012EquilibriumMuscle biceps_brevis_l: max_isometric_force=693 optimal_fiber_length=0.1264
        tendon_slack_length=0.212 pennation_angle_at_optimal=0
      Scholz2015GeometryPath path:
        path_elements:
          Scholz2015GeometryPathPoint path_point_0:
            PathPoint: scapula_l (0.0095 -0.0382 0.0242)
          Scholz2015GeometryPathObstacle obstacle_0: socket_contact_geometry=/bodyset/humerus_l/biceps_l_obstacle
              contact_hint=(0.014 -0.018 -0.043)
          Scholz2015GeometryPathPoint path_point_1:
            PathPoint: radius_l (0.012 -0.044 -0.002)
      FiberForceLengthCurve: strain_at_zero_force=0 strain_at_one_norm_force=0.7 stiffness_at_low_force=0.2
          stiffness_at_one_norm_force=2.857143 curviness=0.75
    Millard2012EquilibriumMuscle extobl_r: max_isometric_force=900 optimal_fiber_length=0.11355
        tendon_slack_length=0.132474 pennation_angle_at_optimal=0
      Scholz2015GeometryPath path:
        path_elements:
          Scholz2015GeometryPathPoint path_point_0:
            PathPoint: pelvis (-0.029 -0.067 0.0145)
          Scholz2015GeometryPathPoint path_point_1:
            PathPoint: torso (0.051 -0.27 0.113)
      FiberForceLengthCurve: strain_at_zero_force=0 strain_at_one_norm_force=1.5 stiffness_at_low_force=0.2
          stiffness_at_one_norm_force=2.857143 curviness=0.75
    Millard2012EquilibriumMuscle extobl_l: max_isometric_force=900 optimal_fiber_length=0.11355
        tendon_slack_length=0.132474 pennation_angle_at_optimal=0
      Scholz2015GeometryPath path:
        path_elements:
          Scholz2015GeometryPathPoint path_point_0:
            PathPoint: pelvis (-0.029 -0.067 -0.0145)
          Scholz2015GeometryPathPoint path_point_1:
            PathPoint: torso (0.051 -0.27 -0.113)
      FiberForceLengthCurve: strain_at_zero_force=0 strain_at_one_norm_force=1.5 stiffness_at_low_force=0.2
          stiffness_at_one_norm_force=2.857143 curviness=0.75
    Millard2012EquilibriumMuscle intobl_r: max_isometric_force=900 optimal_fiber_length=0.094183
        tendon_slack_length=0.094183 pennation_angle_at_optimal=0
      Scholz2015GeometryPath path:
        path_elements:
          Scholz2015GeometryPathPoint path_point_0:
            PathPoint: pelvis (-0.0445 0.0715 0.115)
          Scholz2015GeometryPathPoint path_point_1:
            PathPoint: torso (0.0675 -0.228 0.0225)
      FiberForceLengthCurve: strain_at_zero_force=0 strain_at_one_norm_force=1.5 stiffness_at_low_force=0.2
          stiffness_at_one_norm_force=2.857143 curviness=0.75
    Millard2012EquilibriumMuscle intobl_l: max_isometric_force=900 optimal_fiber_length=0.094183
        tendon_slack_length=0.094183 pennation_angle_at_optimal=0
      Scholz2015GeometryPath path:
        path_elements:
          Scholz2015GeometryPathPoint path_point_0:
            PathPoint: pelvis (-0.0445 0.0715 -0.115)
          Scholz2015GeometryPathPoint path_point_1:
            PathPoint: torso (0.0675 -0.228 -0.0225)
      FiberForceLengthCurve: strain_at_zero_force=0 strain_at_one_norm_force=1.5 stiffness_at_low_force=0.2
          stiffness_at_one_norm_force=2.857143 curviness=0.75
    Millard2012EquilibriumMuscle addbrev_r: max_isometric_force=625.8197 optimal_fiber_length=0.1031
        tendon_slack_length=0.03545029 pennation_angle_at_optimal=0.1147809 ignore_tendon_compliance=true
      Scholz2015GeometryPath path:
        path_elements:
          Scholz2015GeometryPathPoint path_point_0:
            PathPoint: pelvis (-0.0191 -0.094 0.0154)
          Scholz2015GeometryPathObstacle obstacle_0: socket_contact_geometry=/bodyset/femur_r/addbrev_r_obstacle
              contact_hint=(-0.03 0 0.005)
          Scholz2015GeometryPathPoint path_point_1:
            PathPoint: femur_r (-0.002 -0.118 0.0249)
      FiberForceLengthCurve: strain_at_zero_force=-0.1844454 strain_at_one_norm_force=1 stiffness_at_low_force=0.2
          stiffness_at_one_norm_force=2.896851 curviness=0.75
    Millard2012EquilibriumMuscle addlong_r: max_isometric_force=916.8 optimal_fiber_length=0.1082
        tendon_slack_length=0.1317994 pennation_angle_at_optimal=0.1377704
      Scholz2015GeometryPath path:
        path_elements:
          Scholz2015GeometryPathPoint path_point_0:
            PathPoint: pelvis (-0.025 -0.0889 0.01888)
          Scholz2015GeometryPathObstacle obstacle_0: socket_contact_geometry=/bodyset/femur_r/addlong_r_obstacle
              contact_hint=(-0.03 0 0.005)
          Scholz2015GeometryPathPoint path_point_1:
            PathPoint: femur_r (0.01126 -0.23937 0.01583)
      FiberForceLengthCurve: strain_at_zero_force=-0.1942012 strain_at_one_norm_force=1 stiffness_at_low_force=0.2
          stiffness_at_one_norm_force=2.875548 curviness=0.75
    Millard2012EquilibriumMuscle addmagDist_r: max_isometric_force=597.2951 optimal_fiber_length=0.1772
        tendon_slack_length=0.0873807 pennation_angle_at_optimal=0.194705 ignore_tendon_compliance=true
      Scholz2015GeometryPath path:
        path_elements:
          Scholz2015GeometryPathPoint path_point_0:
            PathPoint: pelvis (-0.07404 -0.12767 0.03982)
          Scholz2015GeometryPathObstacle obstacle_0: socket_contact_geometry=/bodyset/femur_r/addmagDist_r_obstacle
              contact_hint=(-0.04 -0.01 -0.007)
          Scholz2015GeometryPathPoint path_point_1:
            PathPoint: femur_r (0.01125 -0.2625 0.0193)
      FiberForceLengthCurve: strain_at_zero_force=9.713794e-8 strain_at_one_norm_force=0.7000001
          stiffness_at_low_force=0.2 stiffness_at_one_norm_force=2.857143 curviness=0.75
    Millard2012EquilibriumMuscle addmagIsch_r: max_isometric_force=597.2951 optimal_fiber_length=0.1562
        tendon_slack_length=0.216343 pennation_angle_at_optimal=0.1680443
      Scholz2015GeometryPath path:
        path_elements:
          Scholz2015GeometryPathPoint path_point_0:
            PathPoint: pelvis (-0.08962 -0.12976 0.04171)
          Scholz2015GeometryPathObstacle obstacle_0: socket_contact_geometry=/bodyset/femur_r/addmagIsch_r_obstacle
              contact_hint=(0 -0.05 0)
          Scholz2015GeometryPathPoint path_point_1:
            PathPoint: femur_r (0.00481 -0.38797 -0.03273)
      FiberForceLengthCurve: strain_at_zero_force=0.005651991 strain_at_one_norm_force=0.7000408
          stiffness_at_low_force=0.2 stiffness_at_one_norm_force=2.880231 curviness=0.75
    Millard2012EquilibriumMuscle addmagMid_r: max_isometric_force=597.2951 optimal_fiber_length=0.1377
        tendon_slack_length=0.0466277 pennation_angle_at_optimal=0.2073076 ignore_tendon_compliance=true
      Scholz2015GeometryPath path:
        path_elements:
          Scholz2015GeometryPathPoint path_point_0:
            PathPoint: pelvis (-0.05266 -0.12075 0.02854)
          Scholz2015GeometryPathObstacle obstacle_0: socket_contact_geometry=/bodyset/femur_r/addmagMid_r_obstacle
              contact_hint=(-0.03 0 0.005)
          Scholz2015GeometryPathPoint path_point_1:
            PathPoint: femur_r (0.00242 -0.1624 0.02922)
      FiberForceLengthCurve: strain_at_zero_force=1.776572e-8 strain_at_one_norm_force=0.7000001
          stiffness_at_low_force=0.2 stiffness_at_one_norm_force=2.857143 curviness=0.75
    Millard2012EquilibriumMuscle addmagProx_r: max_isometric_force=597.2951 optimal_fiber_length=0.1056
        tendon_slack_length=0.0403241 pennation_angle_at_optimal=0.3114833 ignore_tendon_compliance=true
      Scholz2015GeometryPath path:
        path_elements:
          Scholz2015GeometryPathPoint path_point_0:
            PathPoint: pelvis (-0.03098 -0.10755 0.01365)
          Scholz2015GeometryPathObstacle obstacle_0: socket_contact_geometry=/bodyset/femur_r/addmagProx_r_obstacle
              contact_hint=(-0.03 0 0.005)
          Scholz2015GeometryPathPoint path_point_1:
            PathPoint: femur_r (-0.01527 -0.07886 0.03202)
      FiberForceLengthCurve: strain_at_zero_force=8.055312e-8 strain_at_one_norm_force=0.7000001
          stiffness_at_low_force=0.2 stiffness_at_one_norm_force=2.857143 curviness=0.75
    Millard2012EquilibriumMuscle bflh_r: max_isometric_force=1313.184 optimal_fiber_length=0.1073606
        tendon_slack_length=0.36575 pennation_angle_at_optimal=0.1759182
      Scholz2015GeometryPath path:
        path_elements:
          Scholz2015GeometryPathPoint path_point_0:
            PathPoint: pelvis (-0.134 -0.1191 0.0586)
          Scholz2015GeometryPathPoint path_point_1:
            PathPoint: tibia_r (-0.03436 -0.03648 0.03618)
          Scholz2015GeometryPathPoint path_point_2:
            PathPoint: tibia_r (-0.02704 -0.05008 0.03476)
      FiberForceLengthCurve: strain_at_zero_force=0.1368428 strain_at_one_norm_force=1.058102
          stiffness_at_low_force=0.2 stiffness_at_one_norm_force=3.517666 curviness=0.75
    Millard2012EquilibriumMuscle bfsh_r: max_isometric_force=557.1148 optimal_fiber_length=0.1103007
        tendon_slack_length=0.1058179 pennation_angle_at_optimal=0.2642232 ignore_tendon_compliance=true
      Scholz2015GeometryPath path:
        path_elements:
          Scholz2015GeometryPathPoint path_point_0:
            PathPoint: femur_r (0.005 -0.2111 0.0234)
          Scholz2015GeometryPathPoint path_point_1:
            PathPoint: tibia_r (-0.02866 -0.03284 0.03204)
      FiberForceLengthCurve: strain_at_zero_force=0.04380442 strain_at_one_norm_force=0.6994891
          stiffness_at_low_force=0.2 stiffness_at_one_norm_force=3.050247 curviness=0.75
    Millard2012EquilibriumMuscle edl_r: max_isometric_force=603.4982 optimal_fiber_length=0.0693
        tendon_slack_length=0.3688752 pennation_angle_at_optimal=0.2182582
      Scholz2015GeometryPath path:
        path_elements:
          Scholz2015GeometryPathPoint path_point_0:
            PathPoint: tibia_r (-0.016 -0.1157 0.0205)
          Scholz2015GeometryPathPoint path_point_1:
            PathPoint: tibia_r (0.0164 -0.376 0.0112)
          Scholz2015GeometryPathPoint path_point_2:
            PathPoint: calcn_r (0.0919 0.036 0.0008)
          Scholz2015GeometryPathPoint path_point_3:
            PathPoint: calcn_r (0.1616 0.0055 0.013)
          Scholz2015GeometryPathPoint path_point_4:
            PathPoint: toes_r (0.0003 0.0047 0.0153)
          Scholz2015GeometryPathPoint path_point_5:
            PathPoint: toes_r (0.0443 -0.0004 0.025)
      FiberForceLengthCurve: strain_at_zero_force=0.1015352 strain_at_one_norm_force=0.7074931
          stiffness_at_low_force=0.2 stiffness_at_one_norm_force=3.30056 curviness=0.75
    Millard2012EquilibriumMuscle ehl_r: max_isometric_force=285.8675 optimal_fiber_length=0.0748
        tendon_slack_length=0.3267953 pennation_angle_at_optimal=0.1972681
      Scholz2015GeometryPath path:
        path_elements:
          Scholz2015GeometryPathPoint path_point_0:
            PathPoint: tibia_r (-0.014 -0.155 0.0189)
          Scholz2015GeometryPathPoint path_point_1:
            PathPoint: tibia_r (0.0071 -0.2909 0.0164)
          Scholz2015GeometryPathPoint path_point_2:
            PathPoint: tibia_r (0.02 -0.3693 -0.0028)
          Scholz2015GeometryPathPoint path_point_3:
            PathPoint: calcn_r (0.097 0.0389 -0.0211)
          Scholz2015GeometryPathPoint path_point_4:
            PathPoint: calcn_r (0.1293 0.0309 -0.0257)
          Scholz2015GeometryPathPoint path_point_5:
            PathPoint: calcn_r (0.1734 0.0139 -0.028)
          Scholz2015GeometryPathPoint path_point_6:
            PathPoint: toes_r (0.0298 0.0041 -0.0245)
          Scholz2015GeometryPathPoint path_point_7:
            PathPoint: toes_r (0.0563 0.0034 -0.0186)
      FiberForceLengthCurve: strain_at_zero_force=0.08168779 strain_at_one_norm_force=0.7147756
          stiffness_at_low_force=0.2 stiffness_at_one_norm_force=3.159119 curviness=0.75
    Millard2012EquilibriumMuscle fdl_r: max_isometric_force=423.177 optimal_fiber_length=0.0446
        tendon_slack_length=0.3787729 pennation_angle_at_optimal=0.2248391
      Scholz2015GeometryPath path:
        path_elements:
          Scholz2015GeometryPathPoint path_point_0:
            PathPoint: tibia_r (-0.0023 -0.1832 -0.0018)
          Scholz2015GeometryPathPoint path_point_1:
            PathPoint: tibia_r (-0.0176 -0.3645 -0.0124)
          Scholz2015GeometryPathPoint path_point_2:
            PathPoint: calcn_r (0.0436 0.0315 -0.028)
          Scholz2015GeometryPathPoint path_point_3:
            PathPoint: calcn_r (0.0708 0.0176 -0.0263)
          Scholz2015GeometryPathPoint path_point_4:
            PathPoint: calcn_r (0.1658 -0.0081 0.0116)
          Scholz2015GeometryPathPoint path_point_5:
            PathPoint: toes_r (-0.0019 -0.0078 0.0147)
          Scholz2015GeometryPathPoint path_point_6:
            PathPoint: toes_r (0.0285 -0.0071 0.0215)
          Scholz2015GeometryPathPoint path_point_7:
            PathPoint: toes_r (0.0441 -0.006 0.0242)
      FiberForceLengthCurve: strain_at_zero_force=-0.006468795 strain_at_one_norm_force=0.6998542
          stiffness_at_low_force=0.2 stiffness_at_one_norm_force=2.831566 curviness=0.75
    Millard2012EquilibriumMuscle fhl_r: max_isometric_force=907.8393 optimal_fiber_length=0.0527
        tendon_slack_length=0.3543397 pennation_angle_at_optimal=0.2580255
      Scholz2015GeometryPath path:
        path_elements:
          Scholz2015GeometryPathPoint path_point_0:
            PathPoint: tibia_r (-0.031 -0.2163 0.02)
          Scholz2015GeometryPathPoint path_point_1:
            PathPoint: tibia_r (-0.0242 -0.3671 -0.0076)
          Scholz2015GeometryPathPoint path_point_2:
            PathPoint: calcn_r (0.0374 0.0276 -0.0241)
          Scholz2015GeometryPathPoint path_point_3:
            PathPoint: calcn_r (0.1038 0.0068 -0.0256)
          Scholz2015GeometryPathPoint path_point_4:
            PathPoint: calcn_r (0.1726 -0.0053 -0.0269)
          Scholz2015GeometryPathPoint path_point_5:
            PathPoint: toes_r (0.0155 -0.0064 -0.0265)
          Scholz2015GeometryPathPoint path_point_6:
            PathPoint: toes_r (0.0562 -0.0102 -0.0181)
      FiberForceLengthCurve: strain_at_zero_force=0.007614866 strain_at_one_norm_force=0.7001852
          stiffness_at_low_force=0.2 stiffness_at_one_norm_force=2.887793 curviness=0.75
    Millard2012EquilibriumMuscle gaslat_r: max_isometric_force=1575.059 optimal_fiber_length=0.069
        tendon_slack_length=0.374 pennation_angle_at_optimal=0.2102268
      Scholz2015GeometryPath path:
        path_elements:
          Scholz2015GeometryPathPoint path_point_0:
            PathPoint: femur_r (0.002 -0.381 0.02059)
          Scholz2015GeometryPathObstacle obstacle_0: socket_contact_geometry=/bodyset/tibia_r/gaslat_r_obstacle
              contact_hint=(0.005 -0.075 0)
          Scholz2015GeometryPathPoint path_point_1:
            PathPoint: calcn_r (0.0044 0.031 -0.0053)
      FiberForceLengthCurve: strain_at_zero_force=-0.1932361 strain_at_one_norm_force=0.6636807
          stiffness_at_low_force=0.2 stiffness_at_one_norm_force=2.333949 curviness=0.75
    Millard2012EquilibriumMuscle gasmed_r: max_isometric_force=3115.515 optimal_fiber_length=0.059
        tendon_slack_length=0.387 pennation_angle_at_optimal=0.1656816
      Scholz2015GeometryPath path:
        path_elements:
          Scholz2015GeometryPathPoint path_point_0:
            PathPoint: femur_r (0.006 -0.385 -0.022)
          Scholz2015GeometryPathObstacle obstacle_0: socket_contact_geometry=/bodyset/tibia_r/gasmed_r_obstacle
              contact_hint=(0.005 -0.07 0.001)
          Scholz2015GeometryPathPoint path_point_1:
            PathPoint: calcn_r (0.0044 0.031 -0.0053)
      FiberForceLengthCurve: strain_at_zero_force=0.1506325 strain_at_one_norm_force=0.550636
          stiffness_at_low_force=0.2 stiffness_at_one_norm_force=4.999956 curviness=0.75
    Millard2012EquilibriumMuscle glmax1_r: max_isometric_force=983.7836 optimal_fiber_length=0.147
        tendon_slack_length=0.0873 pennation_angle_at_optimal=0.3540118 ignore_tendon_compliance=true
      Scholz2015GeometryPath path:
        path_elements:
          Scholz2015GeometryPathPoint path_point_0:
            PathPoint: pelvis (-0.126 0.065 0.066)
          Scholz2015GeometryPathPoint path_point_1:
            PathPoint: pelvis (-0.125 -0.023 0.09)
          Scholz2015GeometryPathPoint path_point_2:
            PathPoint: femur_r (-0.045 -0.015 0.035)
          Scholz2015GeometryPathPoint path_point_3:
            PathPoint: femur_r (-0.028 -0.045 0.052)
      FiberForceLengthCurve: strain_at_zero_force=2.229005e-7 strain_at_one_norm_force=0.6999999
          stiffness_at_low_force=0.2 stiffness_at_one_norm_force=2.857144 curviness=0.75
    Millard2012EquilibriumMuscle glmax2_r: max_isometric_force=1406.046 optimal_fiber_length=0.157
        tendon_slack_length=0.109 pennation_angle_at_optimal=0.3673821 ignore_tendon_compliance=true
      Scholz2015GeometryPath path:
        path_elements:
          Scholz2015GeometryPathPoint path_point_0:
            PathPoint: pelvis (-0.14 0.02 0.058)
          Scholz2015GeometryPathPoint path_point_1:
            PathPoint: pelvis (-0.145 -0.045 0.085)
          Scholz2015GeometryPathPoint path_point_2:
            PathPoint: femur_r (-0.056 -0.046 0.03)
          Scholz2015GeometryPathPoint path_point_3:
            PathPoint: femur_r (-0.01 -0.09 0.048)
      FiberForceLengthCurve: strain_at_zero_force=1.628612e-7 strain_at_one_norm_force=0.7000001
          stiffness_at_low_force=0.2 stiffness_at_one_norm_force=2.857143 curviness=0.75
    Millard2012EquilibriumMuscle glmax3_r: max_isometric_force=947.7541 optimal_fiber_length=0.167
        tendon_slack_length=0.103 pennation_angle_at_optimal=0.3824161 ignore_tendon_compliance=true
      Scholz2015GeometryPath path:
        path_elements:
          Scholz2015GeometryPathPoint path_point_0:
            PathPoint: pelvis (-0.158 0.008 0.028)
          Scholz2015GeometryPathPoint path_point_1:
            PathPoint: pelvis (-0.162 -0.086 0.052)
          Scholz2015GeometryPathPoint path_point_2:
            PathPoint: femur_r (-0.044 -0.095 0.012)
          Scholz2015GeometryPathPoint path_point_3:
            PathPoint: femur_r (-0.009 -0.116 0.043)
      FiberForceLengthCurve: strain_at_zero_force=0.03977768 strain_at_one_norm_force=0.7004988
          stiffness_at_low_force=0.2 stiffness_at_one_norm_force=3.026996 curviness=0.75
    Millard2012EquilibriumMuscle glmed1_r: max_isometric_force=1093.467 optimal_fiber_length=0.0765
        tendon_slack_length=0.0585 pennation_angle_at_optimal=0.3165559 ignore_tendon_compliance=true
      Scholz2015GeometryPath path:
        path_elements:
          Scholz2015GeometryPathPoint path_point_0:
            PathPoint: pelvis (-0.06 0.026 0.115)
          Scholz2015GeometryPathPoint path_point_1:
            PathPoint: femur_r (-0.011 -0.018 0.059)
      FiberForceLengthCurve: strain_at_zero_force=6.185261e-8 strain_at_one_norm_force=0.7000001
          stiffness_at_low_force=0.2 stiffness_at_one_norm_force=2.857143 curviness=0.75
    Millard2012EquilibriumMuscle glmed2_r: max_isometric_force=765.0917 optimal_fiber_length=0.084
        tendon_slack_length=0.07545 pennation_angle_at_optimal=0.3165559 ignore_tendon_compliance=true
      Scholz2015GeometryPath path:
        path_elements:
          Scholz2015GeometryPathPoint path_point_0:
            PathPoint: pelvis (-0.082 0.055 0.082)
          Scholz2015GeometryPathPoint path_point_1:
            PathPoint: femur_r (-0.019 -0.01 0.056)
      FiberForceLengthCurve: strain_at_zero_force=-0.1329608 strain_at_one_norm_force=0.6904088
          stiffness_at_low_force=0.2 stiffness_at_one_norm_force=2.429043 curviness=0.75
    Millard2012EquilibriumMuscle glmed3_r: max_isometric_force=871.1993 optimal_fiber_length=0.0781
        tendon_slack_length=0.0484 pennation_angle_at_optimal=0.3165559 ignore_tendon_compliance=true
      Scholz2015GeometryPath path:
        path_elements:
          Scholz2015GeometryPathPoint path_point_0:
            PathPoint: pelvis (-0.108 0.016 0.075)
          Scholz2015GeometryPathPoint path_point_1:
            PathPoint: femur_r (-0.028 -0.0047 0.0518)
      FiberForceLengthCurve: strain_at_zero_force=-0.1914236 strain_at_one_norm_force=0.6558113
          stiffness_at_low_force=0.2 stiffness_at_one_norm_force=2.360621 curviness=0.75
    Millard2012EquilibriumMuscle glmin1_r: max_isometric_force=374.0459 optimal_fiber_length=0.0813
        tendon_slack_length=0.0193 pennation_angle_at_optimal=0.1745329 ignore_tendon_compliance=true
      Scholz2015GeometryPath path:
        path_elements:
          Scholz2015GeometryPathPoint path_point_0:
            PathPoint: pelvis (-0.03 0 0.118)
          Scholz2015GeometryPathPoint path_point_1:
            PathPoint: femur_r (0.005 -0.015 0.056)
      FiberForceLengthCurve: strain_at_zero_force=-8.172674e-8 strain_at_one_norm_force=0.7000001
          stiffness_at_low_force=0.2 stiffness_at_one_norm_force=2.857142 curviness=0.75
    Millard2012EquilibriumMuscle glmin2_r: max_isometric_force=394.8197 optimal_fiber_length=0.0687
        tendon_slack_length=0.03202 pennation_angle_at_optimal=0 ignore_tendon_compliance=true
      Scholz2015GeometryPath path:
        path_elements:
          Scholz2015GeometryPathPoint path_point_0:
            PathPoint: pelvis (-0.0616 0.01 0.101)
          Scholz2015GeometryPathPoint path_point_1:
            PathPoint: femur_r (0.004 -0.009 0.052)
      FiberForceLengthCurve: strain_at_zero_force=0.001146607 strain_at_one_norm_force=0.6999804
          stiffness_at_low_force=0.2 stiffness_at_one_norm_force=2.861911 curviness=0.75
    Millard2012EquilibriumMuscle glmin3_r: max_isometric_force=446.7738 optimal_fiber_length=0.0353
        tendon_slack_length=0.0472 pennation_angle_at_optimal=0.01745329
      Scholz2015GeometryPath path:
        path_elements:
          Scholz2015GeometryPathPoint path_point_0:
            PathPoint: pelvis (-0.0789 -0.0155 0.0798)
          Scholz2015GeometryPathPoint path_point_1:
            PathPoint: femur_r (-0.004 -0.001 0.051)
      FiberForceLengthCurve: strain_at_zero_force=-0.0351512 strain_at_one_norm_force=0.6990981
          stiffness_at_low_force=0.2 stiffness_at_one_norm_force=2.723871 curviness=0.75
    Millard2012EquilibriumMuscle grac_r: max_isometric_force=281.3115 optimal_fiber_length=0.2278008
        tendon_slack_length=0.1720144 pennation_angle_at_optimal=0.1720016 ignore_tendon_compliance=true
      Scholz2015GeometryPath path:
        path_elements:
          Scholz2015GeometryPathPoint path_point_0:
            PathPoint: pelvis (-0.04736 -0.12932 0.02456)
          Scholz2015GeometryPathObstacle obstacle_0: socket_contact_geometry=/bodyset/femur_r/hamstrings_r_obstacle
              contact_hint=(-0.05 0.002 -0.005)
          Scholz2015GeometryPathPoint path_point_1:
            PathPoint: tibia_r (-0.01 -0.05 -0.01573)
      FiberForceLengthCurve: strain_at_zero_force=-0.1885953 strain_at_one_norm_force=0.7244614
          stiffness_at_low_force=0.2 stiffness_at_one_norm_force=2.190445 curviness=0.75
    Millard2012EquilibriumMuscle iliacus_r: max_isometric_force=1021.141 optimal_fiber_length=0.1066
        tendon_slack_length=0.09612071 pennation_angle_at_optimal=0.279914 ignore_tendon_compliance=true
      Scholz2015GeometryPath path:
        path_elements:
          Scholz2015GeometryPathPoint path_point_0:
            PathPoint: pelvis (-0.0605 0.0309 0.0843)
          Scholz2015GeometryPathPoint path_point_1:
            PathPoint: pelvis (-0.0135 -0.0557 0.0756)
          Scholz2015GeometryPathPoint path_point_2:
            PathPoint: femur_r (-0.0023 -0.0565 0.0139)
          Scholz2015GeometryPathPoint path_point_3:
            PathPoint: femur_r (-0.0122 -0.0637 0.0196)
      FiberForceLengthCurve: strain_at_zero_force=-0.1607227 strain_at_one_norm_force=0.5020882
          stiffness_at_low_force=0.2 stiffness_at_one_norm_force=3.017452 curviness=0.75
    Millard2012EquilibriumMuscle perbrev_r: max_isometric_force=521.2016 optimal_fiber_length=0.0454
        tendon_slack_length=0.1475275 pennation_angle_at_optimal=0.2052361
      Scholz2015GeometryPath path:
        path_elements:
          Scholz2015GeometryPathPoint path_point_0:
            PathPoint: tibia_r (-0.0243 -0.2532 0.0251)
          Scholz2015GeometryPathPoint path_point_1:
            PathPoint: tibia_r (-0.0339 -0.3893 0.0249)
          Scholz2015GeometryPathPoint path_point_2:
            PathPoint: tibia_r (-0.0285 -0.4004 0.0255)
          Scholz2015GeometryPathPoint path_point_3:
            PathPoint: calcn_r (0.0471 0.027 0.0233)
          Scholz2015GeometryPathPoint path_point_4:
            PathPoint: calcn_r (0.0677 0.0219 0.0343)
      FiberForceLengthCurve: strain_at_zero_force=-0.02868018 strain_at_one_norm_force=0.6992207
          stiffness_at_low_force=0.2 stiffness_at_one_norm_force=2.747627 curviness=0.75
    Millard2012EquilibriumMuscle perlong_r: max_isometric_force=1115.371 optimal_fiber_length=0.0508
        tendon_slack_length=0.3322208 pennation_angle_at_optimal=0.2479525
      Scholz2015GeometryPath path:
        path_elements:
          Scholz2015GeometryPathPoint path_point_0:
            PathPoint: tibia_r (-0.02 -0.1373 0.0282)
          Scholz2015GeometryPathPoint path_point_1:
            PathPoint: tibia_r (-0.0317 -0.39 0.0237)
          Scholz2015GeometryPathPoint path_point_2:
            PathPoint: tibia_r (-0.0272 -0.4014 0.024)
          Scholz2015GeometryPathPoint path_point_3:
            PathPoint: calcn_r (0.0438 0.023 0.0221)
          Scholz2015GeometryPathPoint path_point_4:
            PathPoint: calcn_r (0.0681 0.0106 0.0284)
          Scholz2015GeometryPathPoint path_point_5:
            PathPoint: calcn_r (0.0852 0.0069 0.0118)
          Scholz2015GeometryPathPoint path_point_6:
            PathPoint: calcn_r (0.1203 0.0085 -0.0184)
      FiberForceLengthCurve: strain_at_zero_force=-0.08769079 strain_at_one_norm_force=0.6966414
          stiffness_at_low_force=0.2 stiffness_at_one_norm_force=2.54994 curviness=0.75
    Millard2012EquilibriumMuscle piri_r: max_isometric_force=1029.787 optimal_fiber_length=0.0286
        tendon_slack_length=0.1263969 pennation_angle_at_optimal=0.1745329
      Scholz2015GeometryPath path:
        path_elements:
          Scholz2015GeometryPathPoint path_point_0:
            PathPoint: pelvis (-0.135 -0.00653 0.01351)
          Scholz2015GeometryPathPoint path_point_1:
            PathPoint: pelvis (-0.1 -0.03066 0.06092)
          Scholz2015GeometryPathPoint path_point_2:
            PathPoint: femur_r (-0.047 -0.0036 0.0437)
      FiberForceLengthCurve: strain_at_zero_force=-0.1828826 strain_at_one_norm_force=1.054711
          stiffness_at_low_force=0.2 stiffness_at_one_norm_force=2.257277 curviness=0.75
    Millard2012EquilibriumMuscle psoas_r: max_isometric_force=1426.79 optimal_fiber_length=0.1766359
        tendon_slack_length=0.150431 pennation_angle_at_optimal=0.2155251 ignore_tendon_compliance=true
      Scholz2015GeometryPath path:
        path_elements:
          Scholz2015GeometryPathPoint path_point_0:
            PathPoint: pelvis (-0.0205 -0.0654 0.0656)
          Scholz2015GeometryPathPoint path_point_1:
            PathPoint: femur_r (-0.0235 -0.0524 0.0088)
      FiberForceLengthCurve: strain_at_zero_force=-0.07629291 strain_at_one_norm_force=0.5032605
          stiffness_at_low_force=0.2 stiffness_at_one_norm_force=3.450933 curviness=0.75
    Millard2012EquilibriumMuscle recfem_r: max_isometric_force=2191.741 optimal_fiber_length=0.07589949
        tendon_slack_length=0.4504 pennation_angle_at_optimal=0.2170149
      Scholz2015GeometryPath path:
        path_elements:
          Scholz2015GeometryPathPoint path_point_0:
            PathPoint: pelvis (-0.053 -0.0388 0.0933)
          Scholz2015GeometryPathPoint path_point_1:
            PathPoint: femur_r (0.038 -0.425 0)
          Scholz2015GeometryPathPoint path_point_2:
            PathPoint: tibia_r (0.03 -0.025 0)
          Scholz2015GeometryPathPoint path_point_3:
            PathPoint: tibia_r (0.0326 -0.06312 -0.00047)
      FiberForceLengthCurve: strain_at_zero_force=0.1997943 strain_at_one_norm_force=0.8997465
          stiffness_at_low_force=0.2 stiffness_at_one_norm_force=2.857338 curviness=0.75
    Millard2012EquilibriumMuscle sart_r: max_isometric_force=249.4131 optimal_fiber_length=0.4030006
        tendon_slack_length=0.124 pennation_angle_at_optimal=0.02613542 ignore_tendon_compliance=true
      Scholz2015GeometryPath path:
        path_elements:
          Scholz2015GeometryPathPoint path_point_0:
            PathPoint: pelvis (-0.0195 -0.0156 0.1056)
          Scholz2015GeometryPathPoint path_point_1:
            PathPoint: femur_r (-0.003 -0.3568 -0.0421)
          Scholz2015GeometryPathPoint path_point_2:
            PathPoint: tibia_r (-0.0251 -0.0401 -0.0365)
          Scholz2015GeometryPathPoint path_point_3:
            PathPoint: tibia_r (-0.0159 -0.0599 -0.0264)
          Scholz2015GeometryPathPoint path_point_4:
            PathPoint: tibia_r (0.0136 -0.081 -0.0026)
      FiberForceLengthCurve: strain_at_zero_force=-0.07294162 strain_at_one_norm_force=0.7021361
          stiffness_at_low_force=0.2 stiffness_at_one_norm_force=2.580386 curviness=0.75
    Millard2012EquilibriumMuscle semimem_r: max_isometric_force=2200.987 optimal_fiber_length=0.086
        tendon_slack_length=0.335 pennation_angle_at_optimal=0.2545615
      Scholz2015GeometryPath path:
        path_elements:
          Scholz2015GeometryPathPoint path_point_0:
            PathPoint: pelvis (-0.11 -0.102 0.0614)
          Scholz2015GeometryPathObstacle obstacle_0: socket_contact_geometry=/bodyset/femur_r/hamstrings_r_obstacle
              contact_hint=(-0.05 0.002 -0.005)
          Scholz2015GeometryPathPoint path_point_1:
            PathPoint: tibia_r (-0.027 -0.041 -0.0196)
      FiberForceLengthCurve: strain_at_zero_force=0.1537347 strain_at_one_norm_force=1.056712
          stiffness_at_low_force=0.2 stiffness_at_one_norm_force=2.857143 curviness=0.75
    Millard2012EquilibriumMuscle semiten_r: max_isometric_force=591.2951 optimal_fiber_length=0.1930012
        tendon_slack_length=0.2472005 pennation_angle_at_optimal=0.241295
      Scholz2015GeometryPath path:
        path_elements:
          Scholz2015GeometryPathPoint path_point_0:
            PathPoint: pelvis (-0.118 -0.117 0.0515)
          Scholz2015GeometryPathObstacle obstacle_0: socket_contact_geometry=/bodyset/femur_r/hamstrings_r_obstacle
              contact_hint=(-0.05 0.002 -0.005)
          Scholz2015GeometryPathPoint path_point_1:
            PathPoint: tibia_r (0.0019 -0.0773 -0.0117)
      FiberForceLengthCurve: strain_at_zero_force=0.114169 strain_at_one_norm_force=1.070418 stiffness_at_low_force=0.2
          stiffness_at_one_norm_force=2.857143 curviness=0.75
    Millard2012EquilibriumMuscle soleus_r: max_isometric_force=6194.843 optimal_fiber_length=0.044
        tendon_slack_length=0.28135 pennation_angle_at_optimal=0.3814289
      Scholz2015GeometryPath path:
        path_elements:
          Scholz2015GeometryPathPoint path_point_0:
            PathPoint: tibia_r (-0.0076 -0.0916 0.0098)
          Scholz2015GeometryPathPoint path_point_1:
            PathPoint: calcn_r (0.0044 0.031 -0.0053)
      FiberForceLengthCurve: strain_at_zero_force=0.04016445 strain_at_one_norm_force=0.7659521
          stiffness_at_low_force=0.2 stiffness_at_one_norm_force=2.755627 curviness=0.75
    Millard2012EquilibriumMuscle tfl_r: max_isometric_force=411.2066 optimal_fiber_length=0.09315
        tendon_slack_length=0.44075 pennation_angle_at_optimal=0.05235988
      Scholz2015GeometryPath path:
        path_elements:
          Scholz2015GeometryPathPoint path_point_0:
            PathPoint: pelvis (-0.014 0.013 0.128)
          Scholz2015GeometryPathPoint path_point_1:
            PathPoint: femur_r (0.048 -0.068 0.06)
          Scholz2015GeometryPathPoint path_point_2:
            PathPoint: femur_r (0.0107 -0.405 0.0324)
          Scholz2015GeometryPathPoint path_point_3:
            PathPoint: tibia_r (0.0108 -0.041 0.0346)
      FiberForceLengthCurve: strain_at_zero_force=0.1571908 strain_at_one_norm_force=0.6394004
          stiffness_at_low_force=0.2 stiffness_at_one_norm_force=4.147574 curviness=0.75
    Millard2012EquilibriumMuscle tibant_r: max_isometric_force=1227.452 optimal_fiber_length=0.0683
        tendon_slack_length=0.240461 pennation_angle_at_optimal=0.1951828
      Scholz2015GeometryPath path:
        path_elements:
          Scholz2015GeometryPathPoint path_point_0:
            PathPoint: tibia_r (0.0154 -0.1312 0.0162)
          Scholz2015GeometryPathPoint path_point_1:
            PathPoint: tibia_r (0.0251 -0.1906 0.0128)
          Scholz2015GeometryPathPoint path_point_2:
            PathPoint: tibia_r (0.0233 -0.3659 -0.0132)
          Scholz2015GeometryPathPoint path_point_3:
            PathPoint: calcn_r (0.1166 0.0178 -0.0305)
      FiberForceLengthCurve: strain_at_zero_force=0.1588072 strain_at_one_norm_force=0.7083715
          stiffness_at_low_force=0.2 stiffness_at_one_norm_force=3.639246 curviness=0.75
    Millard2012EquilibriumMuscle tibpost_r: max_isometric_force=1730.154 optimal_fiber_length=0.0378
        tendon_slack_length=0.2807796 pennation_angle_at_optimal=0.2264891
      Scholz2015GeometryPath path:
        path_elements:
          Scholz2015GeometryPathPoint path_point_0:
            PathPoint: tibia_r (-0.0041 -0.1304 0.0103)
          Scholz2015GeometryPathPoint path_point_1:
            PathPoint: tibia_r (-0.0164 -0.3655 -0.0175)
          Scholz2015GeometryPathPoint path_point_2:
            PathPoint: calcn_r (0.0417 0.0334 -0.0286)
          Scholz2015GeometryPathPoint path_point_3:
            PathPoint: calcn_r (0.0772 0.0159 -0.0281)
      FiberForceLengthCurve: strain_at_zero_force=-0.07310113 strain_at_one_norm_force=0.698029
          stiffness_at_low_force=0.2 stiffness_at_one_norm_force=2.593596 curviness=0.75
    Millard2012EquilibriumMuscle vasint_r: max_isometric_force=1697.361 optimal_fiber_length=0.117
        tendon_slack_length=0.205 pennation_angle_at_optimal=0.06309973
      Scholz2015GeometryPath path:
        path_elements:
          Scholz2015GeometryPathPoint path_point_0:
            PathPoint: femur_r (0.029 -0.1924 0.031)
          Scholz2015GeometryPathPoint path_point_1:
            PathPoint: femur_r (0.0335 -0.2084 0.0285)
          Scholz2015GeometryPathPoint path_point_2:
            PathPoint: femur_r (0.038 -0.425 0.0005)
          Scholz2015GeometryPathPoint path_point_3:
            PathPoint: tibia_r (0.03 -0.025 0.0005)
          Scholz2015GeometryPathPoint path_point_4:
            PathPoint: tibia_r (0.03257 -0.0632 0.00043)
      FiberForceLengthCurve: strain_at_zero_force=0.1756531 strain_at_one_norm_force=0.7074754
          stiffness_at_low_force=0.2 stiffness_at_one_norm_force=3.760655 curviness=0.75
    Millard2012EquilibriumMuscle vaslat_r: max_isometric_force=5148.767 optimal_fiber_length=0.117
        tendon_slack_length=0.221 pennation_angle_at_optimal=0.2528673
      Scholz2015GeometryPath path:
        path_elements:
          Scholz2015GeometryPathPoint path_point_0:
            PathPoint: femur_r (0.0048 -0.1854 0.0349)
          Scholz2015GeometryPathPoint path_point_1:
            PathPoint: femur_r (0.0269 -0.2591 0.0409)
          Scholz2015GeometryPathPoint path_point_2:
            PathPoint: femur_r (0.038 -0.425 0.005)
          Scholz2015GeometryPathPoint path_point_3:
            PathPoint: tibia_r (0.03 -0.025 0.005)
          Scholz2015GeometryPathPoint path_point_4:
            PathPoint: tibia_r (0.03254 -0.06338 0.00511)
      FiberForceLengthCurve: strain_at_zero_force=0.1934746 strain_at_one_norm_force=0.711135
          stiffness_at_low_force=0.2 stiffness_at_one_norm_force=3.863536 curviness=0.75
    Millard2012EquilibriumMuscle vasmed_r: max_isometric_force=2747.823 optimal_fiber_length=0.11
        tendon_slack_length=0.208 pennation_angle_at_optimal=0.4222225
      Scholz2015GeometryPath path:
        path_elements:
          Scholz2015GeometryPathPoint path_point_0:
            PathPoint: femur_r (0.014 -0.2099 0.0188)
          Scholz2015GeometryPathPoint path_point_1:
            PathPoint: femur_r (0.0356 -0.2769 0.0009)
          Scholz2015GeometryPathPoint path_point_2:
            PathPoint: femur_r (0.038 -0.425 -0.005)
          Scholz2015GeometryPathPoint path_point_3:
            PathPoint: tibia_r (0.03 -0.025 -0.005)
          Scholz2015GeometryPathPoint path_point_4:
            PathPoint: tibia_r (0.0319 -0.06357 -0.00678)
      FiberForceLengthCurve: strain_at_zero_force=0.1780858 strain_at_one_norm_force=0.706013
          stiffness_at_low_force=0.2 stiffness_at_one_norm_force=3.788401 curviness=0.75
    Millard2012EquilibriumMuscle addbrev_l: max_isometric_force=625.8197 optimal_fiber_length=0.1031
        tendon_slack_length=0.03545029 pennation_angle_at_optimal=0.1147809 ignore_tendon_compliance=true
      Scholz2015GeometryPath path:
        path_elements:
          Scholz2015GeometryPathPoint path_point_0:
            PathPoint: pelvis (-0.0191 -0.094 -0.0154)
          Scholz2015GeometryPathObstacle obstacle_0: socket_contact_geometry=/bodyset/femur_l/addbrev_l_obstacle
              contact_hint=(-0.03 0 0.005)
          Scholz2015GeometryPathPoint path_point_1:
            PathPoint: femur_l (-0.002 -0.118 -0.0249)
      FiberForceLengthCurve: strain_at_zero_force=-0.1844454 strain_at_one_norm_force=1 stiffness_at_low_force=0.2
          stiffness_at_one_norm_force=2.896851 curviness=0.75
    Millard2012EquilibriumMuscle addlong_l: max_isometric_force=916.8 optimal_fiber_length=0.1082
        tendon_slack_length=0.1317994 pennation_angle_at_optimal=0.1377704
      Scholz2015GeometryPath path:
        path_elements:
          Scholz2015GeometryPathPoint path_point_0:
            PathPoint: pelvis (-0.025 -0.0889 -0.01888)
          Scholz2015GeometryPathObstacle obstacle_0: socket_contact_geometry=/bodyset/femur_l/addlong_l_obstacle
              contact_hint=(-0.03 0 -0.005)
          Scholz2015GeometryPathPoint path_point_1:
            PathPoint: femur_l (0.01126 -0.23937 -0.01583)
      FiberForceLengthCurve: strain_at_zero_force=-0.1942012 strain_at_one_norm_force=1 stiffness_at_low_force=0.2
          stiffness_at_one_norm_force=2.875548 curviness=0.75
    Millard2012EquilibriumMuscle addmagDist_l: max_isometric_force=597.2951 optimal_fiber_length=0.1772
        tendon_slack_length=0.0873807 pennation_angle_at_optimal=0.194705 ignore_tendon_compliance=true
      Scholz2015GeometryPath path:
        path_elements:
          Scholz2015GeometryPathPoint path_point_0:
            PathPoint: pelvis (-0.07404 -0.12767 -0.03982)
          Scholz2015GeometryPathObstacle obstacle_0: socket_contact_geometry=/bodyset/femur_l/addmagDist_l_obstacle
              contact_hint=(-0.04 -0.01 0.007)
          Scholz2015GeometryPathPoint path_point_1:
            PathPoint: femur_l (0.01125 -0.2625 -0.0193)
      FiberForceLengthCurve: strain_at_zero_force=9.713794e-8 strain_at_one_norm_force=0.7000001
          stiffness_at_low_force=0.2 stiffness_at_one_norm_force=2.857143 curviness=0.75
    Millard2012EquilibriumMuscle addmagIsch_l: max_isometric_force=597.2951 optimal_fiber_length=0.1562
        tendon_slack_length=0.216343 pennation_angle_at_optimal=0.1680443
      Scholz2015GeometryPath path:
        path_elements:
          Scholz2015GeometryPathPoint path_point_0:
            PathPoint: pelvis (-0.08962 -0.12976 -0.04171)
          Scholz2015GeometryPathObstacle obstacle_0: socket_contact_geometry=/bodyset/femur_l/addmagIsch_l_obstacle
              contact_hint=(0 -0.05 0)
          Scholz2015GeometryPathPoint path_point_1:
            PathPoint: femur_l (0.00481 -0.38797 0.03273)
      FiberForceLengthCurve: strain_at_zero_force=0.005651991 strain_at_one_norm_force=0.7000408
          stiffness_at_low_force=0.2 stiffness_at_one_norm_force=2.880231 curviness=0.75
    Millard2012EquilibriumMuscle addmagMid_l: max_isometric_force=597.2951 optimal_fiber_length=0.1377
        tendon_slack_length=0.0466277 pennation_angle_at_optimal=0.2073076 ignore_tendon_compliance=true
      Scholz2015GeometryPath path:
        path_elements:
          Scholz2015GeometryPathPoint path_point_0:
            PathPoint: pelvis (-0.05266 -0.12075 -0.02854)
          Scholz2015GeometryPathObstacle obstacle_0: socket_contact_geometry=/bodyset/femur_l/addmagMid_l_obstacle
              contact_hint=(-0.03 0 -0.005)
          Scholz2015GeometryPathPoint path_point_1:
            PathPoint: femur_l (0.00242 -0.1624 -0.02922)
      FiberForceLengthCurve: strain_at_zero_force=1.776572e-8 strain_at_one_norm_force=0.7000001
          stiffness_at_low_force=0.2 stiffness_at_one_norm_force=2.857143 curviness=0.75
    Millard2012EquilibriumMuscle addmagProx_l: max_isometric_force=597.2951 optimal_fiber_length=0.1056
        tendon_slack_length=0.0403241 pennation_angle_at_optimal=0.3114833 ignore_tendon_compliance=true
      Scholz2015GeometryPath path:
        path_elements:
          Scholz2015GeometryPathPoint path_point_0:
            PathPoint: pelvis (-0.03098 -0.10755 -0.01365)
          Scholz2015GeometryPathObstacle obstacle_0: socket_contact_geometry=/bodyset/femur_l/addmagProx_l_obstacle
              contact_hint=(-0.03 0 -0.005)
          Scholz2015GeometryPathPoint path_point_1:
            PathPoint: femur_l (-0.01527 -0.07886 -0.03202)
      FiberForceLengthCurve: strain_at_zero_force=8.055312e-8 strain_at_one_norm_force=0.7000001
          stiffness_at_low_force=0.2 stiffness_at_one_norm_force=2.857143 curviness=0.75
    Millard2012EquilibriumMuscle bflh_l: max_isometric_force=1313.184 optimal_fiber_length=0.1073606
        tendon_slack_length=0.36575 pennation_angle_at_optimal=0.1759182
      Scholz2015GeometryPath path:
        path_elements:
          Scholz2015GeometryPathPoint path_point_0:
            PathPoint: pelvis (-0.134 -0.1191 -0.0586)
          Scholz2015GeometryPathPoint path_point_1:
            PathPoint: tibia_l (-0.03436 -0.03648 -0.03618)
          Scholz2015GeometryPathPoint path_point_2:
            PathPoint: tibia_l (-0.02704 -0.05008 -0.03476)
      FiberForceLengthCurve: strain_at_zero_force=0.1368428 strain_at_one_norm_force=1.058102
          stiffness_at_low_force=0.2 stiffness_at_one_norm_force=3.517666 curviness=0.75
    Millard2012EquilibriumMuscle bfsh_l: max_isometric_force=557.1148 optimal_fiber_length=0.1103005
        tendon_slack_length=0.1058177 pennation_angle_at_optimal=0.2642232 ignore_tendon_compliance=true
      Scholz2015GeometryPath path:
        path_elements:
          Scholz2015GeometryPathPoint path_point_0:
            PathPoint: femur_l (0.005 -0.2111 -0.0234)
          Scholz2015GeometryPathPoint path_point_1:
            PathPoint: tibia_l (-0.02866 -0.03284 -0.03204)
      FiberForceLengthCurve: strain_at_zero_force=0.04380442 strain_at_one_norm_force=0.6994891
          stiffness_at_low_force=0.2 stiffness_at_one_norm_force=3.050247 curviness=0.75
    Millard2012EquilibriumMuscle edl_l: max_isometric_force=603.4982 optimal_fiber_length=0.0693
        tendon_slack_length=0.3688752 pennation_angle_at_optimal=0.2182582
      Scholz2015GeometryPath path:
        path_elements:
          Scholz2015GeometryPathPoint path_point_0:
            PathPoint: tibia_l (-0.016 -0.1157 -0.0205)
          Scholz2015GeometryPathPoint path_point_1:
            PathPoint: tibia_l (0.0164 -0.376 -0.0112)
          Scholz2015GeometryPathPoint path_point_2:
            PathPoint: calcn_l (0.0919 0.036 -0.0008)
          Scholz2015GeometryPathPoint path_point_3:
            PathPoint: calcn_l (0.1616 0.0055 -0.013)
          Scholz2015GeometryPathPoint path_point_4:
            PathPoint: toes_l (0.0003 0.0047 -0.0153)
          Scholz2015GeometryPathPoint path_point_5:
            PathPoint: toes_l (0.0443 -0.0004 -0.025)
      FiberForceLengthCurve: strain_at_zero_force=0.1015352 strain_at_one_norm_force=0.7074931
          stiffness_at_low_force=0.2 stiffness_at_one_norm_force=3.30056 curviness=0.75
    Millard2012EquilibriumMuscle ehl_l: max_isometric_force=285.8675 optimal_fiber_length=0.0748
        tendon_slack_length=0.3267953 pennation_angle_at_optimal=0.1972681
      Scholz2015GeometryPath path:
        path_elements:
          Scholz2015GeometryPathPoint path_point_0:
            PathPoint: tibia_l (-0.014 -0.155 -0.0189)
          Scholz2015GeometryPathPoint path_point_1:
            PathPoint: tibia_l (0.0071 -0.2909 -0.0164)
          Scholz2015GeometryPathPoint path_point_2:
            PathPoint: tibia_l (0.02 -0.3693 0.0028)
          Scholz2015GeometryPathPoint path_point_3:
            PathPoint: calcn_l (0.097 0.0389 0.0211)
          Scholz2015GeometryPathPoint path_point_4:
            PathPoint: calcn_l (0.1293 0.0309 0.0257)
          Scholz2015GeometryPathPoint path_point_5:
            PathPoint: calcn_l (0.1734 0.0139 0.028)
          Scholz2015GeometryPathPoint path_point_6:
            PathPoint: toes_l (0.0298 0.0041 0.0245)
          Scholz2015GeometryPathPoint path_point_7:
            PathPoint: toes_l (0.0563 0.0034 0.0186)
      FiberForceLengthCurve: strain_at_zero_force=0.08168779 strain_at_one_norm_force=0.7147756
          stiffness_at_low_force=0.2 stiffness_at_one_norm_force=3.159119 curviness=0.75
    Millard2012EquilibriumMuscle fdl_l: max_isometric_force=423.177 optimal_fiber_length=0.0446
        tendon_slack_length=0.3787729 pennation_angle_at_optimal=0.2248391
      Scholz2015GeometryPath path:
        path_elements:
          Scholz2015GeometryPathPoint path_point_0:
            PathPoint: tibia_l (-0.0023 -0.1832 0.0018)
          Scholz2015GeometryPathPoint path_point_1:
            PathPoint: tibia_l (-0.0176 -0.3645 0.0124)
          Scholz2015GeometryPathPoint path_point_2:
            PathPoint: calcn_l (0.0436 0.0315 0.028)
          Scholz2015GeometryPathPoint path_point_3:
            PathPoint: calcn_l (0.0708 0.0176 0.0263)
          Scholz2015GeometryPathPoint path_point_4:
            PathPoint: calcn_l (0.1658 -0.0081 -0.0116)
          Scholz2015GeometryPathPoint path_point_5:
            PathPoint: toes_l (-0.0019 -0.0078 -0.0147)
          Scholz2015GeometryPathPoint path_point_6:
            PathPoint: toes_l (0.0285 -0.0071 -0.0215)
          Scholz2015GeometryPathPoint path_point_7:
            PathPoint: toes_l (0.0441 -0.006 -0.0242)
      FiberForceLengthCurve: strain_at_zero_force=-0.006468795 strain_at_one_norm_force=0.6998542
          stiffness_at_low_force=0.2 stiffness_at_one_norm_force=2.831566 curviness=0.75
    Millard2012EquilibriumMuscle fhl_l: max_isometric_force=907.8393 optimal_fiber_length=0.0527
        tendon_slack_length=0.3543397 pennation_angle_at_optimal=0.2580255
      Scholz2015GeometryPath path:
        path_elements:
          Scholz2015GeometryPathPoint path_point_0:
            PathPoint: tibia_l (-0.031 -0.2163 -0.02)
          Scholz2015GeometryPathPoint path_point_1:
            PathPoint: tibia_l (-0.0242 -0.3671 0.0076)
          Scholz2015GeometryPathPoint path_point_2:
            PathPoint: calcn_l (0.0374 0.0276 0.0241)
          Scholz2015GeometryPathPoint path_point_3:
            PathPoint: calcn_l (0.1038 0.0068 0.0256)
          Scholz2015GeometryPathPoint path_point_4:
            PathPoint: calcn_l (0.1726 -0.0053 0.0269)
          Scholz2015GeometryPathPoint path_point_5:
            PathPoint: toes_l (0.0155 -0.0064 0.0265)
          Scholz2015GeometryPathPoint path_point_6:
            PathPoint: toes_l (0.0562 -0.0102 0.0181)
      FiberForceLengthCurve: strain_at_zero_force=0.007614866 strain_at_one_norm_force=0.7001852
          stiffness_at_low_force=0.2 stiffness_at_one_norm_force=2.887793 curviness=0.75
    Millard2012EquilibriumMuscle gaslat_l: max_isometric_force=1575.059 optimal_fiber_length=0.069
        tendon_slack_length=0.374 pennation_angle_at_optimal=0.2102268
      Scholz2015GeometryPath path:
        path_elements:
          Scholz2015GeometryPathPoint path_point_0:
            PathPoint: femur_l (0.002 -0.381 -0.02059)
          Scholz2015GeometryPathObstacle obstacle_0: socket_contact_geometry=/bodyset/tibia_l/gaslat_l_obstacle
              contact_hint=(0.005 -0.075 0)
          Scholz2015GeometryPathPoint path_point_1:
            PathPoint: calcn_l (0.0044 0.031 0.0053)
      FiberForceLengthCurve: strain_at_zero_force=-0.1932361 strain_at_one_norm_force=0.6636807
          stiffness_at_low_force=0.2 stiffness_at_one_norm_force=2.333949 curviness=0.75
    Millard2012EquilibriumMuscle gasmed_l: max_isometric_force=3115.515 optimal_fiber_length=0.059
        tendon_slack_length=0.387 pennation_angle_at_optimal=0.1656816
      Scholz2015GeometryPath path:
        path_elements:
          Scholz2015GeometryPathPoint path_point_0:
            PathPoint: femur_l (0.006 -0.385 0.022)
          Scholz2015GeometryPathObstacle obstacle_0: socket_contact_geometry=/bodyset/tibia_l/gasmed_l_obstacle
              contact_hint=(0.005 -0.07 -0.001)
          Scholz2015GeometryPathPoint path_point_1:
            PathPoint: calcn_l (0.0044 0.031 0.0053)
      FiberForceLengthCurve: strain_at_zero_force=0.1506325 strain_at_one_norm_force=0.550636
          stiffness_at_low_force=0.2 stiffness_at_one_norm_force=4.999956 curviness=0.75
    Millard2012EquilibriumMuscle glmax1_l: max_isometric_force=983.7836 optimal_fiber_length=0.147
        tendon_slack_length=0.0873 pennation_angle_at_optimal=0.3540118 ignore_tendon_compliance=true
      Scholz2015GeometryPath path:
        path_elements:
          Scholz2015GeometryPathPoint path_point_0:
            PathPoint: pelvis (-0.126 0.065 -0.066)
          Scholz2015GeometryPathPoint path_point_1:
            PathPoint: pelvis (-0.125 -0.023 -0.09)
          Scholz2015GeometryPathPoint path_point_2:
            PathPoint: femur_l (-0.045 -0.015 -0.035)
          Scholz2015GeometryPathPoint path_point_3:
            PathPoint: femur_l (-0.028 -0.045 -0.052)
      FiberForceLengthCurve: strain_at_zero_force=2.229005e-7 strain_at_one_norm_force=0.6999999
          stiffness_at_low_force=0.2 stiffness_at_one_norm_force=2.857144 curviness=0.75
    Millard2012EquilibriumMuscle glmax2_l: max_isometric_force=1406.046 optimal_fiber_length=0.157
        tendon_slack_length=0.109 pennation_angle_at_optimal=0.3673821 ignore_tendon_compliance=true
      Scholz2015GeometryPath path:
        path_elements:
          Scholz2015GeometryPathPoint path_point_0:
            PathPoint: pelvis (-0.14 0.02 -0.058)
          Scholz2015GeometryPathPoint path_point_1:
            PathPoint: pelvis (-0.145 -0.045 -0.085)
          Scholz2015GeometryPathPoint path_point_2:
            PathPoint: femur_l (-0.056 -0.046 -0.03)
          Scholz2015GeometryPathPoint path_point_3:
            PathPoint: femur_l (-0.01 -0.09 -0.048)
      FiberForceLengthCurve: strain_at_zero_force=1.628612e-7 strain_at_one_norm_force=0.7000001
          stiffness_at_low_force=0.2 stiffness_at_one_norm_force=2.857143 curviness=0.75
    Millard2012EquilibriumMuscle glmax3_l: max_isometric_force=947.7541 optimal_fiber_length=0.167
        tendon_slack_length=0.103 pennation_angle_at_optimal=0.3824161 ignore_tendon_compliance=true
      Scholz2015GeometryPath path:
        path_elements:
          Scholz2015GeometryPathPoint path_point_0:
            PathPoint: pelvis (-0.158 0.008 -0.028)
          Scholz2015GeometryPathPoint path_point_1:
            PathPoint: pelvis (-0.162 -0.086 -0.052)
          Scholz2015GeometryPathPoint path_point_2:
            PathPoint: femur_l (-0.044 -0.095 -0.012)
          Scholz2015GeometryPathPoint path_point_3:
            PathPoint: femur_l (-0.009 -0.116 -0.043)
      FiberForceLengthCurve: strain_at_zero_force=0.03977768 strain_at_one_norm_force=0.7004988
          stiffness_at_low_force=0.2 stiffness_at_one_norm_force=3.026996 curviness=0.75
    Millard2012EquilibriumMuscle glmed1_l: max_isometric_force=1093.467 optimal_fiber_length=0.0765
        tendon_slack_length=0.0585 pennation_angle_at_optimal=0.3165559 ignore_tendon_compliance=true
      Scholz2015GeometryPath path:
        path_elements:
          Scholz2015GeometryPathPoint path_point_0:
            PathPoint: pelvis (-0.06 0.026 -0.115)
          Scholz2015GeometryPathPoint path_point_1:
            PathPoint: femur_l (-0.011 -0.018 -0.059)
      FiberForceLengthCurve: strain_at_zero_force=6.185261e-8 strain_at_one_norm_force=0.7000001
          stiffness_at_low_force=0.2 stiffness_at_one_norm_force=2.857143 curviness=0.75
    Millard2012EquilibriumMuscle glmed2_l: max_isometric_force=765.0917 optimal_fiber_length=0.084
        tendon_slack_length=0.07545 pennation_angle_at_optimal=0.3165559 ignore_tendon_compliance=true
      Scholz2015GeometryPath path:
        path_elements:
          Scholz2015GeometryPathPoint path_point_0:
            PathPoint: pelvis (-0.082 0.055 -0.082)
          Scholz2015GeometryPathPoint path_point_1:
            PathPoint: femur_l (-0.019 -0.01 -0.056)
      FiberForceLengthCurve: strain_at_zero_force=-0.1329608 strain_at_one_norm_force=0.6904088
          stiffness_at_low_force=0.2 stiffness_at_one_norm_force=2.429043 curviness=0.75
    Millard2012EquilibriumMuscle glmed3_l: max_isometric_force=871.1993 optimal_fiber_length=0.0781
        tendon_slack_length=0.0484 pennation_angle_at_optimal=0.3165559 ignore_tendon_compliance=true
      Scholz2015GeometryPath path:
        path_elements:
          Scholz2015GeometryPathPoint path_point_0:
            PathPoint: pelvis (-0.108 0.016 -0.075)
          Scholz2015GeometryPathPoint path_point_1:
            PathPoint: femur_l (-0.028 -0.0047 -0.0518)
      FiberForceLengthCurve: strain_at_zero_force=-0.1914236 strain_at_one_norm_force=0.6558113
          stiffness_at_low_force=0.2 stiffness_at_one_norm_force=2.360621 curviness=0.75
    Millard2012EquilibriumMuscle glmin1_l: max_isometric_force=374.0459 optimal_fiber_length=0.0813
        tendon_slack_length=0.0193 pennation_angle_at_optimal=0.1745329 ignore_tendon_compliance=true
      Scholz2015GeometryPath path:
        path_elements:
          Scholz2015GeometryPathPoint path_point_0:
            PathPoint: pelvis (-0.03 0 -0.118)
          Scholz2015GeometryPathPoint path_point_1:
            PathPoint: femur_l (0.005 -0.015 -0.056)
      FiberForceLengthCurve: strain_at_zero_force=-8.172674e-8 strain_at_one_norm_force=0.7000001
          stiffness_at_low_force=0.2 stiffness_at_one_norm_force=2.857142 curviness=0.75
    Millard2012EquilibriumMuscle glmin2_l: max_isometric_force=394.8197 optimal_fiber_length=0.0687
        tendon_slack_length=0.03202 pennation_angle_at_optimal=0 ignore_tendon_compliance=true
      Scholz2015GeometryPath path:
        path_elements:
          Scholz2015GeometryPathPoint path_point_0:
            PathPoint: pelvis (-0.0616 0.01 -0.101)
          Scholz2015GeometryPathPoint path_point_1:
            PathPoint: femur_l (0.004 -0.009 -0.052)
      FiberForceLengthCurve: strain_at_zero_force=0.001146607 strain_at_one_norm_force=0.6999804
          stiffness_at_low_force=0.2 stiffness_at_one_norm_force=2.861911 curviness=0.75
    Millard2012EquilibriumMuscle glmin3_l: max_isometric_force=446.7738 optimal_fiber_length=0.0353
        tendon_slack_length=0.0472 pennation_angle_at_optimal=0.01745329
      Scholz2015GeometryPath path:
        path_elements:
          Scholz2015GeometryPathPoint path_point_0:
            PathPoint: pelvis (-0.0789 -0.0155 -0.0798)
          Scholz2015GeometryPathPoint path_point_1:
            PathPoint: femur_l (-0.004 -0.001 -0.051)
      FiberForceLengthCurve: strain_at_zero_force=-0.0351512 strain_at_one_norm_force=0.6990981
          stiffness_at_low_force=0.2 stiffness_at_one_norm_force=2.723871 curviness=0.75
    Millard2012EquilibriumMuscle grac_l: max_isometric_force=281.3115 optimal_fiber_length=0.2278006
        tendon_slack_length=0.1720142 pennation_angle_at_optimal=0.1720016 ignore_tendon_compliance=true
      Scholz2015GeometryPath path:
        path_elements:
          Scholz2015GeometryPathPoint path_point_0:
            PathPoint: pelvis (-0.04736 -0.12932 -0.02456)
          Scholz2015GeometryPathObstacle obstacle_0: socket_contact_geometry=/bodyset/femur_l/hamstrings_l_obstacle
              contact_hint=(-0.05 0.002 0.005)
          Scholz2015GeometryPathPoint path_point_1:
            PathPoint: tibia_l (-0.01 -0.05 0.01573)
      FiberForceLengthCurve: strain_at_zero_force=-0.1885953 strain_at_one_norm_force=0.7244614
          stiffness_at_low_force=0.2 stiffness_at_one_norm_force=2.190445 curviness=0.75
    Millard2012EquilibriumMuscle iliacus_l: max_isometric_force=1021.141 optimal_fiber_length=0.1066
        tendon_slack_length=0.09612071 pennation_angle_at_optimal=0.279914 ignore_tendon_compliance=true
      Scholz2015GeometryPath path:
        path_elements:
          Scholz2015GeometryPathPoint path_point_0:
            PathPoint: pelvis (-0.0605 0.0309 -0.0843)
          Scholz2015GeometryPathPoint path_point_1:
            PathPoint: pelvis (-0.028 -0.017 -0.087)
          Scholz2015GeometryPathPoint path_point_2:
            PathPoint: femur_l (-0.0023 -0.0565 -0.0139)
          Scholz2015GeometryPathPoint path_point_3:
            PathPoint: femur_l (-0.0122 -0.0637 -0.0196)
      FiberForceLengthCurve: strain_at_zero_force=-0.1607227 strain_at_one_norm_force=0.5020882
          stiffness_at_low_force=0.2 stiffness_at_one_norm_force=3.017452 curviness=0.75
    Millard2012EquilibriumMuscle perbrev_l: max_isometric_force=521.2016 optimal_fiber_length=0.0454
        tendon_slack_length=0.1475275 pennation_angle_at_optimal=0.2052361
      Scholz2015GeometryPath path:
        path_elements:
          Scholz2015GeometryPathPoint path_point_0:
            PathPoint: tibia_l (-0.0243 -0.2532 -0.0251)
          Scholz2015GeometryPathPoint path_point_1:
            PathPoint: tibia_l (-0.0339 -0.3893 -0.0249)
          Scholz2015GeometryPathPoint path_point_2:
            PathPoint: tibia_l (-0.0285 -0.4004 -0.0255)
          Scholz2015GeometryPathPoint path_point_3:
            PathPoint: calcn_l (0.0471 0.027 -0.0233)
          Scholz2015GeometryPathPoint path_point_4:
            PathPoint: calcn_l (0.0677 0.0219 -0.0343)
      FiberForceLengthCurve: strain_at_zero_force=-0.02868018 strain_at_one_norm_force=0.6992207
          stiffness_at_low_force=0.2 stiffness_at_one_norm_force=2.747627 curviness=0.75
    Millard2012EquilibriumMuscle perlong_l: max_isometric_force=1115.371 optimal_fiber_length=0.0508
        tendon_slack_length=0.3322208 pennation_angle_at_optimal=0.2479525
      Scholz2015GeometryPath path:
        path_elements:
          Scholz2015GeometryPathPoint path_point_0:
            PathPoint: tibia_l (-0.02 -0.1373 -0.0282)
          Scholz2015GeometryPathPoint path_point_1:
            PathPoint: tibia_l (-0.0317 -0.39 -0.0237)
          Scholz2015GeometryPathPoint path_point_2:
            PathPoint: tibia_l (-0.0272 -0.4014 -0.024)
          Scholz2015GeometryPathPoint path_point_3:
            PathPoint: calcn_l (0.0438 0.023 -0.0221)
          Scholz2015GeometryPathPoint path_point_4:
            PathPoint: calcn_l (0.0681 0.0106 -0.0284)
          Scholz2015GeometryPathPoint path_point_5:
            PathPoint: calcn_l (0.0852 0.0069 -0.0118)
          Scholz2015GeometryPathPoint path_point_6:
            PathPoint: calcn_l (0.1203 0.0085 0.0184)
      FiberForceLengthCurve: strain_at_zero_force=-0.08769079 strain_at_one_norm_force=0.6966414
          stiffness_at_low_force=0.2 stiffness_at_one_norm_force=2.54994 curviness=0.75
    Millard2012EquilibriumMuscle piri_l: max_isometric_force=1029.787 optimal_fiber_length=0.0286
        tendon_slack_length=0.1263969 pennation_angle_at_optimal=0.1745329
      Scholz2015GeometryPath path:
        path_elements:
          Scholz2015GeometryPathPoint path_point_0:
            PathPoint: pelvis (-0.135 -0.00653 -0.01351)
          Scholz2015GeometryPathPoint path_point_1:
            PathPoint: pelvis (-0.1 -0.03066 -0.06092)
          Scholz2015GeometryPathPoint path_point_2:
            PathPoint: femur_l (-0.047 -0.0036 -0.0437)
      FiberForceLengthCurve: strain_at_zero_force=-0.1828826 strain_at_one_norm_force=1.054711
          stiffness_at_low_force=0.2 stiffness_at_one_norm_force=2.257277 curviness=0.75
    Millard2012EquilibriumMuscle psoas_l: max_isometric_force=1426.79 optimal_fiber_length=0.1766359
        tendon_slack_length=0.150431 pennation_angle_at_optimal=0.2155251 ignore_tendon_compliance=true
      Scholz2015GeometryPath path:
        path_elements:
          Scholz2015GeometryPathPoint path_point_0:
            PathPoint: pelvis (-0.0205 -0.0654 -0.0656)
          Scholz2015GeometryPathPoint path_point_1:
            PathPoint: femur_l (-0.0235 -0.0524 -0.0088)
      FiberForceLengthCurve: strain_at_zero_force=-0.07629291 strain_at_one_norm_force=0.5032605
          stiffness_at_low_force=0.2 stiffness_at_one_norm_force=3.450933 curviness=0.75
    Millard2012EquilibriumMuscle recfem_l: max_isometric_force=2191.741 optimal_fiber_length=0.07589965
        tendon_slack_length=0.4504 pennation_angle_at_optimal=0.2170149
      Scholz2015GeometryPath path:
        path_elements:
          Scholz2015GeometryPathPoint path_point_0:
            PathPoint: pelvis (-0.053 -0.0388 -0.0933)
          Scholz2015GeometryPathPoint path_point_1:
            PathPoint: femur_l (0.038 -0.425 0)
          Scholz2015GeometryPathPoint path_point_2:
            PathPoint: tibia_l (0.03 -0.025 0)
          Scholz2015GeometryPathPoint path_point_3:
            PathPoint: tibia_l (0.0326 -0.06312 0.00047)
      FiberForceLengthCurve: strain_at_zero_force=0.1997943 strain_at_one_norm_force=0.8997465
          stiffness_at_low_force=0.2 stiffness_at_one_norm_force=2.857338 curviness=0.75
    Millard2012EquilibriumMuscle sart_l: max_isometric_force=249.4131 optimal_fiber_length=0.4030004
        tendon_slack_length=0.1239999 pennation_angle_at_optimal=0.02613542 ignore_tendon_compliance=true
      Scholz2015GeometryPath path:
        path_elements:
          Scholz2015GeometryPathPoint path_point_0:
            PathPoint: pelvis (-0.0195 -0.0156 -0.1056)
          Scholz2015GeometryPathPoint path_point_1:
            PathPoint: femur_l (-0.003 -0.3568 0.0421)
          Scholz2015GeometryPathPoint path_point_2:
            PathPoint: tibia_l (-0.0251 -0.0401 0.0365)
          Scholz2015GeometryPathPoint path_point_3:
            PathPoint: tibia_l (-0.0159 -0.0599 0.0264)
          Scholz2015GeometryPathPoint path_point_4:
            PathPoint: tibia_l (0.0136 -0.081 0.0026)
      FiberForceLengthCurve: strain_at_zero_force=-0.07294162 strain_at_one_norm_force=0.7021361
          stiffness_at_low_force=0.2 stiffness_at_one_norm_force=2.580386 curviness=0.75
    Millard2012EquilibriumMuscle semimem_l: max_isometric_force=2200.987 optimal_fiber_length=0.086
        tendon_slack_length=0.335 pennation_angle_at_optimal=0.2545615
      Scholz2015GeometryPath path:
        path_elements:
          Scholz2015GeometryPathPoint path_point_0:
            PathPoint: pelvis (-0.11 -0.102 -0.0614)
          Scholz2015GeometryPathObstacle obstacle_0: socket_contact_geometry=/bodyset/femur_l/hamstrings_l_obstacle
              contact_hint=(-0.05 0.002 0.005)
          Scholz2015GeometryPathPoint path_point_1:
            PathPoint: tibia_l (-0.027 -0.041 0.0196)
      FiberForceLengthCurve: strain_at_zero_force=0.1537347 strain_at_one_norm_force=1.056712
          stiffness_at_low_force=0.2 stiffness_at_one_norm_force=2.857143 curviness=0.75
    Millard2012EquilibriumMuscle semiten_l: max_isometric_force=591.2951 optimal_fiber_length=0.1930008
        tendon_slack_length=0.2472 pennation_angle_at_optimal=0.241295
      Scholz2015GeometryPath path:
        path_elements:
          Scholz2015GeometryPathPoint path_point_0:
            PathPoint: pelvis (-0.118 -0.117 -0.0515)
          Scholz2015GeometryPathObstacle obstacle_0: socket_contact_geometry=/bodyset/femur_l/hamstrings_l_obstacle
              contact_hint=(-0.05 0.002 0.005)
          Scholz2015GeometryPathPoint path_point_1:
            PathPoint: tibia_l (0.0019 -0.0773 0.0117)
      FiberForceLengthCurve: strain_at_zero_force=0.114169 strain_at_one_norm_force=1.070418 stiffness_at_low_force=0.2
          stiffness_at_one_norm_force=2.857143 curviness=0.75
    Millard2012EquilibriumMuscle soleus_l: max_isometric_force=6194.843 optimal_fiber_length=0.044
        tendon_slack_length=0.28135 pennation_angle_at_optimal=0.3814289
      Scholz2015GeometryPath path:
        path_elements:
          Scholz2015GeometryPathPoint path_point_0:
            PathPoint: tibia_l (-0.0076 -0.12 -0.0098)
          Scholz2015GeometryPathPoint path_point_1:
            PathPoint: calcn_l (0.0044 0.031 0.0053)
      FiberForceLengthCurve: strain_at_zero_force=0.04016445 strain_at_one_norm_force=0.7659521
          stiffness_at_low_force=0.2 stiffness_at_one_norm_force=2.755627 curviness=0.75
    Millard2012EquilibriumMuscle tfl_l: max_isometric_force=411.2066 optimal_fiber_length=0.09315
        tendon_slack_length=0.44075 pennation_angle_at_optimal=0.05235988
      Scholz2015GeometryPath path:
        path_elements:
          Scholz2015GeometryPathPoint path_point_0:
            PathPoint: pelvis (-0.014 0.013 -0.128)
          Scholz2015GeometryPathPoint path_point_1:
            PathPoint: femur_l (0.048 -0.068 -0.06)
          Scholz2015GeometryPathPoint path_point_2:
            PathPoint: femur_l (0.0107 -0.405 -0.0324)
          Scholz2015GeometryPathPoint path_point_3:
            PathPoint: tibia_l (0.0108 -0.041 -0.0346)
      FiberForceLengthCurve: strain_at_zero_force=0.1571908 strain_at_one_norm_force=0.6394004
          stiffness_at_low_force=0.2 stiffness_at_one_norm_force=4.147574 curviness=0.75
    Millard2012EquilibriumMuscle tibant_l: max_isometric_force=1227.452 optimal_fiber_length=0.0683
        tendon_slack_length=0.240461 pennation_angle_at_optimal=0.1951828
      Scholz2015GeometryPath path:
        path_elements:
          Scholz2015GeometryPathPoint path_point_0:
            PathPoint: tibia_l (0.0154 -0.1312 -0.0162)
          Scholz2015GeometryPathPoint path_point_1:
            PathPoint: tibia_l (0.0251 -0.1906 -0.0128)
          Scholz2015GeometryPathPoint path_point_2:
            PathPoint: tibia_l (0.0233 -0.3659 0.0132)
          Scholz2015GeometryPathPoint path_point_3:
            PathPoint: calcn_l (0.1166 0.0178 0.0305)
      FiberForceLengthCurve: strain_at_zero_force=0.1588072 strain_at_one_norm_force=0.7083715
          stiffness_at_low_force=0.2 stiffness_at_one_norm_force=3.639246 curviness=0.75
    Millard2012EquilibriumMuscle tibpost_l: max_isometric_force=1730.154 optimal_fiber_length=0.0378
        tendon_slack_length=0.2807796 pennation_angle_at_optimal=0.2264891
      Scholz2015GeometryPath path:
        path_elements:
          Scholz2015GeometryPathPoint path_point_0:
            PathPoint: tibia_l (-0.0041 -0.1304 -0.0103)
          Scholz2015GeometryPathPoint path_point_1:
            PathPoint: tibia_l (-0.0164 -0.3655 0.0175)
          Scholz2015GeometryPathPoint path_point_2:
            PathPoint: calcn_l (0.0417 0.0334 0.0286)
          Scholz2015GeometryPathPoint path_point_3:
            PathPoint: calcn_l (0.0772 0.0159 0.0281)
      FiberForceLengthCurve: strain_at_zero_force=-0.07310113 strain_at_one_norm_force=0.698029
          stiffness_at_low_force=0.2 stiffness_at_one_norm_force=2.593596 curviness=0.75
    Millard2012EquilibriumMuscle vasint_l: max_isometric_force=1697.361 optimal_fiber_length=0.117
        tendon_slack_length=0.205 pennation_angle_at_optimal=0.06309973
      Scholz2015GeometryPath path:
        path_elements:
          Scholz2015GeometryPathPoint path_point_0:
            PathPoint: femur_l (0.029 -0.1924 -0.031)
          Scholz2015GeometryPathPoint path_point_1:
            PathPoint: femur_l (0.0335 -0.2084 -0.0285)
          Scholz2015GeometryPathPoint path_point_2:
            PathPoint: femur_l (0.038 -0.425 -0.0005)
          Scholz2015GeometryPathPoint path_point_3:
            PathPoint: tibia_l (0.03 -0.025 -0.0005)
          Scholz2015GeometryPathPoint path_point_4:
            PathPoint: tibia_l (0.03257 -0.0632 -0.00043)
      FiberForceLengthCurve: strain_at_zero_force=0.1756531 strain_at_one_norm_force=0.7074754
          stiffness_at_low_force=0.2 stiffness_at_one_norm_force=3.760655 curviness=0.75
    Millard2012EquilibriumMuscle vaslat_l: max_isometric_force=5148.767 optimal_fiber_length=0.117
        tendon_slack_length=0.221 pennation_angle_at_optimal=0.2528673
      Scholz2015GeometryPath path:
        path_elements:
          Scholz2015GeometryPathPoint path_point_0:
            PathPoint: femur_l (0.0048 -0.1854 -0.0349)
          Scholz2015GeometryPathPoint path_point_1:
            PathPoint: femur_l (0.0269 -0.2591 -0.0409)
          Scholz2015GeometryPathPoint path_point_2:
            PathPoint: femur_l (0.038 -0.425 -0.005)
          Scholz2015GeometryPathPoint path_point_3:
            PathPoint: tibia_l (0.03 -0.025 -0.005)
          Scholz2015GeometryPathPoint path_point_4:
            PathPoint: tibia_l (0.03254 -0.06338 -0.00511)
      FiberForceLengthCurve: strain_at_zero_force=0.1934746 strain_at_one_norm_force=0.711135
          stiffness_at_low_force=0.2 stiffness_at_one_norm_force=3.863536 curviness=0.75
    Millard2012EquilibriumMuscle vasmed_l: max_isometric_force=2747.823 optimal_fiber_length=0.11
        tendon_slack_length=0.208 pennation_angle_at_optimal=0.4222225
      Scholz2015GeometryPath path:
        path_elements:
          Scholz2015GeometryPathPoint path_point_0:
            PathPoint: femur_l (0.014 -0.2099 -0.0188)
          Scholz2015GeometryPathPoint path_point_1:
            PathPoint: femur_l (0.0356 -0.2769 -0.0009)
          Scholz2015GeometryPathPoint path_point_2:
            PathPoint: femur_l (0.038 -0.425 0.005)
          Scholz2015GeometryPathPoint path_point_3:
            PathPoint: tibia_l (0.03 -0.025 0.005)
          Scholz2015GeometryPathPoint path_point_4:
            PathPoint: tibia_l (0.0319 -0.06357 0.00678)
      FiberForceLengthCurve: strain_at_zero_force=0.1780858 strain_at_one_norm_force=0.706013
          stiffness_at_low_force=0.2 stiffness_at_one_norm_force=3.788401 curviness=0.75
