# OpenSim document version 40600
Model:
  Ground
  BodySet:
    Body pendulum_base: mass=1 [kg] mass_center=(0 0 0) inertia=(1 1 1 0 0 0)
      Brick pendulum_base_geom_1: half_lengths=(0.1 0.1 0.1)
    Body pendulum_head: mass=1 mass_center=(0 0 0) inertia=(1 1 1 0 0 0)
      Sphere pendulum_head_geom_1: radius=0.1
  JointSet:
    WeldJoint ground_base: socket_parent_frame=ground_offset socket_child_frame=pendulum_base_offset
      PhysicalOffsetFrame ground_offset: socket_parent=/ground translation=(0 1.5 0) [meters]
      PhysicalOffsetFrame pendulum_base_offset: socket_parent=/bodyset/pendulum_base
    PinJoint base_to_head: socket_parent_frame=pendulum_base_offset socket_child_frame=pendulum_head_offset
      Coordinate rz: default_value=0.3864159 range=(-0.4 0.5)
      PhysicalOffsetFrame pendulum_base_offset: socket_parent=/bodyset/pendulum_base
      PhysicalOffsetFrame pendulum_head_offset: socket_parent=/bodyset/pendulum_head translation=(0 1 0)
  ForceSet:
    Millard2012EquilibriumMuscle scholz_muscle: min_control=0.01 max_control=1
      Scholz2015GeometryPath path:
        path_elements:
          Scholz2015GeometryPathPoint scholz_muscle-P1:
            PathPoint: pendulum_head (0 0 0)
          Scholz2015GeometryPathObstacle: socket_contact_geometry=/contactgeometryset/ellipsoid
              contact_hint=(0.1012596 0 0)
          Scholz2015GeometryPathPoint scholz_muscle-P2:
            PathPoint: pendulum_base (0 0 0)
      ActiveForceLengthCurve: minimum_value=0
      ForceVelocityCurve: concentric_slope_at_vmax=0 concentric_slope_near_vmax=0.25 isometric_slope=5
          eccentric_slope_at_vmax=0 eccentric_slope_near_vmax=0.15 max_eccentric_velocity_force_multiplier=1.4
      FiberForceLengthCurve
      TendonForceLengthCurve
  ContactGeometrySet:
    ContactEllipsoid ellipsoid: socket_frame=/bodyset/pendulum_base location=(-0.01 -0.25 -0.035)
        orientation=(0.25 -0.29 0.075) radii=(0.1 0.1 0.5)
